// SBML level 3 version 2

model biocrnpyler_719399()
  // model units - substance: mole, time: second, volume: litre, area: square_metre, length: metre, extent: mole

  // Compartments:
  compartment default_atp_usebiocrnpyler_719399 = 1e-6;

  // Species:
  species metabolite_adp_atp_usebiocrnpyler_719399 in default_atp_usebiocrnpyler_719399 = 0;
  species metabolite_atp_atp_usebiocrnpyler_719399 in default_atp_usebiocrnpyler_719399 = 10/default_atp_usebiocrnpyler_719399;
  species metabolite_pi_atp_usebiocrnpyler_719399 in default_atp_usebiocrnpyler_719399 = 0;

  // Reactions:
  r0_atp_usebiocrnpyler_719399: metabolite_atp_atp_usebiocrnpyler_719399 => metabolite_adp_atp_usebiocrnpyler_719399 + metabolite_pi_atp_usebiocrnpyler_719399; k*metabolite_atp_atp_usebiocrnpyler_719399;
    k = 50;

  // Unit definitions:
  unit square_metre = metre^2;
end
