// SBML level 3 version 2

model combined_model_of__biocrnpyler_335982_biocrnpyler_823642()
  // model units - substance: mole, time: second, volume: litre, area: square_metre, length: metre, extent: mole

  // Compartments:
  compartment default_virE2biocrnpyler_335982_combined = 2e-6;

  // Species:
  species dna_g_virE2biocrnpyler_335982 in default_virE2biocrnpyler_335982_combined = 0;
  species tetR_virE2biocrnpyler_335982 in default_virE2biocrnpyler_335982_combined = 0;
  species rna_g_virE2biocrnpyler_335982 in default_virE2biocrnpyler_335982_combined = 0;
  species VirE2_f_virE2biocrnpyler_335982 in default_virE2biocrnpyler_335982_combined = 0;
  species atc_i_virE2biocrnpyler_335982 in default_virE2biocrnpyler_335982_combined = 0;
  species complex_atc_i_tetR_virE2biocrnpyler_335982 in default_virE2biocrnpyler_335982_combined = 0;
  species VirE2_b_virE2biocrnpyler_335982 in default_virE2biocrnpyler_335982_combined = 0;
  species complex_dna_g_tetR_virE2biocrnpyler_335982 in default_virE2biocrnpyler_335982_combined = 0;
  species complex_atc_i_dna_g_tetR_virE2biocrnpyler_335982 in default_virE2biocrnpyler_335982_combined = 0;
  species rna_atpsyn_ATP_synthasebiocrnpyler_823642 in default_virE2biocrnpyler_335982_combined = 0;
  species dna_atpsyn_ATP_synthasebiocrnpyler_823642 in default_virE2biocrnpyler_335982_combined = 0;
  species protein_atpsyn_ATP_synthasebiocrnpyler_823642 in default_virE2biocrnpyler_335982_combined = 0;
  species protein_RNAP_machinery_ATP_synthasebiocrnpyler_823642 in default_virE2biocrnpyler_335982_combined = 0;
  species protein_Ribo_machinery_ATP_synthasebiocrnpyler_823642 in default_virE2biocrnpyler_335982_combined = 0;
  species protein_RNAse_machinery_ATP_synthasebiocrnpyler_823642 in default_virE2biocrnpyler_335982_combined = 0;
  species complex_dna_atpsyn_protein_RNAP_machinery_ATP_synthasebiocrnpyler_823642 in default_virE2biocrnpyler_335982_combined = 0;
  species complex_protein_Ribo_machinery_rna_atpsyn_ATP_synthasebiocrnpyler_823642 in default_virE2biocrnpyler_335982_combined = 0;
  species complex_protein_RNAse_machinery_rna_atpsyn_ATP_synthasebiocrnpyler_823642 in default_virE2biocrnpyler_335982_combined = 0;
  species protein_atpsyn_b_ATP_synthasebiocrnpyler_823642 in default_virE2biocrnpyler_335982_combined = 0;
  species proton_outside_H_ATP_synthasebiocrnpyler_823642 in default_virE2biocrnpyler_335982_combined = 0;
  species proton_inside_H_ATP_synthasebiocrnpyler_823642 in default_virE2biocrnpyler_335982_combined = 0;
  species ADP_virE2biocrnpyler_335982_1_combined in default_virE2biocrnpyler_335982_combined = 0;
  species ATP_virE2biocrnpyler_335982_1_combined in default_virE2biocrnpyler_335982_combined = 0;
  species P_virE2biocrnpyler_335982_1_combined in default_virE2biocrnpyler_335982_combined = 0;
  species rna_proton_pump_ATP_synthasebiocrnpyler_823642 in default_virE2biocrnpyler_335982_combined = 0;
  species dna_proton_pump_ATP_synthasebiocrnpyler_823642 in default_virE2biocrnpyler_335982_combined = 0;
  species protein_proton_pump_ATP_synthasebiocrnpyler_823642 in default_virE2biocrnpyler_335982_combined = 0;
  species protein_proton_pump_b_ATP_synthasebiocrnpyler_823642 in default_virE2biocrnpyler_335982_combined = 0;
  species complex_dna_proton_pump_protein_RNAP_machinery_ATP_synthasebiocrnpyler_823642 in default_virE2biocrnpyler_335982_combined = 0;
  species complex_protein_Ribo_machinery_rna_proton_pump_ATP_synthasebiocrnpyler_823642 in default_virE2biocrnpyler_335982_combined = 0;
  species complex_protein_RNAse_machinery_rna_proton_pump_ATP_synthasebiocrnpyler_823642 in default_virE2biocrnpyler_335982_combined = 0;

  // Reactions:
  r0_virE2biocrnpyler_335982: atc_i_virE2biocrnpyler_335982 + tetR_virE2biocrnpyler_335982 => complex_atc_i_tetR_virE2biocrnpyler_335982; r0_virE2biocrnpyler_335982_k*atc_i_virE2biocrnpyler_335982*tetR_virE2biocrnpyler_335982;
    r0_virE2biocrnpyler_335982_k = 0.0002;
  r0_1_virE2biocrnpyler_335982: complex_atc_i_tetR_virE2biocrnpyler_335982 => atc_i_virE2biocrnpyler_335982 + tetR_virE2biocrnpyler_335982; r0_1_virE2biocrnpyler_335982_k*complex_atc_i_tetR_virE2biocrnpyler_335982;
    r0_1_virE2biocrnpyler_335982_k = 2e-9;
  r2_virE2biocrnpyler_335982: dna_g_virE2biocrnpyler_335982 + tetR_virE2biocrnpyler_335982 => complex_dna_g_tetR_virE2biocrnpyler_335982; r2_virE2biocrnpyler_335982_k*dna_g_virE2biocrnpyler_335982*tetR_virE2biocrnpyler_335982;
    r2_virE2biocrnpyler_335982_k = 4e-5;
  r2_1_virE2biocrnpyler_335982: complex_dna_g_tetR_virE2biocrnpyler_335982 => dna_g_virE2biocrnpyler_335982 + tetR_virE2biocrnpyler_335982; r2_1_virE2biocrnpyler_335982_k*complex_dna_g_tetR_virE2biocrnpyler_335982;
    r2_1_virE2biocrnpyler_335982_k = 1e-12;
  r4_virE2biocrnpyler_335982: complex_dna_g_tetR_virE2biocrnpyler_335982 + atc_i_virE2biocrnpyler_335982 => complex_atc_i_dna_g_tetR_virE2biocrnpyler_335982; r4_virE2biocrnpyler_335982_k*complex_dna_g_tetR_virE2biocrnpyler_335982*atc_i_virE2biocrnpyler_335982;
    r4_virE2biocrnpyler_335982_k = 6e-6;
  r4_1_virE2biocrnpyler_335982: complex_atc_i_dna_g_tetR_virE2biocrnpyler_335982 => complex_dna_g_tetR_virE2biocrnpyler_335982 + atc_i_virE2biocrnpyler_335982; r4_1_virE2biocrnpyler_335982_k*complex_atc_i_dna_g_tetR_virE2biocrnpyler_335982;
    r4_1_virE2biocrnpyler_335982_k = 3e-9;
  r6_virE2biocrnpyler_335982: complex_atc_i_dna_g_tetR_virE2biocrnpyler_335982 => dna_g_virE2biocrnpyler_335982 + complex_atc_i_tetR_virE2biocrnpyler_335982; r6_virE2biocrnpyler_335982_k*complex_atc_i_dna_g_tetR_virE2biocrnpyler_335982;
    r6_virE2biocrnpyler_335982_k = 0.005;
  r6_1_virE2biocrnpyler_335982: dna_g_virE2biocrnpyler_335982 + complex_atc_i_tetR_virE2biocrnpyler_335982 => complex_atc_i_dna_g_tetR_virE2biocrnpyler_335982; r6_1_virE2biocrnpyler_335982_k*dna_g_virE2biocrnpyler_335982*complex_atc_i_tetR_virE2biocrnpyler_335982;
    r6_1_virE2biocrnpyler_335982_k = 1e-10;
  r8_virE2biocrnpyler_335982: dna_g_virE2biocrnpyler_335982 => dna_g_virE2biocrnpyler_335982 + rna_g_virE2biocrnpyler_335982; r8_virE2biocrnpyler_335982_k*dna_g_virE2biocrnpyler_335982;
    r8_virE2biocrnpyler_335982_k = 0.0031875;
  r9_virE2biocrnpyler_335982: rna_g_virE2biocrnpyler_335982 + ATP_virE2biocrnpyler_335982_1_combined => rna_g_virE2biocrnpyler_335982 + ADP_virE2biocrnpyler_335982_1_combined + VirE2_f_virE2biocrnpyler_335982 + P_virE2biocrnpyler_335982_1_combined; r9_virE2biocrnpyler_335982_k*rna_g_virE2biocrnpyler_335982*ATP_virE2biocrnpyler_335982_1_combined^r9_virE2biocrnpyler_335982_n/(ATP_virE2biocrnpyler_335982_1_combined^r9_virE2biocrnpyler_335982_n + r9_virE2biocrnpyler_335982_K);
    r9_virE2biocrnpyler_335982_k = 0.001; r9_virE2biocrnpyler_335982_n = 1; r9_virE2biocrnpyler_335982_K = 1;
  r10_virE2biocrnpyler_335982: VirE2_f_virE2biocrnpyler_335982 => VirE2_b_virE2biocrnpyler_335982; r10_virE2biocrnpyler_335982_k*VirE2_f_virE2biocrnpyler_335982/(VirE2_b_virE2biocrnpyler_335982^r10_virE2biocrnpyler_335982_n + r10_virE2biocrnpyler_335982_K);
    r10_virE2biocrnpyler_335982_k = 0.0005; r10_virE2biocrnpyler_335982_n = 1; r10_virE2biocrnpyler_335982_K = 1;
  r11_virE2biocrnpyler_335982: rna_g_virE2biocrnpyler_335982 => ; r11_virE2biocrnpyler_335982_k*rna_g_virE2biocrnpyler_335982;
    r11_virE2biocrnpyler_335982_k = 0.001;
  r12_virE2biocrnpyler_335982: VirE2_f_virE2biocrnpyler_335982 => ; r12_virE2biocrnpyler_335982_k*VirE2_f_virE2biocrnpyler_335982;
    r12_virE2biocrnpyler_335982_k = 1e-5;
  r0_ATP_synthasebiocrnpyler_823642: dna_atpsyn_ATP_synthasebiocrnpyler_823642 + protein_RNAP_machinery_ATP_synthasebiocrnpyler_823642 => complex_dna_atpsyn_protein_RNAP_machinery_ATP_synthasebiocrnpyler_823642; r0_ATP_synthasebiocrnpyler_823642_k*dna_atpsyn_ATP_synthasebiocrnpyler_823642*protein_RNAP_machinery_ATP_synthasebiocrnpyler_823642;
    r0_ATP_synthasebiocrnpyler_823642_k = 100;
  r1_ATP_synthasebiocrnpyler_823642: complex_dna_atpsyn_protein_RNAP_machinery_ATP_synthasebiocrnpyler_823642 => rna_atpsyn_ATP_synthasebiocrnpyler_823642 + protein_RNAP_machinery_ATP_synthasebiocrnpyler_823642; r1_ATP_synthasebiocrnpyler_823642_k*complex_dna_atpsyn_protein_RNAP_machinery_ATP_synthasebiocrnpyler_823642;
    r1_ATP_synthasebiocrnpyler_823642_k = 0.05;
  r2_ATP_synthasebiocrnpyler_823642: rna_atpsyn_ATP_synthasebiocrnpyler_823642 + protein_Ribo_machinery_ATP_synthasebiocrnpyler_823642 => complex_protein_Ribo_machinery_rna_atpsyn_ATP_synthasebiocrnpyler_823642; r2_ATP_synthasebiocrnpyler_823642_k*rna_atpsyn_ATP_synthasebiocrnpyler_823642*protein_Ribo_machinery_ATP_synthasebiocrnpyler_823642;
    r2_ATP_synthasebiocrnpyler_823642_k = 100;
  r3_ATP_synthasebiocrnpyler_823642: complex_protein_Ribo_machinery_rna_atpsyn_ATP_synthasebiocrnpyler_823642 => rna_atpsyn_ATP_synthasebiocrnpyler_823642 + protein_atpsyn_ATP_synthasebiocrnpyler_823642 + protein_Ribo_machinery_ATP_synthasebiocrnpyler_823642; r3_ATP_synthasebiocrnpyler_823642_k*complex_protein_Ribo_machinery_rna_atpsyn_ATP_synthasebiocrnpyler_823642;
    r3_ATP_synthasebiocrnpyler_823642_k = 0.05;
  r4_ATP_synthasebiocrnpyler_823642: rna_atpsyn_ATP_synthasebiocrnpyler_823642 + protein_RNAse_machinery_ATP_synthasebiocrnpyler_823642 => complex_protein_RNAse_machinery_rna_atpsyn_ATP_synthasebiocrnpyler_823642; r4_ATP_synthasebiocrnpyler_823642_k*rna_atpsyn_ATP_synthasebiocrnpyler_823642*protein_RNAse_machinery_ATP_synthasebiocrnpyler_823642;
    r4_ATP_synthasebiocrnpyler_823642_k = 100;
  r5_ATP_synthasebiocrnpyler_823642: complex_protein_RNAse_machinery_rna_atpsyn_ATP_synthasebiocrnpyler_823642 => protein_RNAse_machinery_ATP_synthasebiocrnpyler_823642; r5_ATP_synthasebiocrnpyler_823642_k*complex_protein_RNAse_machinery_rna_atpsyn_ATP_synthasebiocrnpyler_823642;
    r5_ATP_synthasebiocrnpyler_823642_k = 0.001;
  r6_ATP_synthasebiocrnpyler_823642: protein_atpsyn_ATP_synthasebiocrnpyler_823642 => protein_atpsyn_b_ATP_synthasebiocrnpyler_823642; r6_ATP_synthasebiocrnpyler_823642_k*protein_atpsyn_ATP_synthasebiocrnpyler_823642;
    r6_ATP_synthasebiocrnpyler_823642_k = 0.0003;
  r7_ATP_synthasebiocrnpyler_823642: 4 proton_outside_H_ATP_synthasebiocrnpyler_823642 + ADP_virE2biocrnpyler_335982_1_combined + P_virE2biocrnpyler_335982_1_combined + protein_atpsyn_b_ATP_synthasebiocrnpyler_823642 => 4 proton_inside_H_ATP_synthasebiocrnpyler_823642 + ATP_virE2biocrnpyler_335982_1_combined + protein_atpsyn_b_ATP_synthasebiocrnpyler_823642; r7_ATP_synthasebiocrnpyler_823642_k*proton_outside_H_ATP_synthasebiocrnpyler_823642^4*ADP_virE2biocrnpyler_335982_1_combined*P_virE2biocrnpyler_335982_1_combined*protein_atpsyn_b_ATP_synthasebiocrnpyler_823642;
    r7_ATP_synthasebiocrnpyler_823642_k = 100;
  r8_ATP_synthasebiocrnpyler_823642: dna_proton_pump_ATP_synthasebiocrnpyler_823642 + protein_RNAP_machinery_ATP_synthasebiocrnpyler_823642 => complex_dna_proton_pump_protein_RNAP_machinery_ATP_synthasebiocrnpyler_823642; r8_ATP_synthasebiocrnpyler_823642_k*dna_proton_pump_ATP_synthasebiocrnpyler_823642*protein_RNAP_machinery_ATP_synthasebiocrnpyler_823642;
    r8_ATP_synthasebiocrnpyler_823642_k = 100;
  r9_ATP_synthasebiocrnpyler_823642: complex_dna_proton_pump_protein_RNAP_machinery_ATP_synthasebiocrnpyler_823642 => rna_proton_pump_ATP_synthasebiocrnpyler_823642 + protein_RNAP_machinery_ATP_synthasebiocrnpyler_823642; r9_ATP_synthasebiocrnpyler_823642_k*complex_dna_proton_pump_protein_RNAP_machinery_ATP_synthasebiocrnpyler_823642;
    r9_ATP_synthasebiocrnpyler_823642_k = 0.05;
  r10_ATP_synthasebiocrnpyler_823642: rna_proton_pump_ATP_synthasebiocrnpyler_823642 + protein_Ribo_machinery_ATP_synthasebiocrnpyler_823642 => complex_protein_Ribo_machinery_rna_proton_pump_ATP_synthasebiocrnpyler_823642; r10_ATP_synthasebiocrnpyler_823642_k*rna_proton_pump_ATP_synthasebiocrnpyler_823642*protein_Ribo_machinery_ATP_synthasebiocrnpyler_823642;
    r10_ATP_synthasebiocrnpyler_823642_k = 100;
  r11_ATP_synthasebiocrnpyler_823642: complex_protein_Ribo_machinery_rna_proton_pump_ATP_synthasebiocrnpyler_823642 => rna_proton_pump_ATP_synthasebiocrnpyler_823642 + protein_proton_pump_ATP_synthasebiocrnpyler_823642 + protein_Ribo_machinery_ATP_synthasebiocrnpyler_823642; r11_ATP_synthasebiocrnpyler_823642_k*complex_protein_Ribo_machinery_rna_proton_pump_ATP_synthasebiocrnpyler_823642;
    r11_ATP_synthasebiocrnpyler_823642_k = 0.05;
  r12_ATP_synthasebiocrnpyler_823642: rna_proton_pump_ATP_synthasebiocrnpyler_823642 + protein_RNAse_machinery_ATP_synthasebiocrnpyler_823642 => complex_protein_RNAse_machinery_rna_proton_pump_ATP_synthasebiocrnpyler_823642; r12_ATP_synthasebiocrnpyler_823642_k*rna_proton_pump_ATP_synthasebiocrnpyler_823642*protein_RNAse_machinery_ATP_synthasebiocrnpyler_823642;
    r12_ATP_synthasebiocrnpyler_823642_k = 100;
  r13_ATP_synthasebiocrnpyler_823642: complex_protein_RNAse_machinery_rna_proton_pump_ATP_synthasebiocrnpyler_823642 => protein_RNAse_machinery_ATP_synthasebiocrnpyler_823642; r13_ATP_synthasebiocrnpyler_823642_k*complex_protein_RNAse_machinery_rna_proton_pump_ATP_synthasebiocrnpyler_823642;
    r13_ATP_synthasebiocrnpyler_823642_k = 0.001;
  r14_ATP_synthasebiocrnpyler_823642: protein_proton_pump_ATP_synthasebiocrnpyler_823642 => protein_proton_pump_b_ATP_synthasebiocrnpyler_823642; r14_ATP_synthasebiocrnpyler_823642_k*protein_proton_pump_ATP_synthasebiocrnpyler_823642;
    r14_ATP_synthasebiocrnpyler_823642_k = 0.0003;
  r15_ATP_synthasebiocrnpyler_823642: ATP_virE2biocrnpyler_335982_1_combined => ADP_virE2biocrnpyler_335982_1_combined + P_virE2biocrnpyler_335982_1_combined; r15_ATP_synthasebiocrnpyler_823642_k*ATP_virE2biocrnpyler_335982_1_combined;
    r15_ATP_synthasebiocrnpyler_823642_k = 0.2;
  r16_ATP_synthasebiocrnpyler_823642: 4 proton_inside_H_ATP_synthasebiocrnpyler_823642 => 4 proton_outside_H_ATP_synthasebiocrnpyler_823642; r16_ATP_synthasebiocrnpyler_823642_k*proton_inside_H_ATP_synthasebiocrnpyler_823642^4;
    r16_ATP_synthasebiocrnpyler_823642_k = 100;

  // Unit definitions:
  unit square_metre = metre^2;
end
