// SBML level 3 version 2

model biocrnpyler_940356()
  // model units - substance: mole, time: second, volume: litre, area: square_metre, length: metre, extent: mole

  // Compartments:
  compartment default = 1e-6;

  // Species:
  species enzyme_hex in default = 0;
  species metabolite_atp in default = 0;
  species molecule_glucose in default = 0;
  species molecule_g6p in default = 0;
  species metabolite_adp in default = 0;
  species complex_enzyme_hex_metabolite_atp_molecule_glucose in default = 0;
  species complex_enzyme_hex_metabolite_adp_molecule_g6p in default = 0;
  species enzyme_pgi in default = 0;
  species molecule_f6p in default = 0;
  species complex_enzyme_pgi_molecule_g6p in default = 0;
  species complex_enzyme_pgi_molecule_f6p in default = 0;
  species enzyme_pfk in default = 0;
  species molecule_f16p in default = 0;
  species complex_enzyme_pfk_metabolite_atp_molecule_f6p in default = 0;
  species complex_enzyme_pfk_metabolite_adp_molecule_f16p in default = 0;
  species enzyme_ald_tpi in default = 0;
  species molecule_g3p in default = 0;
  species complex_enzyme_ald_tpi_molecule_f16p in default = 0;
  species complex_enzyme_ald_tpi_2x_molecule_g3p in default = 0;
  species enzyme_gapN in default = 0;
  species metabolite_nadp in default = 0;
  species molecule_3pg in default = 0;
  species metabolite_nadph in default = 0;
  species complex_enzyme_gapN_2x_metabolite_nadp_2x_molecule_g3p in default = 0;
  species complex_enzyme_gapN_2x_metabolite_nadph_2x_molecule_3pg in default = 0;
  species enzyme_mGapDH in default = 0;
  species metabolite_pi in default = 0;
  species molecule_13bpg in default = 0;
  species complex_enzyme_mGapDH_2x_metabolite_nadp_metabolite_pi_2x_molecule_g3p in default = 0;
  species complex_enzyme_mGapDH_2x_metabolite_nadph_molecule_13bpg in default = 0;
  species enzyme_pgk in default = 0;
  species complex_enzyme_pgk_metabolite_adp_molecule_13bpg in default = 0;
  species complex_enzyme_pgk_metabolite_atp_2x_molecule_3pg in default = 0;
  species enzyme_pgm in default = 0;
  species molecule_2pg in default = 0;
  species complex_enzyme_pgm_2x_molecule_3pg in default = 0;
  species complex_enzyme_pgm_2x_molecule_2pg in default = 0;
  species enzyme_eno in default = 0;
  species molecule_pep in default = 0;
  species complex_enzyme_eno_2x_molecule_2pg in default = 0;
  species complex_enzyme_eno_2x_molecule_pep in default = 0;
  species enzyme_pyk in default = 0;
  species molecule_pyruvate in default = 0;
  species complex_enzyme_pyk_2x_metabolite_adp_2x_molecule_pep in default = 0;
  species complex_enzyme_pyk_2x_metabolite_atp_2x_molecule_pyruvate in default = 0;
  species enzyme_alsS in default = 0;
  species molecule_acetolac in default = 0;
  species complex_enzyme_alsS_2x_molecule_pyruvate in default = 0;
  species complex_enzyme_alsS_molecule_acetolac in default = 0;
  species enzyme_IlvC in default = 0;
  species molecule_23dih3mebut in default = 0;
  species complex_enzyme_IlvC_metabolite_nadph_molecule_acetolac in default = 0;
  species complex_enzyme_IlvC_metabolite_nadp_molecule_23dih3mebut in default = 0;
  species enzyme_IlvD in default = 0;
  species molecule_3me2oxo in default = 0;
  species complex_enzyme_IlvD_molecule_23dih3mebut in default = 0;
  species complex_enzyme_IlvD_molecule_3me2oxo in default = 0;
  species enzyme_kivD in default = 0;
  species molecule_isobutanal in default = 0;
  species complex_enzyme_kivD_molecule_3me2oxo in default = 0;
  species complex_enzyme_kivD_molecule_isobutanal in default = 0;
  species enzyme_yahk in default = 0;
  species molecule_isobutanol in default = 0;
  species complex_enzyme_yahk_metabolite_nadph_molecule_isobutanal in default = 0;
  species complex_enzyme_yahk_metabolite_nadp_molecule_isobutanol in default = 0;
  species enzyme_atp_use in default = 0;
  species complex_enzyme_atp_use_metabolite_atp in default = 0;
  species complex_enzyme_atp_use_metabolite_adp_metabolite_pi in default = 0;

  // Reactions:
  r0: enzyme_hex + metabolite_atp + molecule_glucose => complex_enzyme_hex_metabolite_atp_molecule_glucose; r0_k*enzyme_hex*metabolite_atp*molecule_glucose;
    r0_k = 0.004166667;
  r0_1: complex_enzyme_hex_metabolite_atp_molecule_glucose => enzyme_hex + metabolite_atp + molecule_glucose; r0_1_k*complex_enzyme_hex_metabolite_atp_molecule_glucose;
    r0_1_k = 0.0004166667;
  r2: complex_enzyme_hex_metabolite_atp_molecule_glucose => complex_enzyme_hex_metabolite_adp_molecule_g6p; r2_k*complex_enzyme_hex_metabolite_atp_molecule_glucose;
    r2_k = 36000;
  r3: complex_enzyme_hex_metabolite_adp_molecule_g6p => enzyme_hex + molecule_g6p + metabolite_adp; r3_k*complex_enzyme_hex_metabolite_adp_molecule_g6p;
    r3_k = 0.004166667;
  r3_1: enzyme_hex + molecule_g6p + metabolite_adp => complex_enzyme_hex_metabolite_adp_molecule_g6p; r3_1_k*enzyme_hex*molecule_g6p*metabolite_adp;
    r3_1_k = 0.0004166667;
  r5: enzyme_pgi + molecule_g6p => complex_enzyme_pgi_molecule_g6p; r5_k*enzyme_pgi*molecule_g6p;
    r5_k = 0.004166667;
  r5_1: complex_enzyme_pgi_molecule_g6p => enzyme_pgi + molecule_g6p; r5_1_k*complex_enzyme_pgi_molecule_g6p;
    r5_1_k = 0.0004166667;
  r7: complex_enzyme_pgi_molecule_g6p => complex_enzyme_pgi_molecule_f6p; r7_k*complex_enzyme_pgi_molecule_g6p;
    r7_k = 36000;
  r8: complex_enzyme_pgi_molecule_f6p => enzyme_pgi + molecule_f6p; r8_k*complex_enzyme_pgi_molecule_f6p;
    r8_k = 0.004166667;
  r8_1: enzyme_pgi + molecule_f6p => complex_enzyme_pgi_molecule_f6p; r8_1_k*enzyme_pgi*molecule_f6p;
    r8_1_k = 0.0004166667;
  r10: enzyme_pfk + metabolite_atp + molecule_f6p => complex_enzyme_pfk_metabolite_atp_molecule_f6p; r10_k*enzyme_pfk*metabolite_atp*molecule_f6p;
    r10_k = 0.004166667;
  r10_1: complex_enzyme_pfk_metabolite_atp_molecule_f6p => enzyme_pfk + metabolite_atp + molecule_f6p; r10_1_k*complex_enzyme_pfk_metabolite_atp_molecule_f6p;
    r10_1_k = 0.0004166667;
  r12: complex_enzyme_pfk_metabolite_atp_molecule_f6p => complex_enzyme_pfk_metabolite_adp_molecule_f16p; r12_k*complex_enzyme_pfk_metabolite_atp_molecule_f6p;
    r12_k = 36000;
  r13: complex_enzyme_pfk_metabolite_adp_molecule_f16p => enzyme_pfk + molecule_f16p + metabolite_adp; r13_k*complex_enzyme_pfk_metabolite_adp_molecule_f16p;
    r13_k = 0.004166667;
  r13_1: enzyme_pfk + molecule_f16p + metabolite_adp => complex_enzyme_pfk_metabolite_adp_molecule_f16p; r13_1_k*enzyme_pfk*molecule_f16p*metabolite_adp;
    r13_1_k = 0.0004166667;
  r15: enzyme_ald_tpi + molecule_f16p => complex_enzyme_ald_tpi_molecule_f16p; r15_k*enzyme_ald_tpi*molecule_f16p;
    r15_k = 0.004166667;
  r15_1: complex_enzyme_ald_tpi_molecule_f16p => enzyme_ald_tpi + molecule_f16p; r15_1_k*complex_enzyme_ald_tpi_molecule_f16p;
    r15_1_k = 0.0004166667;
  r17: complex_enzyme_ald_tpi_molecule_f16p => complex_enzyme_ald_tpi_2x_molecule_g3p; r17_k*complex_enzyme_ald_tpi_molecule_f16p;
    r17_k = 36000;
  r18: complex_enzyme_ald_tpi_2x_molecule_g3p => enzyme_ald_tpi + 2 molecule_g3p; r18_k*complex_enzyme_ald_tpi_2x_molecule_g3p;
    r18_k = 0.004166667;
  r18_1: enzyme_ald_tpi + 2 molecule_g3p => complex_enzyme_ald_tpi_2x_molecule_g3p; r18_1_k*enzyme_ald_tpi*molecule_g3p^2;
    r18_1_k = 0.0004166667;
  r20: enzyme_gapN + 2 metabolite_nadp + 2 molecule_g3p => complex_enzyme_gapN_2x_metabolite_nadp_2x_molecule_g3p; r20_k*enzyme_gapN*metabolite_nadp^2*molecule_g3p^2;
    r20_k = 0.004166667;
  r20_1: complex_enzyme_gapN_2x_metabolite_nadp_2x_molecule_g3p => enzyme_gapN + 2 metabolite_nadp + 2 molecule_g3p; r20_1_k*complex_enzyme_gapN_2x_metabolite_nadp_2x_molecule_g3p;
    r20_1_k = 0.0004166667;
  r22: complex_enzyme_gapN_2x_metabolite_nadp_2x_molecule_g3p => complex_enzyme_gapN_2x_metabolite_nadph_2x_molecule_3pg; r22_k*complex_enzyme_gapN_2x_metabolite_nadp_2x_molecule_g3p;
    r22_k = 36000;
  r23: complex_enzyme_gapN_2x_metabolite_nadph_2x_molecule_3pg => enzyme_gapN + 2 molecule_3pg + 2 metabolite_nadph; r23_k*complex_enzyme_gapN_2x_metabolite_nadph_2x_molecule_3pg;
    r23_k = 0.004166667;
  r23_1: enzyme_gapN + 2 molecule_3pg + 2 metabolite_nadph => complex_enzyme_gapN_2x_metabolite_nadph_2x_molecule_3pg; r23_1_k*enzyme_gapN*molecule_3pg^2*metabolite_nadph^2;
    r23_1_k = 0.0004166667;
  r25: enzyme_mGapDH + metabolite_pi + 2 metabolite_nadp + 2 molecule_g3p => complex_enzyme_mGapDH_2x_metabolite_nadp_metabolite_pi_2x_molecule_g3p; r25_k*enzyme_mGapDH*metabolite_pi*metabolite_nadp^2*molecule_g3p^2;
    r25_k = 0.004166667;
  r25_1: complex_enzyme_mGapDH_2x_metabolite_nadp_metabolite_pi_2x_molecule_g3p => enzyme_mGapDH + metabolite_pi + 2 metabolite_nadp + 2 molecule_g3p; r25_1_k*complex_enzyme_mGapDH_2x_metabolite_nadp_metabolite_pi_2x_molecule_g3p;
    r25_1_k = 0.0004166667;
  r27: complex_enzyme_mGapDH_2x_metabolite_nadp_metabolite_pi_2x_molecule_g3p => complex_enzyme_mGapDH_2x_metabolite_nadph_molecule_13bpg; r27_k*complex_enzyme_mGapDH_2x_metabolite_nadp_metabolite_pi_2x_molecule_g3p;
    r27_k = 36000;
  r28: complex_enzyme_mGapDH_2x_metabolite_nadph_molecule_13bpg => enzyme_mGapDH + molecule_13bpg + 2 metabolite_nadph; r28_k*complex_enzyme_mGapDH_2x_metabolite_nadph_molecule_13bpg;
    r28_k = 0.004166667;
  r28_1: enzyme_mGapDH + molecule_13bpg + 2 metabolite_nadph => complex_enzyme_mGapDH_2x_metabolite_nadph_molecule_13bpg; r28_1_k*enzyme_mGapDH*molecule_13bpg*metabolite_nadph^2;
    r28_1_k = 0.0004166667;
  r30: enzyme_pgk + metabolite_adp + molecule_13bpg => complex_enzyme_pgk_metabolite_adp_molecule_13bpg; r30_k*enzyme_pgk*metabolite_adp*molecule_13bpg;
    r30_k = 0.004166667;
  r30_1: complex_enzyme_pgk_metabolite_adp_molecule_13bpg => enzyme_pgk + metabolite_adp + molecule_13bpg; r30_1_k*complex_enzyme_pgk_metabolite_adp_molecule_13bpg;
    r30_1_k = 0.0004166667;
  r32: complex_enzyme_pgk_metabolite_adp_molecule_13bpg => complex_enzyme_pgk_metabolite_atp_2x_molecule_3pg; r32_k*complex_enzyme_pgk_metabolite_adp_molecule_13bpg;
    r32_k = 36000;
  r33: complex_enzyme_pgk_metabolite_atp_2x_molecule_3pg => enzyme_pgk + 2 molecule_3pg + metabolite_atp; r33_k*complex_enzyme_pgk_metabolite_atp_2x_molecule_3pg;
    r33_k = 0.004166667;
  r33_1: enzyme_pgk + 2 molecule_3pg + metabolite_atp => complex_enzyme_pgk_metabolite_atp_2x_molecule_3pg; r33_1_k*enzyme_pgk*molecule_3pg^2*metabolite_atp;
    r33_1_k = 0.0004166667;
  r35: enzyme_pgm + 2 molecule_3pg => complex_enzyme_pgm_2x_molecule_3pg; r35_k*enzyme_pgm*molecule_3pg^2;
    r35_k = 0.004166667;
  r35_1: complex_enzyme_pgm_2x_molecule_3pg => enzyme_pgm + 2 molecule_3pg; r35_1_k*complex_enzyme_pgm_2x_molecule_3pg;
    r35_1_k = 0.0004166667;
  r37: complex_enzyme_pgm_2x_molecule_3pg => complex_enzyme_pgm_2x_molecule_2pg; r37_k*complex_enzyme_pgm_2x_molecule_3pg;
    r37_k = 36000;
  r38: complex_enzyme_pgm_2x_molecule_2pg => enzyme_pgm + 2 molecule_2pg; r38_k*complex_enzyme_pgm_2x_molecule_2pg;
    r38_k = 0.004166667;
  r38_1: enzyme_pgm + 2 molecule_2pg => complex_enzyme_pgm_2x_molecule_2pg; r38_1_k*enzyme_pgm*molecule_2pg^2;
    r38_1_k = 0.0004166667;
  r40: enzyme_eno + 2 molecule_2pg => complex_enzyme_eno_2x_molecule_2pg; r40_k*enzyme_eno*molecule_2pg^2;
    r40_k = 0.004166667;
  r40_1: complex_enzyme_eno_2x_molecule_2pg => enzyme_eno + 2 molecule_2pg; r40_1_k*complex_enzyme_eno_2x_molecule_2pg;
    r40_1_k = 0.0004166667;
  r42: complex_enzyme_eno_2x_molecule_2pg => complex_enzyme_eno_2x_molecule_pep; r42_k*complex_enzyme_eno_2x_molecule_2pg;
    r42_k = 36000;
  r43: complex_enzyme_eno_2x_molecule_pep => enzyme_eno + 2 molecule_pep; r43_k*complex_enzyme_eno_2x_molecule_pep;
    r43_k = 0.004166667;
  r43_1: enzyme_eno + 2 molecule_pep => complex_enzyme_eno_2x_molecule_pep; r43_1_k*enzyme_eno*molecule_pep^2;
    r43_1_k = 0.0004166667;
  r45: enzyme_pyk + 2 metabolite_adp + 2 molecule_pep => complex_enzyme_pyk_2x_metabolite_adp_2x_molecule_pep; r45_k*enzyme_pyk*metabolite_adp^2*molecule_pep^2;
    r45_k = 0.004166667;
  r45_1: complex_enzyme_pyk_2x_metabolite_adp_2x_molecule_pep => enzyme_pyk + 2 metabolite_adp + 2 molecule_pep; r45_1_k*complex_enzyme_pyk_2x_metabolite_adp_2x_molecule_pep;
    r45_1_k = 0.0004166667;
  r47: complex_enzyme_pyk_2x_metabolite_adp_2x_molecule_pep => complex_enzyme_pyk_2x_metabolite_atp_2x_molecule_pyruvate; r47_k*complex_enzyme_pyk_2x_metabolite_adp_2x_molecule_pep;
    r47_k = 36000;
  r48: complex_enzyme_pyk_2x_metabolite_atp_2x_molecule_pyruvate => enzyme_pyk + 2 molecule_pyruvate + 2 metabolite_atp; r48_k*complex_enzyme_pyk_2x_metabolite_atp_2x_molecule_pyruvate;
    r48_k = 0.004166667;
  r48_1: enzyme_pyk + 2 molecule_pyruvate + 2 metabolite_atp => complex_enzyme_pyk_2x_metabolite_atp_2x_molecule_pyruvate; r48_1_k*enzyme_pyk*molecule_pyruvate^2*metabolite_atp^2;
    r48_1_k = 0.0004166667;
  r50: enzyme_alsS + 2 molecule_pyruvate => complex_enzyme_alsS_2x_molecule_pyruvate; r50_k*enzyme_alsS*molecule_pyruvate^2;
    r50_k = 0.004166667;
  r50_1: complex_enzyme_alsS_2x_molecule_pyruvate => enzyme_alsS + 2 molecule_pyruvate; r50_1_k*complex_enzyme_alsS_2x_molecule_pyruvate;
    r50_1_k = 0.0004166667;
  r52: complex_enzyme_alsS_2x_molecule_pyruvate => complex_enzyme_alsS_molecule_acetolac; r52_k*complex_enzyme_alsS_2x_molecule_pyruvate;
    r52_k = 36000;
  r53: complex_enzyme_alsS_molecule_acetolac => enzyme_alsS + molecule_acetolac; r53_k*complex_enzyme_alsS_molecule_acetolac;
    r53_k = 0.004166667;
  r53_1: enzyme_alsS + molecule_acetolac => complex_enzyme_alsS_molecule_acetolac; r53_1_k*enzyme_alsS*molecule_acetolac;
    r53_1_k = 0.0004166667;
  r55: enzyme_IlvC + metabolite_nadph + molecule_acetolac => complex_enzyme_IlvC_metabolite_nadph_molecule_acetolac; r55_k*enzyme_IlvC*metabolite_nadph*molecule_acetolac;
    r55_k = 0.004166667;
  r55_1: complex_enzyme_IlvC_metabolite_nadph_molecule_acetolac => enzyme_IlvC + metabolite_nadph + molecule_acetolac; r55_1_k*complex_enzyme_IlvC_metabolite_nadph_molecule_acetolac;
    r55_1_k = 0.0004166667;
  r57: complex_enzyme_IlvC_metabolite_nadph_molecule_acetolac => complex_enzyme_IlvC_metabolite_nadp_molecule_23dih3mebut; r57_k*complex_enzyme_IlvC_metabolite_nadph_molecule_acetolac;
    r57_k = 36000;
  r58: complex_enzyme_IlvC_metabolite_nadp_molecule_23dih3mebut => enzyme_IlvC + molecule_23dih3mebut + metabolite_nadp; r58_k*complex_enzyme_IlvC_metabolite_nadp_molecule_23dih3mebut;
    r58_k = 0.004166667;
  r58_1: enzyme_IlvC + molecule_23dih3mebut + metabolite_nadp => complex_enzyme_IlvC_metabolite_nadp_molecule_23dih3mebut; r58_1_k*enzyme_IlvC*molecule_23dih3mebut*metabolite_nadp;
    r58_1_k = 0.0004166667;
  r60: enzyme_IlvD + molecule_23dih3mebut => complex_enzyme_IlvD_molecule_23dih3mebut; r60_k*enzyme_IlvD*molecule_23dih3mebut;
    r60_k = 0.004166667;
  r60_1: complex_enzyme_IlvD_molecule_23dih3mebut => enzyme_IlvD + molecule_23dih3mebut; r60_1_k*complex_enzyme_IlvD_molecule_23dih3mebut;
    r60_1_k = 0.0004166667;
  r62: complex_enzyme_IlvD_molecule_23dih3mebut => complex_enzyme_IlvD_molecule_3me2oxo; r62_k*complex_enzyme_IlvD_molecule_23dih3mebut;
    r62_k = 36000;
  r63: complex_enzyme_IlvD_molecule_3me2oxo => enzyme_IlvD + molecule_3me2oxo; r63_k*complex_enzyme_IlvD_molecule_3me2oxo;
    r63_k = 0.004166667;
  r63_1: enzyme_IlvD + molecule_3me2oxo => complex_enzyme_IlvD_molecule_3me2oxo; r63_1_k*enzyme_IlvD*molecule_3me2oxo;
    r63_1_k = 0.0004166667;
  r65: enzyme_kivD + molecule_3me2oxo => complex_enzyme_kivD_molecule_3me2oxo; r65_k*enzyme_kivD*molecule_3me2oxo;
    r65_k = 0.004166667;
  r65_1: complex_enzyme_kivD_molecule_3me2oxo => enzyme_kivD + molecule_3me2oxo; r65_1_k*complex_enzyme_kivD_molecule_3me2oxo;
    r65_1_k = 0.0004166667;
  r67: complex_enzyme_kivD_molecule_3me2oxo => complex_enzyme_kivD_molecule_isobutanal; r67_k*complex_enzyme_kivD_molecule_3me2oxo;
    r67_k = 36000;
  r68: complex_enzyme_kivD_molecule_isobutanal => enzyme_kivD + molecule_isobutanal; r68_k*complex_enzyme_kivD_molecule_isobutanal;
    r68_k = 0.004166667;
  r68_1: enzyme_kivD + molecule_isobutanal => complex_enzyme_kivD_molecule_isobutanal; r68_1_k*enzyme_kivD*molecule_isobutanal;
    r68_1_k = 0.0004166667;
  r70: enzyme_yahk + metabolite_nadph + molecule_isobutanal => complex_enzyme_yahk_metabolite_nadph_molecule_isobutanal; r70_k*enzyme_yahk*metabolite_nadph*molecule_isobutanal;
    r70_k = 0.004166667;
  r70_1: complex_enzyme_yahk_metabolite_nadph_molecule_isobutanal => enzyme_yahk + metabolite_nadph + molecule_isobutanal; r70_1_k*complex_enzyme_yahk_metabolite_nadph_molecule_isobutanal;
    r70_1_k = 0.0004166667;
  r72: complex_enzyme_yahk_metabolite_nadph_molecule_isobutanal => complex_enzyme_yahk_metabolite_nadp_molecule_isobutanol; r72_k*complex_enzyme_yahk_metabolite_nadph_molecule_isobutanal;
    r72_k = 36000;
  r73: complex_enzyme_yahk_metabolite_nadp_molecule_isobutanol => enzyme_yahk + molecule_isobutanol + metabolite_nadp; r73_k*complex_enzyme_yahk_metabolite_nadp_molecule_isobutanol;
    r73_k = 0.004166667;
  r73_1: enzyme_yahk + molecule_isobutanol + metabolite_nadp => complex_enzyme_yahk_metabolite_nadp_molecule_isobutanol; r73_1_k*enzyme_yahk*molecule_isobutanol*metabolite_nadp;
    r73_1_k = 0.0004166667;
  r75: enzyme_atp_use + metabolite_atp => complex_enzyme_atp_use_metabolite_atp; r75_k*enzyme_atp_use*metabolite_atp;
    r75_k = 0.004166667;
  r75_1: complex_enzyme_atp_use_metabolite_atp => enzyme_atp_use + metabolite_atp; r75_1_k*complex_enzyme_atp_use_metabolite_atp;
    r75_1_k = 0.0004166667;
  r77: complex_enzyme_atp_use_metabolite_atp => complex_enzyme_atp_use_metabolite_adp_metabolite_pi; r77_k*complex_enzyme_atp_use_metabolite_atp;
    r77_k = 2;
  r78: complex_enzyme_atp_use_metabolite_adp_metabolite_pi => enzyme_atp_use + metabolite_adp + metabolite_pi; r78_k*complex_enzyme_atp_use_metabolite_adp_metabolite_pi;
    r78_k = 0.004166667;
  r78_1: enzyme_atp_use + metabolite_adp + metabolite_pi => complex_enzyme_atp_use_metabolite_adp_metabolite_pi; r78_1_k*enzyme_atp_use*metabolite_adp*metabolite_pi;
    r78_1_k = 0.0004166667;

  // Unit definitions:
  unit square_metre = metre^2;
end
