// SBML level 3 version 2

model biocrnpyler_858201()
  // model units - substance: mole, time: second, volume: litre, area: square_metre, length: metre, extent: mole

  // Compartments:
  compartment default = 1e-6;

  // Species:
  species dna_g in default = 0;
  species tetR in default = 0;
  species rna_g in default = 0;
  species VirE2_f in default = 0;
  species ATP in default = 0;
  species ADP in default = 0;
  species aTc_i in default = 0;
  species complex_aTc_i_tetR in default = 0;
  species VirE2_b in default = 0;
  species complex_dna_g_tetR in default = 0;
  species complex_aTc_i_dna_g_tetR in default = 0;
  species P in default = 0;

  // Reactions:
  r0: dna_g + tetR => complex_dna_g_tetR; r0_k*dna_g*tetR;
    r0_k = 0.001;
  r0_1: complex_dna_g_tetR => dna_g + tetR; r0_1_k*complex_dna_g_tetR;
    r0_1_k = 1e-5;
  r2: complex_dna_g_tetR + aTc_i => complex_aTc_i_dna_g_tetR; r2_k*complex_dna_g_tetR*aTc_i;
    r2_k = 0.065;
  r2_1: complex_aTc_i_dna_g_tetR => complex_dna_g_tetR + aTc_i; r2_1_k*complex_aTc_i_dna_g_tetR;
    r2_1_k = 0.0003;
  r4: complex_aTc_i_dna_g_tetR => dna_g + complex_aTc_i_tetR; r4_k*complex_aTc_i_dna_g_tetR;
    r4_k = 100;
  r4_1: dna_g + complex_aTc_i_tetR => complex_aTc_i_dna_g_tetR; r4_1_k*dna_g*complex_aTc_i_tetR;
    r4_1_k = 10;
  r6: dna_g => dna_g + rna_g; r6_k*dna_g/(tetR^r6_n + r6_K);
    r6_k = 0.01875; r6_n = 1; r6_K = 20;
  r7: dna_g => dna_g + rna_g; r7_k*dna_g;
    r7_k = 0.001;
  r8: rna_g + ATP => rna_g + ADP + VirE2_f + P; r8_k*rna_g*ATP^r8_n/(ATP^r8_n + r8_K);
    r8_k = 0.6; r8_n = 1; r8_K = 1;
  r9: VirE2_f => VirE2_b; r9_k*VirE2_f;
    r9_k = 1;
  r10: rna_g => ; r10_k*rna_g;
    r10_k = 0.001;
  r11: VirE2_f => ; r11_k*VirE2_f;
    r11_k = 1e-5;

  // Unit definitions:
  unit square_metre = metre^2;
end
