// SBML level 3 version 2

model combined_model_of__bioscrape_generated_model_775989_bioscrape_generated_model_267584_bioscrape_generated_model_30968()
  // model units - substance: mole, time: second, volume: litre, area: square_metre, length: metre, extent: mole

  // Compartments:
  compartment default_bioscrape_generated_model_775989_combined = 3e-6;
  compartment default_bioscrape_generated_model_775989_combined_1 = 1e-6;

  // Species:
  species G_bioscrape_generated_model_775989 in default_bioscrape_generated_model_775989_combined_1 = 1;
  species mRNA_T_bioscrape_generated_model_775989_1_combined in default_bioscrape_generated_model_775989_combined = 0;
  species X_bioscrape_generated_model_267584 in default_bioscrape_generated_model_775989_combined = 0;
  species I_bioscrape_generated_model_30968 in default_bioscrape_generated_model_775989_combined_1 = 2/default_bioscrape_generated_model_775989_combined_1;
  species S_bioscrape_generated_model_775989_1_combined in default_bioscrape_generated_model_775989_combined_1 = 0;

  // Parameters:
  KI_combined = 10;
  KX_bioscrape_generated_model_775989 = 2;
  DummyVar_PositiveHillPropensity_n_0_bioscrape_generated_model_267584 = 1;
  KR_bioscrape_generated_model_267584 = 20;
  KTR_bioscrape_generated_model_267584 = 5;
  delta_combined = 0.1;
  KI_bioscrape_generated_model_30968 = 25;
  n_combined = 2;
  K0_bioscrape_generated_model_30968 = 20;

  // Reactions:
  r0_bioscrape_generated_model_775989: G_bioscrape_generated_model_775989 => mRNA_T_bioscrape_generated_model_775989_1_combined + G_bioscrape_generated_model_775989; G_bioscrape_generated_model_775989*KX_bioscrape_generated_model_775989*S_bioscrape_generated_model_775989_1_combined^n_combined/(KI_combined + S_bioscrape_generated_model_775989_1_combined^n_combined);  // modifiers: S_bioscrape_generated_model_775989_1_combined
  r1_bioscrape_generated_model_775989: mRNA_T_bioscrape_generated_model_775989_1_combined => ; delta_combined*mRNA_T_bioscrape_generated_model_775989_1_combined;
  r0_bioscrape_generated_model_267584: mRNA_T_bioscrape_generated_model_775989_1_combined => mRNA_T_bioscrape_generated_model_775989_1_combined + X_bioscrape_generated_model_267584; KTR_bioscrape_generated_model_267584*mRNA_T_bioscrape_generated_model_775989_1_combined^n_combined/(KR_bioscrape_generated_model_267584 + mRNA_T_bioscrape_generated_model_775989_1_combined^DummyVar_PositiveHillPropensity_n_0_bioscrape_generated_model_267584);
  r1_bioscrape_generated_model_267584: X_bioscrape_generated_model_267584 => ; X_bioscrape_generated_model_267584*delta_combined;
  r0_bioscrape_generated_model_30968: => S_bioscrape_generated_model_775989_1_combined; I_bioscrape_generated_model_30968^n_combined*K0_bioscrape_generated_model_30968/(I_bioscrape_generated_model_30968^n_combined + KI_bioscrape_generated_model_30968);  // modifiers: I_bioscrape_generated_model_30968

  // Unit definitions:
  unit square_metre = metre^2;
end
