// SBML level 3 version 2

model biocrnpyler_394374()
  // model units - substance: mole, time: second, volume: litre, area: square_metre, length: metre, extent: mole

  // Compartments:
  compartment default = 1e-6;

  // Species:
  species rna_proton_pump in default = 0;
  species dna_proton_pump in default = 0;
  species protein_proton_pump in default = 0;
  species protein_RNAP_machinery in default = 0;
  species protein_Ribo_machinery in default = 0;
  species protein_RNAse_machinery in default = 0;
  species complex_dna_proton_pump_protein_RNAP_machinery in default = 0;
  species complex_protein_Ribo_machinery_rna_proton_pump in default = 0;
  species complex_protein_RNAse_machinery_rna_proton_pump in default = 0;
  species protein_proton_pump_b in default = 0;

  // Reactions:
  r0: dna_proton_pump + protein_RNAP_machinery => complex_dna_proton_pump_protein_RNAP_machinery; r0_k*dna_proton_pump*protein_RNAP_machinery;
    r0_k = 100;
  r1: complex_dna_proton_pump_protein_RNAP_machinery => rna_proton_pump + protein_RNAP_machinery; r1_k*complex_dna_proton_pump_protein_RNAP_machinery;
    r1_k = 0.05;
  r2: rna_proton_pump + protein_Ribo_machinery => complex_protein_Ribo_machinery_rna_proton_pump; r2_k*rna_proton_pump*protein_Ribo_machinery;
    r2_k = 100;
  r3: complex_protein_Ribo_machinery_rna_proton_pump => rna_proton_pump + protein_proton_pump + protein_Ribo_machinery; r3_k*complex_protein_Ribo_machinery_rna_proton_pump;
    r3_k = 0.05;
  r4: rna_proton_pump + protein_RNAse_machinery => complex_protein_RNAse_machinery_rna_proton_pump; r4_k*rna_proton_pump*protein_RNAse_machinery;
    r4_k = 100;
  r5: complex_protein_RNAse_machinery_rna_proton_pump => protein_RNAse_machinery; r5_k*complex_protein_RNAse_machinery_rna_proton_pump;
    r5_k = 0.001;
  r6: protein_proton_pump => protein_proton_pump_b; r6_k*protein_proton_pump;
    r6_k = 0.0003;

  // Unit definitions:
  unit square_metre = metre^2;
end
