// SBML level 3 version 2

model combined_model_of__combined_model_of__combined_model_of__combined_model_of__combined_model_of__combined_model_of__biocrnpyler_914942_biocrnpyler_658720_biocrnpyler_394224_biocrnpyler_719399_biocrnpyler_447061_biocrnpyler_252167_biocrnpyler_987223()
  // model units - substance: mole, time: second, volume: litre, area: square_metre, length: metre, extent: mole

  // Compartments:
  compartment default_atpsyn_txtlbiocrnpyler_914942_combined_combined = 7e-6;
  compartment default_atpsynthesisbiocrnpyler_394224 = 1e-6;
  compartment default_atp_usebiocrnpyler_719399 = 1e-6;
  compartment default_combined_combined = 3e-6;
  compartment default_pp_txtlbiocrnpyler_447061 = 1e-6;
  compartment default_combined_combined_1 = 4e-6;
  compartment default_pp_mibiocrnpyler_252167 = 1e-6;
  compartment default_combined_combined_2 = 5e-6;
  compartment default_protontransportbiocrnpyler_987223 = 1e-6;
  compartment default_combined_combined_3 = 6e-6;

  // Species:
  species rna_atpsyn_atpsyn_txtlbiocrnpyler_914942 in default_atpsyn_txtlbiocrnpyler_914942_combined_combined = 0;
  species dna_atpsyn_atpsyn_txtlbiocrnpyler_914942 in default_atpsyn_txtlbiocrnpyler_914942_combined_combined = 10/default_atpsyn_txtlbiocrnpyler_914942_combined_combined;
  species complex_dna_atpsyn_protein_RNAP_machinery_atpsyn_txtlbiocrnpyler_914942 in default_atpsyn_txtlbiocrnpyler_914942_combined_combined = 0;
  species complex_protein_Ribo_machinery_rna_atpsyn_atpsyn_txtlbiocrnpyler_914942 in default_atpsyn_txtlbiocrnpyler_914942_combined_combined = 0;
  species complex_protein_RNAse_machinery_rna_atpsyn_atpsyn_txtlbiocrnpyler_914942 in default_atpsyn_txtlbiocrnpyler_914942_combined_combined = 0;
  species protein_atpsyn_atpsyn_txtlbiocrnpyler_914942_1_combined in default_atpsyn_txtlbiocrnpyler_914942_combined_combined = 0;
  species protein_atpsyn_b_atpsyn_txtlbiocrnpyler_914942_1_combined_1_combined in default_atpsynthesisbiocrnpyler_394224 = 0;
  species rna_proton_pump_pp_txtlbiocrnpyler_447061 in default_pp_txtlbiocrnpyler_447061 = 0;
  species dna_proton_pump_pp_txtlbiocrnpyler_447061 in default_pp_txtlbiocrnpyler_447061 = 10/default_pp_txtlbiocrnpyler_447061;
  species protein_RNAP_machinery_atpsyn_txtlbiocrnpyler_914942_1_combined in default_pp_txtlbiocrnpyler_447061 = 10/default_pp_txtlbiocrnpyler_447061;
  species protein_Ribo_machinery_atpsyn_txtlbiocrnpyler_914942_1_combined in default_pp_txtlbiocrnpyler_447061 = 10/default_pp_txtlbiocrnpyler_447061;
  species protein_RNAse_machinery_atpsyn_txtlbiocrnpyler_914942_1_combined in default_pp_txtlbiocrnpyler_447061 = 10/default_pp_txtlbiocrnpyler_447061;
  species complex_dna_proton_pump_protein_RNAP_machinery_pp_txtlbiocrnpyler_447061 in default_pp_txtlbiocrnpyler_447061 = 0;
  species complex_protein_Ribo_machinery_rna_proton_pump_pp_txtlbiocrnpyler_447061 in default_pp_txtlbiocrnpyler_447061 = 0;
  species complex_protein_RNAse_machinery_rna_proton_pump_pp_txtlbiocrnpyler_447061 in default_pp_txtlbiocrnpyler_447061 = 0;
  species protein_proton_pump_pp_txtlbiocrnpyler_447061_1_combined in default_pp_mibiocrnpyler_252167 = 0;
  species protein_proton_pump_b_pp_mibiocrnpyler_252167 in default_pp_mibiocrnpyler_252167 = 0;
  species proton_outside_H_atpsynthesisbiocrnpyler_394224_1_combined in default_protontransportbiocrnpyler_987223 = 10/default_protontransportbiocrnpyler_987223;
  species proton_inside_H_atpsynthesisbiocrnpyler_394224_1_combined in default_protontransportbiocrnpyler_987223 = 0;
  species metabolite_adp_atpsynthesisbiocrnpyler_394224_1_combined_1_combined in default_protontransportbiocrnpyler_987223 = 0;
  species metabolite_atp_atpsynthesisbiocrnpyler_394224_1_combined_1_combined in default_protontransportbiocrnpyler_987223 = 1500000/default_protontransportbiocrnpyler_987223;
  species metabolite_pi_atpsynthesisbiocrnpyler_394224_1_combined_1_combined in default_protontransportbiocrnpyler_987223 = 0;

  // Reactions:
  r0_atpsyn_txtlbiocrnpyler_914942: dna_atpsyn_atpsyn_txtlbiocrnpyler_914942 + protein_RNAP_machinery_atpsyn_txtlbiocrnpyler_914942_1_combined => complex_dna_atpsyn_protein_RNAP_machinery_atpsyn_txtlbiocrnpyler_914942; r0_atpsyn_txtlbiocrnpyler_914942_k*dna_atpsyn_atpsyn_txtlbiocrnpyler_914942*protein_RNAP_machinery_atpsyn_txtlbiocrnpyler_914942_1_combined;
    r0_atpsyn_txtlbiocrnpyler_914942_k = 100;
  r1_atpsyn_txtlbiocrnpyler_914942: complex_dna_atpsyn_protein_RNAP_machinery_atpsyn_txtlbiocrnpyler_914942 => rna_atpsyn_atpsyn_txtlbiocrnpyler_914942 + protein_RNAP_machinery_atpsyn_txtlbiocrnpyler_914942_1_combined; r1_atpsyn_txtlbiocrnpyler_914942_k*complex_dna_atpsyn_protein_RNAP_machinery_atpsyn_txtlbiocrnpyler_914942;
    r1_atpsyn_txtlbiocrnpyler_914942_k = 0.05;
  r2_atpsyn_txtlbiocrnpyler_914942: rna_atpsyn_atpsyn_txtlbiocrnpyler_914942 + protein_Ribo_machinery_atpsyn_txtlbiocrnpyler_914942_1_combined => complex_protein_Ribo_machinery_rna_atpsyn_atpsyn_txtlbiocrnpyler_914942; r2_atpsyn_txtlbiocrnpyler_914942_k*rna_atpsyn_atpsyn_txtlbiocrnpyler_914942*protein_Ribo_machinery_atpsyn_txtlbiocrnpyler_914942_1_combined;
    r2_atpsyn_txtlbiocrnpyler_914942_k = 100;
  r3_atpsyn_txtlbiocrnpyler_914942: complex_protein_Ribo_machinery_rna_atpsyn_atpsyn_txtlbiocrnpyler_914942 => rna_atpsyn_atpsyn_txtlbiocrnpyler_914942 + protein_atpsyn_atpsyn_txtlbiocrnpyler_914942_1_combined + protein_Ribo_machinery_atpsyn_txtlbiocrnpyler_914942_1_combined; r3_atpsyn_txtlbiocrnpyler_914942_k*complex_protein_Ribo_machinery_rna_atpsyn_atpsyn_txtlbiocrnpyler_914942;
    r3_atpsyn_txtlbiocrnpyler_914942_k = 0.05;
  r4_atpsyn_txtlbiocrnpyler_914942: rna_atpsyn_atpsyn_txtlbiocrnpyler_914942 + protein_RNAse_machinery_atpsyn_txtlbiocrnpyler_914942_1_combined => complex_protein_RNAse_machinery_rna_atpsyn_atpsyn_txtlbiocrnpyler_914942; r4_atpsyn_txtlbiocrnpyler_914942_k*rna_atpsyn_atpsyn_txtlbiocrnpyler_914942*protein_RNAse_machinery_atpsyn_txtlbiocrnpyler_914942_1_combined;
    r4_atpsyn_txtlbiocrnpyler_914942_k = 100;
  r5_atpsyn_txtlbiocrnpyler_914942: complex_protein_RNAse_machinery_rna_atpsyn_atpsyn_txtlbiocrnpyler_914942 => protein_RNAse_machinery_atpsyn_txtlbiocrnpyler_914942_1_combined; r5_atpsyn_txtlbiocrnpyler_914942_k*complex_protein_RNAse_machinery_rna_atpsyn_atpsyn_txtlbiocrnpyler_914942;
    r5_atpsyn_txtlbiocrnpyler_914942_k = 0.001;
  r6_atpsyn_txtlbiocrnpyler_914942: protein_atpsyn_atpsyn_txtlbiocrnpyler_914942_1_combined => protein_atpsyn_b_atpsyn_txtlbiocrnpyler_914942_1_combined_1_combined; r6_atpsyn_txtlbiocrnpyler_914942_k*protein_atpsyn_atpsyn_txtlbiocrnpyler_914942_1_combined;
    r6_atpsyn_txtlbiocrnpyler_914942_k = 0.3;
  r0_atpsyn_mibiocrnpyler_658720: protein_atpsyn_atpsyn_txtlbiocrnpyler_914942_1_combined => protein_atpsyn_b_atpsyn_txtlbiocrnpyler_914942_1_combined_1_combined; r0_atpsyn_mibiocrnpyler_658720_k*protein_atpsyn_atpsyn_txtlbiocrnpyler_914942_1_combined;
    r0_atpsyn_mibiocrnpyler_658720_k = 0.0003;
  r0_atpsynthesisbiocrnpyler_394224: 4 proton_outside_H_atpsynthesisbiocrnpyler_394224_1_combined + protein_atpsyn_b_atpsyn_txtlbiocrnpyler_914942_1_combined_1_combined => 4 proton_inside_H_atpsynthesisbiocrnpyler_394224_1_combined + protein_atpsyn_b_atpsyn_txtlbiocrnpyler_914942_1_combined_1_combined; r0_atpsynthesisbiocrnpyler_394224_k*proton_outside_H_atpsynthesisbiocrnpyler_394224_1_combined^4*protein_atpsyn_b_atpsyn_txtlbiocrnpyler_914942_1_combined_1_combined;
    r0_atpsynthesisbiocrnpyler_394224_k = 100;
  r1_atpsynthesisbiocrnpyler_394224: metabolite_adp_atpsynthesisbiocrnpyler_394224_1_combined_1_combined + metabolite_pi_atpsynthesisbiocrnpyler_394224_1_combined_1_combined => metabolite_atp_atpsynthesisbiocrnpyler_394224_1_combined_1_combined; r1_atpsynthesisbiocrnpyler_394224_k*metabolite_adp_atpsynthesisbiocrnpyler_394224_1_combined_1_combined*metabolite_pi_atpsynthesisbiocrnpyler_394224_1_combined_1_combined;
    r1_atpsynthesisbiocrnpyler_394224_k = 100;
  r0_atp_usebiocrnpyler_719399_combined: metabolite_atp_atpsynthesisbiocrnpyler_394224_1_combined_1_combined => metabolite_adp_atpsynthesisbiocrnpyler_394224_1_combined_1_combined + metabolite_pi_atpsynthesisbiocrnpyler_394224_1_combined_1_combined; r0_atp_usebiocrnpyler_719399_combined_k*metabolite_atp_atpsynthesisbiocrnpyler_394224_1_combined_1_combined;
    r0_atp_usebiocrnpyler_719399_combined_k = 50;
  r0_pp_txtlbiocrnpyler_447061: dna_proton_pump_pp_txtlbiocrnpyler_447061 + protein_RNAP_machinery_atpsyn_txtlbiocrnpyler_914942_1_combined => complex_dna_proton_pump_protein_RNAP_machinery_pp_txtlbiocrnpyler_447061; r0_pp_txtlbiocrnpyler_447061_k*dna_proton_pump_pp_txtlbiocrnpyler_447061*protein_RNAP_machinery_atpsyn_txtlbiocrnpyler_914942_1_combined;
    r0_pp_txtlbiocrnpyler_447061_k = 100;
  r1_pp_txtlbiocrnpyler_447061: complex_dna_proton_pump_protein_RNAP_machinery_pp_txtlbiocrnpyler_447061 => rna_proton_pump_pp_txtlbiocrnpyler_447061 + protein_RNAP_machinery_atpsyn_txtlbiocrnpyler_914942_1_combined; r1_pp_txtlbiocrnpyler_447061_k*complex_dna_proton_pump_protein_RNAP_machinery_pp_txtlbiocrnpyler_447061;
    r1_pp_txtlbiocrnpyler_447061_k = 0.05;
  r2_pp_txtlbiocrnpyler_447061: rna_proton_pump_pp_txtlbiocrnpyler_447061 + protein_Ribo_machinery_atpsyn_txtlbiocrnpyler_914942_1_combined => complex_protein_Ribo_machinery_rna_proton_pump_pp_txtlbiocrnpyler_447061; r2_pp_txtlbiocrnpyler_447061_k*rna_proton_pump_pp_txtlbiocrnpyler_447061*protein_Ribo_machinery_atpsyn_txtlbiocrnpyler_914942_1_combined;
    r2_pp_txtlbiocrnpyler_447061_k = 100;
  r3_pp_txtlbiocrnpyler_447061: complex_protein_Ribo_machinery_rna_proton_pump_pp_txtlbiocrnpyler_447061 => rna_proton_pump_pp_txtlbiocrnpyler_447061 + protein_proton_pump_pp_txtlbiocrnpyler_447061_1_combined + protein_Ribo_machinery_atpsyn_txtlbiocrnpyler_914942_1_combined; r3_pp_txtlbiocrnpyler_447061_k*complex_protein_Ribo_machinery_rna_proton_pump_pp_txtlbiocrnpyler_447061;
    r3_pp_txtlbiocrnpyler_447061_k = 0.05;
  r4_pp_txtlbiocrnpyler_447061: rna_proton_pump_pp_txtlbiocrnpyler_447061 + protein_RNAse_machinery_atpsyn_txtlbiocrnpyler_914942_1_combined => complex_protein_RNAse_machinery_rna_proton_pump_pp_txtlbiocrnpyler_447061; r4_pp_txtlbiocrnpyler_447061_k*rna_proton_pump_pp_txtlbiocrnpyler_447061*protein_RNAse_machinery_atpsyn_txtlbiocrnpyler_914942_1_combined;
    r4_pp_txtlbiocrnpyler_447061_k = 100;
  r5_pp_txtlbiocrnpyler_447061: complex_protein_RNAse_machinery_rna_proton_pump_pp_txtlbiocrnpyler_447061 => protein_RNAse_machinery_atpsyn_txtlbiocrnpyler_914942_1_combined; r5_pp_txtlbiocrnpyler_447061_k*complex_protein_RNAse_machinery_rna_proton_pump_pp_txtlbiocrnpyler_447061;
    r5_pp_txtlbiocrnpyler_447061_k = 0.001;
  r0_pp_mibiocrnpyler_252167: protein_proton_pump_pp_txtlbiocrnpyler_447061_1_combined => protein_proton_pump_b_pp_mibiocrnpyler_252167; r0_pp_mibiocrnpyler_252167_k*protein_proton_pump_pp_txtlbiocrnpyler_447061_1_combined;
    r0_pp_mibiocrnpyler_252167_k = 0.0003;
  r1_protontransportbiocrnpyler_987223: 4 proton_inside_H_atpsynthesisbiocrnpyler_394224_1_combined => 4 proton_outside_H_atpsynthesisbiocrnpyler_394224_1_combined; r1_protontransportbiocrnpyler_987223_k*proton_inside_H_atpsynthesisbiocrnpyler_394224_1_combined^4;
    r1_protontransportbiocrnpyler_987223_k = 200;

  // Unit definitions:
  unit square_metre = metre^2;
end
