// SBML level 3 version 2

model combined_model_of__combined_model_of__external_reservoir_model_combined_model_of__atc_membrane_dnaexp_membrane_combined_model_of__biocrnpyler_335982()
  // model units - substance: mole, time: second, volume: litre, area: square_metre, length: metre, extent: mole

  // Compartments:
  compartment cell_2_internal_combined = 3e-6 litre;
  compartment cell_2_external_combined_1 = 0.0001 litre;

  // Species:
  species atc_e_external_reservoir_model_1_combined in cell_2_external_combined_1 = 10000/cell_2_external_combined_1;
  species ssDNA_e in cell_2_external_combined_1 = 0;
  species ssDNA in cell_2_internal_combined = 50/cell_2_internal_combined;
  species VirE2_b_ssDNA in cell_2_internal_combined = 0;
  species dna_g_biocrnpyler_335982 in cell_2_internal_combined = 1/cell_2_internal_combined;
  species tetR_biocrnpyler_335982 in cell_2_internal_combined = 10/cell_2_internal_combined;
  species rna_g_biocrnpyler_335982 in cell_2_internal_combined = 0;
  species VirE2_f_biocrnpyler_335982 in cell_2_internal_combined = 0;
  species ATP_biocrnpyler_335982 in cell_2_internal_combined = 10/cell_2_internal_combined;
  species ADP_biocrnpyler_335982 in cell_2_internal_combined = 0;
  species atc_i_1_combined in cell_2_internal_combined = 0;
  species complex_atc_i_tetR_biocrnpyler_335982 in cell_2_internal_combined = 0;
  species VirE2_b_1_combined in cell_2_internal_combined = 0;
  species complex_dna_g_tetR_biocrnpyler_335982 in cell_2_internal_combined = 0;
  species complex_atc_i_dna_g_tetR_biocrnpyler_335982 in cell_2_internal_combined = 0;
  species P_biocrnpyler_335982 in cell_2_internal_combined = 0;

  // Parameters:
  kb = 0.002 per_second;
  kd = 1e-5 per_second;
  kb1 = 0.002 per_second;
  kd1 = 1e-5 per_second;
  kd2 = 0.0002 per_second;

  // Reactions:
  r1: atc_e_external_reservoir_model_1_combined -> atc_i_1_combined; kb*atc_e_external_reservoir_model_1_combined - kd*atc_i_1_combined;
  R1: VirE2_b_1_combined + ssDNA -> VirE2_b_ssDNA; kb1*VirE2_b_1_combined*ssDNA - kd1*VirE2_b_ssDNA;
  R2: VirE2_b_ssDNA => ssDNA_e + VirE2_b_1_combined; kd2*VirE2_b_ssDNA;
  r0_biocrnpyler_335982: atc_i_1_combined + tetR_biocrnpyler_335982 => complex_atc_i_tetR_biocrnpyler_335982; r0_biocrnpyler_335982_k*atc_i_1_combined*tetR_biocrnpyler_335982;
    r0_biocrnpyler_335982_k = 0.0002;
  r0_1_biocrnpyler_335982: complex_atc_i_tetR_biocrnpyler_335982 => atc_i_1_combined + tetR_biocrnpyler_335982; r0_1_biocrnpyler_335982_k*complex_atc_i_tetR_biocrnpyler_335982;
    r0_1_biocrnpyler_335982_k = 2e-9;
  r2_biocrnpyler_335982: dna_g_biocrnpyler_335982 + tetR_biocrnpyler_335982 => complex_dna_g_tetR_biocrnpyler_335982; r2_biocrnpyler_335982_k*dna_g_biocrnpyler_335982*tetR_biocrnpyler_335982;
    r2_biocrnpyler_335982_k = 4e-5;
  r2_1_biocrnpyler_335982: complex_dna_g_tetR_biocrnpyler_335982 => dna_g_biocrnpyler_335982 + tetR_biocrnpyler_335982; r2_1_biocrnpyler_335982_k*complex_dna_g_tetR_biocrnpyler_335982;
    r2_1_biocrnpyler_335982_k = 1e-12;
  r4_biocrnpyler_335982: complex_dna_g_tetR_biocrnpyler_335982 + atc_i_1_combined => complex_atc_i_dna_g_tetR_biocrnpyler_335982; r4_biocrnpyler_335982_k*complex_dna_g_tetR_biocrnpyler_335982*atc_i_1_combined;
    r4_biocrnpyler_335982_k = 6e-6;
  r4_1_biocrnpyler_335982: complex_atc_i_dna_g_tetR_biocrnpyler_335982 => complex_dna_g_tetR_biocrnpyler_335982 + atc_i_1_combined; r4_1_biocrnpyler_335982_k*complex_atc_i_dna_g_tetR_biocrnpyler_335982;
    r4_1_biocrnpyler_335982_k = 3e-9;
  r6_biocrnpyler_335982: complex_atc_i_dna_g_tetR_biocrnpyler_335982 => dna_g_biocrnpyler_335982 + complex_atc_i_tetR_biocrnpyler_335982; r6_biocrnpyler_335982_k*complex_atc_i_dna_g_tetR_biocrnpyler_335982;
    r6_biocrnpyler_335982_k = 0.005;
  r6_1_biocrnpyler_335982: dna_g_biocrnpyler_335982 + complex_atc_i_tetR_biocrnpyler_335982 => complex_atc_i_dna_g_tetR_biocrnpyler_335982; r6_1_biocrnpyler_335982_k*dna_g_biocrnpyler_335982*complex_atc_i_tetR_biocrnpyler_335982;
    r6_1_biocrnpyler_335982_k = 1e-10;
  r8_biocrnpyler_335982: dna_g_biocrnpyler_335982 => dna_g_biocrnpyler_335982 + rna_g_biocrnpyler_335982; r8_biocrnpyler_335982_k*dna_g_biocrnpyler_335982;
    r8_biocrnpyler_335982_k = 0.0031875;
  r9_biocrnpyler_335982: rna_g_biocrnpyler_335982 + ATP_biocrnpyler_335982 => rna_g_biocrnpyler_335982 + ADP_biocrnpyler_335982 + VirE2_f_biocrnpyler_335982 + P_biocrnpyler_335982; r9_biocrnpyler_335982_k*rna_g_biocrnpyler_335982*ATP_biocrnpyler_335982^r9_biocrnpyler_335982_n/(ATP_biocrnpyler_335982^r9_biocrnpyler_335982_n + r9_biocrnpyler_335982_K);
    r9_biocrnpyler_335982_k = 0.001; r9_biocrnpyler_335982_n = 1; r9_biocrnpyler_335982_K = 1;
  r10_biocrnpyler_335982: VirE2_f_biocrnpyler_335982 => VirE2_b_1_combined; r10_biocrnpyler_335982_k*VirE2_f_biocrnpyler_335982/(VirE2_b_1_combined^r10_biocrnpyler_335982_n + r10_biocrnpyler_335982_K);
    r10_biocrnpyler_335982_k = 0.0005; r10_biocrnpyler_335982_n = 1; r10_biocrnpyler_335982_K = 1;
  r11_biocrnpyler_335982: rna_g_biocrnpyler_335982 => ; r11_biocrnpyler_335982_k*rna_g_biocrnpyler_335982;
    r11_biocrnpyler_335982_k = 0.001;
  r12_biocrnpyler_335982: VirE2_f_biocrnpyler_335982 => ; r12_biocrnpyler_335982_k*VirE2_f_biocrnpyler_335982;
    r12_biocrnpyler_335982_k = 1e-5;

  // Unit definitions:
  unit square_metre = metre^2;
  unit per_second = 1 / second;
  unit substance = dimensionless;
end
