// SBML level 3 version 2

model biocrnpyler_610971()
  // model units - substance: mole, time: second, volume: litre, area: square_metre, length: metre, extent: mole

  // Compartments:
  compartment default = 1e-6;

  // Species:
  species rna_atpsyn in default = 0;
  species dna_atpsyn in default = 0;
  species protein_atpsyn in default = 0;
  species protein_RNAP_machinery in default = 0;
  species protein_Ribo_machinery in default = 0;
  species protein_RNAse_machinery in default = 0;
  species complex_dna_atpsyn_protein_RNAP_machinery in default = 0;
  species complex_protein_Ribo_machinery_rna_atpsyn in default = 0;
  species complex_protein_RNAse_machinery_rna_atpsyn in default = 0;
  species protein_atpsyn_b in default = 0;
  species proton_outside_H in default = 0;
  species proton_inside_H in default = 0;
  species metabolite_adp in default = 0;
  species metabolite_atp in default = 0;
  species metabolite_pi in default = 0;
  species rna_proton_pump in default = 0;
  species dna_proton_pump in default = 0;
  species protein_proton_pump in default = 0;
  species protein_proton_pump_b in default = 0;
  species complex_dna_proton_pump_protein_RNAP_machinery in default = 0;
  species complex_protein_Ribo_machinery_rna_proton_pump in default = 0;
  species complex_protein_RNAse_machinery_rna_proton_pump in default = 0;

  // Reactions:
  r0: dna_atpsyn + protein_RNAP_machinery => complex_dna_atpsyn_protein_RNAP_machinery; r0_k*dna_atpsyn*protein_RNAP_machinery;
    r0_k = 100;
  r1: complex_dna_atpsyn_protein_RNAP_machinery => rna_atpsyn + protein_RNAP_machinery; r1_k*complex_dna_atpsyn_protein_RNAP_machinery;
    r1_k = 0.05;
  r2: rna_atpsyn + protein_Ribo_machinery => complex_protein_Ribo_machinery_rna_atpsyn; r2_k*rna_atpsyn*protein_Ribo_machinery;
    r2_k = 100;
  r3: complex_protein_Ribo_machinery_rna_atpsyn => rna_atpsyn + protein_atpsyn + protein_Ribo_machinery; r3_k*complex_protein_Ribo_machinery_rna_atpsyn;
    r3_k = 0.05;
  r4: rna_atpsyn + protein_RNAse_machinery => complex_protein_RNAse_machinery_rna_atpsyn; r4_k*rna_atpsyn*protein_RNAse_machinery;
    r4_k = 100;
  r5: complex_protein_RNAse_machinery_rna_atpsyn => protein_RNAse_machinery; r5_k*complex_protein_RNAse_machinery_rna_atpsyn;
    r5_k = 0.001;
  r6: protein_atpsyn => protein_atpsyn_b; r6_k*protein_atpsyn;
    r6_k = 0.0003;
  r7: 4 proton_outside_H + metabolite_adp + metabolite_pi + protein_atpsyn_b => 4 proton_inside_H + metabolite_atp + protein_atpsyn_b; r7_k*proton_outside_H^4*metabolite_adp*metabolite_pi*protein_atpsyn_b;
    r7_k = 100;
  r8: dna_proton_pump + protein_RNAP_machinery => complex_dna_proton_pump_protein_RNAP_machinery; r8_k*dna_proton_pump*protein_RNAP_machinery;
    r8_k = 100;
  r9: complex_dna_proton_pump_protein_RNAP_machinery => rna_proton_pump + protein_RNAP_machinery; r9_k*complex_dna_proton_pump_protein_RNAP_machinery;
    r9_k = 0.05;
  r10: rna_proton_pump + protein_Ribo_machinery => complex_protein_Ribo_machinery_rna_proton_pump; r10_k*rna_proton_pump*protein_Ribo_machinery;
    r10_k = 100;
  r11: complex_protein_Ribo_machinery_rna_proton_pump => rna_proton_pump + protein_proton_pump + protein_Ribo_machinery; r11_k*complex_protein_Ribo_machinery_rna_proton_pump;
    r11_k = 0.05;
  r12: rna_proton_pump + protein_RNAse_machinery => complex_protein_RNAse_machinery_rna_proton_pump; r12_k*rna_proton_pump*protein_RNAse_machinery;
    r12_k = 100;
  r13: complex_protein_RNAse_machinery_rna_proton_pump => protein_RNAse_machinery; r13_k*complex_protein_RNAse_machinery_rna_proton_pump;
    r13_k = 0.001;
  r14: protein_proton_pump => protein_proton_pump_b; r14_k*protein_proton_pump;
    r14_k = 0.0003;
  r15: metabolite_adp + metabolite_pi => metabolite_atp; r15_k*metabolite_adp*metabolite_pi;
    r15_k = 0.2;
  r16: 4 proton_inside_H => 4 proton_outside_H; r16_k*proton_inside_H^4;
    r16_k = 100;

  // Unit definitions:
  unit square_metre = metre^2;
end
