// SBML level 3 version 2

model biocrnpyler_634411()
  // model units - substance: mole, time: second, volume: litre, area: square_metre, length: metre, extent: mole

  // Compartments:
  compartment default = 1e-6;

  // Species:
  species proton_outside_H in default = 0;
  species proton_inside_H in default = 0;
  species protein_atpsyn_b in default = 0;
  species metabolite_adp in default = 0;
  species metabolite_atp in default = 0;
  species metabolite_pi in default = 0;

  // Reactions:
  r0: metabolite_adp + metabolite_pi + protein_atpsyn_b => metabolite_atp + protein_atpsyn_b; r0_k*metabolite_adp*metabolite_pi*protein_atpsyn_b;
    r0_k = 2;
  r1: 4 proton_outside_H => 4 proton_inside_H; r1_k*proton_outside_H^4;
    r1_k = 2;

  // Unit definitions:
  unit square_metre = metre^2;
end
