// SBML level 3 version 2

model biocrnpyler_869857()
  // model units - substance: mole, time: second, volume: litre, area: square_metre, length: metre, extent: mole

  // Compartments:
  compartment default = 1e-6;

  // Species:
  species proton_outside_H in default = 0;
  species proton_inside_H in default = 0;
  species protein_atpsyn_b in default = 0;
  species metabolite_adp in default = 0;
  species metabolite_atp in default = 0;
  species metabolite_pi in default = 0;

  // Reactions:
  r0: 4 proton_outside_H + protein_atpsyn_b => 4 proton_inside_H + protein_atpsyn_b; r0_k*proton_outside_H^4*protein_atpsyn_b;
    r0_k = 100;
  r1: metabolite_adp + metabolite_pi => metabolite_atp; r1_k*metabolite_adp*metabolite_pi;
    r1_k = 100;
  r2: 4 proton_inside_H + protein_atpsyn_b => 4 proton_outside_H + protein_atpsyn_b; r2_k*proton_inside_H^4*protein_atpsyn_b;
    r2_k = 100;

  // Unit definitions:
  unit square_metre = metre^2;
end
