// SBML level 3 version 2

model combined_model_of__combined_model_of__biocrnpyler_364059_biocrnpyler_203770_biocrnpyler_621952()
  // model units - substance: mole, time: second, volume: litre, area: square_metre, length: metre, extent: mole

  // Compartments:
  compartment default_atpsyn_txtlbiocrnpyler_364059_combined_combined = 3e-6;
  compartment default_atpsynthesisbiocrnpyler_621952 = 1e-6;

  // Species:
  species protein_Ribo_machinery_atpsyn_txtlbiocrnpyler_364059 in default_atpsyn_txtlbiocrnpyler_364059_combined_combined = 10/default_atpsyn_txtlbiocrnpyler_364059_combined_combined;
  species rna_atpsyn_atpsyn_txtlbiocrnpyler_364059 in default_atpsyn_txtlbiocrnpyler_364059_combined_combined = 0;
  species protein_RNAase_machinery_atpsyn_txtlbiocrnpyler_364059 in default_atpsyn_txtlbiocrnpyler_364059_combined_combined = 10/default_atpsyn_txtlbiocrnpyler_364059_combined_combined;
  species dna_atpsyn_atpsyn_txtlbiocrnpyler_364059 in default_atpsyn_txtlbiocrnpyler_364059_combined_combined = 10/default_atpsyn_txtlbiocrnpyler_364059_combined_combined;
  species complex_protein_Ribo_rna_atpsyn_machinery_atpsyn_txtlbiocrnpyler_364059 in default_atpsyn_txtlbiocrnpyler_364059_combined_combined = 0;
  species protein_RNAP_machinery_atpsyn_txtlbiocrnpyler_364059 in default_atpsyn_txtlbiocrnpyler_364059_combined_combined = 10/default_atpsyn_txtlbiocrnpyler_364059_combined_combined;
  species complex_protein_RNAase_rna_atpsyn_machinery_atpsyn_txtlbiocrnpyler_364059 in default_atpsyn_txtlbiocrnpyler_364059_combined_combined = 0;
  species complex_dna_atpsyn_protein_RNAP_machinery_atpsyn_txtlbiocrnpyler_364059 in default_atpsyn_txtlbiocrnpyler_364059_combined_combined = 0;
  species rna_cellular_processes_atpsyn_txtlbiocrnpyler_364059 in default_atpsyn_txtlbiocrnpyler_364059_combined_combined = 0;
  species complex_dna_cellular_processes_protein_RNAP_machinery_atpsyn_txtlbiocrnpyler_364059 in default_atpsyn_txtlbiocrnpyler_364059_combined_combined = 0;
  species dna_cellular_processes_atpsyn_txtlbiocrnpyler_364059 in default_atpsyn_txtlbiocrnpyler_364059_combined_combined = 0;
  species complex_protein_RNAase_rna_cellular_processes_machinery_atpsyn_txtlbiocrnpyler_364059 in default_atpsyn_txtlbiocrnpyler_364059_combined_combined = 0;
  species complex_protein_Ribo_rna_cellular_processes_machinery_atpsyn_txtlbiocrnpyler_364059 in default_atpsyn_txtlbiocrnpyler_364059_combined_combined = 0;
  species protein_cellular_processes_atpsyn_txtlbiocrnpyler_364059 in default_atpsyn_txtlbiocrnpyler_364059_combined_combined = 0;
  species protein_atpsyn_atpsyn_txtlbiocrnpyler_364059_1_combined in default_atpsyn_txtlbiocrnpyler_364059_combined_combined = 0;
  species protein_atpsyn_b_atpsyn_mibiocrnpyler_203770 in default_atpsyn_txtlbiocrnpyler_364059_combined_combined = 0;
  species proton_outside_H_atpsynthesisbiocrnpyler_621952 in default_atpsynthesisbiocrnpyler_621952 = 10/default_atpsynthesisbiocrnpyler_621952;
  species proton_inside_H_atpsynthesisbiocrnpyler_621952 in default_atpsynthesisbiocrnpyler_621952 = 0;
  species metabolite_adp_atpsynthesisbiocrnpyler_621952 in default_atpsynthesisbiocrnpyler_621952 = 0;
  species metabolite_atp_atpsynthesisbiocrnpyler_621952 in default_atpsynthesisbiocrnpyler_621952 = 10/default_atpsynthesisbiocrnpyler_621952;
  species metabolite_pi_atpsynthesisbiocrnpyler_621952 in default_atpsynthesisbiocrnpyler_621952 = 0;

  // Reactions:
  r0_atpsyn_txtlbiocrnpyler_364059: dna_atpsyn_atpsyn_txtlbiocrnpyler_364059 + protein_RNAP_machinery_atpsyn_txtlbiocrnpyler_364059 => complex_dna_atpsyn_protein_RNAP_machinery_atpsyn_txtlbiocrnpyler_364059; r0_atpsyn_txtlbiocrnpyler_364059_k*dna_atpsyn_atpsyn_txtlbiocrnpyler_364059*protein_RNAP_machinery_atpsyn_txtlbiocrnpyler_364059;
    r0_atpsyn_txtlbiocrnpyler_364059_k = 100;
  r0_1_atpsyn_txtlbiocrnpyler_364059: complex_dna_atpsyn_protein_RNAP_machinery_atpsyn_txtlbiocrnpyler_364059 => dna_atpsyn_atpsyn_txtlbiocrnpyler_364059 + protein_RNAP_machinery_atpsyn_txtlbiocrnpyler_364059; r0_1_atpsyn_txtlbiocrnpyler_364059_k*complex_dna_atpsyn_protein_RNAP_machinery_atpsyn_txtlbiocrnpyler_364059;
    r0_1_atpsyn_txtlbiocrnpyler_364059_k = 10;
  r2_atpsyn_txtlbiocrnpyler_364059: complex_dna_atpsyn_protein_RNAP_machinery_atpsyn_txtlbiocrnpyler_364059 => dna_atpsyn_atpsyn_txtlbiocrnpyler_364059 + rna_atpsyn_atpsyn_txtlbiocrnpyler_364059 + protein_RNAP_machinery_atpsyn_txtlbiocrnpyler_364059; r2_atpsyn_txtlbiocrnpyler_364059_k*complex_dna_atpsyn_protein_RNAP_machinery_atpsyn_txtlbiocrnpyler_364059;
    r2_atpsyn_txtlbiocrnpyler_364059_k = 0.05;
  r3_atpsyn_txtlbiocrnpyler_364059: rna_atpsyn_atpsyn_txtlbiocrnpyler_364059 + protein_Ribo_machinery_atpsyn_txtlbiocrnpyler_364059 => complex_protein_Ribo_rna_atpsyn_machinery_atpsyn_txtlbiocrnpyler_364059; r3_atpsyn_txtlbiocrnpyler_364059_k*rna_atpsyn_atpsyn_txtlbiocrnpyler_364059*protein_Ribo_machinery_atpsyn_txtlbiocrnpyler_364059;
    r3_atpsyn_txtlbiocrnpyler_364059_k = 100;
  r3_1_atpsyn_txtlbiocrnpyler_364059: complex_protein_Ribo_rna_atpsyn_machinery_atpsyn_txtlbiocrnpyler_364059 => rna_atpsyn_atpsyn_txtlbiocrnpyler_364059 + protein_Ribo_machinery_atpsyn_txtlbiocrnpyler_364059; r3_1_atpsyn_txtlbiocrnpyler_364059_k*complex_protein_Ribo_rna_atpsyn_machinery_atpsyn_txtlbiocrnpyler_364059;
    r3_1_atpsyn_txtlbiocrnpyler_364059_k = 10;
  r5_atpsyn_txtlbiocrnpyler_364059: complex_protein_Ribo_rna_atpsyn_machinery_atpsyn_txtlbiocrnpyler_364059 => rna_atpsyn_atpsyn_txtlbiocrnpyler_364059 + protein_atpsyn_atpsyn_txtlbiocrnpyler_364059_1_combined + protein_Ribo_machinery_atpsyn_txtlbiocrnpyler_364059; r5_atpsyn_txtlbiocrnpyler_364059_k*complex_protein_Ribo_rna_atpsyn_machinery_atpsyn_txtlbiocrnpyler_364059;
    r5_atpsyn_txtlbiocrnpyler_364059_k = 0.05;
  r6_atpsyn_txtlbiocrnpyler_364059: rna_atpsyn_atpsyn_txtlbiocrnpyler_364059 + protein_RNAase_machinery_atpsyn_txtlbiocrnpyler_364059 => complex_protein_RNAase_rna_atpsyn_machinery_atpsyn_txtlbiocrnpyler_364059; r6_atpsyn_txtlbiocrnpyler_364059_k*rna_atpsyn_atpsyn_txtlbiocrnpyler_364059*protein_RNAase_machinery_atpsyn_txtlbiocrnpyler_364059;
    r6_atpsyn_txtlbiocrnpyler_364059_k = 100;
  r6_1_atpsyn_txtlbiocrnpyler_364059: complex_protein_RNAase_rna_atpsyn_machinery_atpsyn_txtlbiocrnpyler_364059 => rna_atpsyn_atpsyn_txtlbiocrnpyler_364059 + protein_RNAase_machinery_atpsyn_txtlbiocrnpyler_364059; r6_1_atpsyn_txtlbiocrnpyler_364059_k*complex_protein_RNAase_rna_atpsyn_machinery_atpsyn_txtlbiocrnpyler_364059;
    r6_1_atpsyn_txtlbiocrnpyler_364059_k = 10;
  r8_atpsyn_txtlbiocrnpyler_364059: complex_protein_RNAase_rna_atpsyn_machinery_atpsyn_txtlbiocrnpyler_364059 => protein_RNAase_machinery_atpsyn_txtlbiocrnpyler_364059; r8_atpsyn_txtlbiocrnpyler_364059_k*complex_protein_RNAase_rna_atpsyn_machinery_atpsyn_txtlbiocrnpyler_364059;
    r8_atpsyn_txtlbiocrnpyler_364059_k = 0.001;
  r9_atpsyn_txtlbiocrnpyler_364059: dna_cellular_processes_atpsyn_txtlbiocrnpyler_364059 + protein_RNAP_machinery_atpsyn_txtlbiocrnpyler_364059 => complex_dna_cellular_processes_protein_RNAP_machinery_atpsyn_txtlbiocrnpyler_364059; r9_atpsyn_txtlbiocrnpyler_364059_k*dna_cellular_processes_atpsyn_txtlbiocrnpyler_364059*protein_RNAP_machinery_atpsyn_txtlbiocrnpyler_364059;
    r9_atpsyn_txtlbiocrnpyler_364059_k = 500;
  r9_1_atpsyn_txtlbiocrnpyler_364059: complex_dna_cellular_processes_protein_RNAP_machinery_atpsyn_txtlbiocrnpyler_364059 => dna_cellular_processes_atpsyn_txtlbiocrnpyler_364059 + protein_RNAP_machinery_atpsyn_txtlbiocrnpyler_364059; r9_1_atpsyn_txtlbiocrnpyler_364059_k*complex_dna_cellular_processes_protein_RNAP_machinery_atpsyn_txtlbiocrnpyler_364059;
    r9_1_atpsyn_txtlbiocrnpyler_364059_k = 50;
  r11_atpsyn_txtlbiocrnpyler_364059: complex_dna_cellular_processes_protein_RNAP_machinery_atpsyn_txtlbiocrnpyler_364059 => dna_cellular_processes_atpsyn_txtlbiocrnpyler_364059 + rna_cellular_processes_atpsyn_txtlbiocrnpyler_364059 + protein_RNAP_machinery_atpsyn_txtlbiocrnpyler_364059; r11_atpsyn_txtlbiocrnpyler_364059_k*complex_dna_cellular_processes_protein_RNAP_machinery_atpsyn_txtlbiocrnpyler_364059;
    r11_atpsyn_txtlbiocrnpyler_364059_k = 0.1;
  r12_atpsyn_txtlbiocrnpyler_364059: rna_cellular_processes_atpsyn_txtlbiocrnpyler_364059 + protein_Ribo_machinery_atpsyn_txtlbiocrnpyler_364059 => complex_protein_Ribo_rna_cellular_processes_machinery_atpsyn_txtlbiocrnpyler_364059; r12_atpsyn_txtlbiocrnpyler_364059_k*rna_cellular_processes_atpsyn_txtlbiocrnpyler_364059*protein_Ribo_machinery_atpsyn_txtlbiocrnpyler_364059;
    r12_atpsyn_txtlbiocrnpyler_364059_k = 500;
  r12_1_atpsyn_txtlbiocrnpyler_364059: complex_protein_Ribo_rna_cellular_processes_machinery_atpsyn_txtlbiocrnpyler_364059 => rna_cellular_processes_atpsyn_txtlbiocrnpyler_364059 + protein_Ribo_machinery_atpsyn_txtlbiocrnpyler_364059; r12_1_atpsyn_txtlbiocrnpyler_364059_k*complex_protein_Ribo_rna_cellular_processes_machinery_atpsyn_txtlbiocrnpyler_364059;
    r12_1_atpsyn_txtlbiocrnpyler_364059_k = 5;
  r14_atpsyn_txtlbiocrnpyler_364059: complex_protein_Ribo_rna_cellular_processes_machinery_atpsyn_txtlbiocrnpyler_364059 => rna_cellular_processes_atpsyn_txtlbiocrnpyler_364059 + protein_cellular_processes_atpsyn_txtlbiocrnpyler_364059 + protein_Ribo_machinery_atpsyn_txtlbiocrnpyler_364059; r14_atpsyn_txtlbiocrnpyler_364059_k*complex_protein_Ribo_rna_cellular_processes_machinery_atpsyn_txtlbiocrnpyler_364059;
    r14_atpsyn_txtlbiocrnpyler_364059_k = 0.1;
  r15_atpsyn_txtlbiocrnpyler_364059: rna_cellular_processes_atpsyn_txtlbiocrnpyler_364059 + protein_RNAase_machinery_atpsyn_txtlbiocrnpyler_364059 => complex_protein_RNAase_rna_cellular_processes_machinery_atpsyn_txtlbiocrnpyler_364059; r15_atpsyn_txtlbiocrnpyler_364059_k*rna_cellular_processes_atpsyn_txtlbiocrnpyler_364059*protein_RNAase_machinery_atpsyn_txtlbiocrnpyler_364059;
    r15_atpsyn_txtlbiocrnpyler_364059_k = 500;
  r15_1_atpsyn_txtlbiocrnpyler_364059: complex_protein_RNAase_rna_cellular_processes_machinery_atpsyn_txtlbiocrnpyler_364059 => rna_cellular_processes_atpsyn_txtlbiocrnpyler_364059 + protein_RNAase_machinery_atpsyn_txtlbiocrnpyler_364059; r15_1_atpsyn_txtlbiocrnpyler_364059_k*complex_protein_RNAase_rna_cellular_processes_machinery_atpsyn_txtlbiocrnpyler_364059;
    r15_1_atpsyn_txtlbiocrnpyler_364059_k = 50;
  r17_atpsyn_txtlbiocrnpyler_364059: complex_protein_RNAase_rna_cellular_processes_machinery_atpsyn_txtlbiocrnpyler_364059 => protein_RNAase_machinery_atpsyn_txtlbiocrnpyler_364059; r17_atpsyn_txtlbiocrnpyler_364059_k*complex_protein_RNAase_rna_cellular_processes_machinery_atpsyn_txtlbiocrnpyler_364059;
    r17_atpsyn_txtlbiocrnpyler_364059_k = 0.001;
  r18_atpsyn_txtlbiocrnpyler_364059: rna_atpsyn_atpsyn_txtlbiocrnpyler_364059 => ; r18_atpsyn_txtlbiocrnpyler_364059_k*rna_atpsyn_atpsyn_txtlbiocrnpyler_364059;
    r18_atpsyn_txtlbiocrnpyler_364059_k = 0.001;
  r19_atpsyn_txtlbiocrnpyler_364059: protein_atpsyn_atpsyn_txtlbiocrnpyler_364059_1_combined => ; r19_atpsyn_txtlbiocrnpyler_364059_k*protein_atpsyn_atpsyn_txtlbiocrnpyler_364059_1_combined;
    r19_atpsyn_txtlbiocrnpyler_364059_k = 0.001;
  r20_atpsyn_txtlbiocrnpyler_364059: rna_cellular_processes_atpsyn_txtlbiocrnpyler_364059 => ; r20_atpsyn_txtlbiocrnpyler_364059_k*rna_cellular_processes_atpsyn_txtlbiocrnpyler_364059;
    r20_atpsyn_txtlbiocrnpyler_364059_k = 0.001;
  r21_atpsyn_txtlbiocrnpyler_364059: protein_cellular_processes_atpsyn_txtlbiocrnpyler_364059 => ; r21_atpsyn_txtlbiocrnpyler_364059_k*protein_cellular_processes_atpsyn_txtlbiocrnpyler_364059;
    r21_atpsyn_txtlbiocrnpyler_364059_k = 0.001;
  r0_atpsyn_mibiocrnpyler_203770: protein_atpsyn_atpsyn_txtlbiocrnpyler_364059_1_combined => protein_atpsyn_b_atpsyn_mibiocrnpyler_203770; r0_atpsyn_mibiocrnpyler_203770_k*protein_atpsyn_atpsyn_txtlbiocrnpyler_364059_1_combined;
    r0_atpsyn_mibiocrnpyler_203770_k = 1;
  r0_atpsynthesisbiocrnpyler_621952: metabolite_adp_atpsynthesisbiocrnpyler_621952 + metabolite_pi_atpsynthesisbiocrnpyler_621952 => metabolite_atp_atpsynthesisbiocrnpyler_621952; r0_atpsynthesisbiocrnpyler_621952_k*metabolite_adp_atpsynthesisbiocrnpyler_621952*metabolite_pi_atpsynthesisbiocrnpyler_621952;
    r0_atpsynthesisbiocrnpyler_621952_k = 2;
  r1_atpsynthesisbiocrnpyler_621952: 4 proton_outside_H_atpsynthesisbiocrnpyler_621952 => 4 proton_inside_H_atpsynthesisbiocrnpyler_621952; r1_atpsynthesisbiocrnpyler_621952_k*proton_outside_H_atpsynthesisbiocrnpyler_621952^4;
    r1_atpsynthesisbiocrnpyler_621952_k = 2;

  // Unit definitions:
  unit square_metre = metre^2;
end
