// SBML level 3 version 2

model biocrnpyler_867601()
  // model units - substance: mole, time: second, volume: litre, area: square_metre, length: metre, extent: mole

  // Compartments:
  compartment default = 1e-6;

  // Species:
  species dna_X in default = 0;
  species protein_RNAP in default = 0;
  species opencomplex in default = 0;
  species complex_dna_X_protein_RNAP_ in default = 0;
  species rna_X in default = 0;
  species dna_Y in default = 0;
  species complex_dna_Y_protein_RNAP_ in default = 0;
  species rna_Y in default = 0;
  species X_opencomplex in default = 0;
  species Y_opencomplex in default = 0;

  // Parameters:
  k1__ = 0.01;
  k2__ = 0.66;
  k3__ = 100000;

  // Reactions:
  r0: dna_X + protein_RNAP => complex_dna_X_protein_RNAP_; k1__*dna_X*protein_RNAP;
  r1: complex_dna_X_protein_RNAP_ => X_opencomplex; k2__*complex_dna_X_protein_RNAP_;
  r2: X_opencomplex => dna_X + protein_RNAP + rna_X; k3__*X_opencomplex;
  r3: dna_Y + protein_RNAP => complex_dna_Y_protein_RNAP_; k1__*dna_Y*protein_RNAP;
  r4: complex_dna_Y_protein_RNAP_ => Y_opencomplex; k2__*complex_dna_Y_protein_RNAP_;
  r5: Y_opencomplex => dna_Y + protein_RNAP + rna_Y; k3__*Y_opencomplex;

  // Unit definitions:
  unit square_metre = metre^2;
end
