// SBML level 3 version 2

model combined_model_of__biocrnpyler_385100_biocrnpyler_66442()
  // model units - substance: mole, time: second, volume: litre, area: square_metre, length: metre, extent: mole

  // Compartments:
  compartment default_vire2biocrnpyler_385100_combined = 2e-6;

  // Species:
  species dna_g_vire2biocrnpyler_385100 in default_vire2biocrnpyler_385100_combined = 1/default_vire2biocrnpyler_385100_combined;
  species tetR_vire2biocrnpyler_385100 in default_vire2biocrnpyler_385100_combined = 10/default_vire2biocrnpyler_385100_combined;
  species rna_g_vire2biocrnpyler_385100 in default_vire2biocrnpyler_385100_combined = 0;
  species VirE2_f_vire2biocrnpyler_385100 in default_vire2biocrnpyler_385100_combined = 0;
  species aTc_i_vire2biocrnpyler_385100 in default_vire2biocrnpyler_385100_combined = 15/default_vire2biocrnpyler_385100_combined;
  species complex_aTc_i_tetR_vire2biocrnpyler_385100 in default_vire2biocrnpyler_385100_combined = 0;
  species VirE2_b_vire2biocrnpyler_385100 in default_vire2biocrnpyler_385100_combined = 0;
  species complex_dna_g_tetR_vire2biocrnpyler_385100 in default_vire2biocrnpyler_385100_combined = 0;
  species complex_aTc_i_dna_g_tetR_vire2biocrnpyler_385100 in default_vire2biocrnpyler_385100_combined = 0;
  species enzyme_hex_rheostatbiocrnpyler_66442 in default_vire2biocrnpyler_385100_combined = 0.2/default_vire2biocrnpyler_385100_combined;
  species ATP_vire2biocrnpyler_385100_1_combined in default_vire2biocrnpyler_385100_combined = 30/default_vire2biocrnpyler_385100_combined; ATP_vire2biocrnpyler_385100_1_combined is "metabolite_atp";
  species molecule_glucose_rheostatbiocrnpyler_66442 in default_vire2biocrnpyler_385100_combined = 30/default_vire2biocrnpyler_385100_combined;
  species molecule_g6p_rheostatbiocrnpyler_66442 in default_vire2biocrnpyler_385100_combined = 0;
  species ADP_vire2biocrnpyler_385100_1_combined in default_vire2biocrnpyler_385100_combined = 0; ADP_vire2biocrnpyler_385100_1_combined is "metabolite_adp";
  species complex_enzyme_hex_metabolite_atp_molecule_glucose_rheostatbiocrnpyler_66442 in default_vire2biocrnpyler_385100_combined = 0;
  species complex_enzyme_hex_metabolite_adp_molecule_g6p_rheostatbiocrnpyler_66442 in default_vire2biocrnpyler_385100_combined = 0;
  species enzyme_pgi_rheostatbiocrnpyler_66442 in default_vire2biocrnpyler_385100_combined = 0.2/default_vire2biocrnpyler_385100_combined;
  species molecule_f6p_rheostatbiocrnpyler_66442 in default_vire2biocrnpyler_385100_combined = 0;
  species complex_enzyme_pgi_molecule_g6p_rheostatbiocrnpyler_66442 in default_vire2biocrnpyler_385100_combined = 0;
  species complex_enzyme_pgi_molecule_f6p_rheostatbiocrnpyler_66442 in default_vire2biocrnpyler_385100_combined = 0;
  species enzyme_pfk_rheostatbiocrnpyler_66442 in default_vire2biocrnpyler_385100_combined = 0.2/default_vire2biocrnpyler_385100_combined;
  species molecule_f16p_rheostatbiocrnpyler_66442 in default_vire2biocrnpyler_385100_combined = 0;
  species complex_enzyme_pfk_metabolite_atp_molecule_f6p_rheostatbiocrnpyler_66442 in default_vire2biocrnpyler_385100_combined = 0;
  species complex_enzyme_pfk_metabolite_adp_molecule_f16p_rheostatbiocrnpyler_66442 in default_vire2biocrnpyler_385100_combined = 0;
  species enzyme_ald_tpi_rheostatbiocrnpyler_66442 in default_vire2biocrnpyler_385100_combined = 0.2/default_vire2biocrnpyler_385100_combined;
  species molecule_g3p_rheostatbiocrnpyler_66442 in default_vire2biocrnpyler_385100_combined = 0;
  species complex_enzyme_ald_tpi_molecule_f16p_rheostatbiocrnpyler_66442 in default_vire2biocrnpyler_385100_combined = 0;
  species complex_enzyme_ald_tpi_2x_molecule_g3p_rheostatbiocrnpyler_66442 in default_vire2biocrnpyler_385100_combined = 0;
  species enzyme_gapN_rheostatbiocrnpyler_66442 in default_vire2biocrnpyler_385100_combined = 0.2/default_vire2biocrnpyler_385100_combined;
  species metabolite_nadp_rheostatbiocrnpyler_66442 in default_vire2biocrnpyler_385100_combined = 30/default_vire2biocrnpyler_385100_combined;
  species molecule_3pg_rheostatbiocrnpyler_66442 in default_vire2biocrnpyler_385100_combined = 0;
  species metabolite_nadph_rheostatbiocrnpyler_66442 in default_vire2biocrnpyler_385100_combined = 0;
  species complex_enzyme_gapN_2x_metabolite_nadp_2x_molecule_g3p_rheostatbiocrnpyler_66442 in default_vire2biocrnpyler_385100_combined = 0;
  species complex_enzyme_gapN_2x_metabolite_nadph_2x_molecule_3pg_rheostatbiocrnpyler_66442 in default_vire2biocrnpyler_385100_combined = 0;
  species enzyme_mGapDH_rheostatbiocrnpyler_66442 in default_vire2biocrnpyler_385100_combined = 0.2/default_vire2biocrnpyler_385100_combined;
  species P_vire2biocrnpyler_385100_1_combined in default_vire2biocrnpyler_385100_combined = 30/default_vire2biocrnpyler_385100_combined; P_vire2biocrnpyler_385100_1_combined is "metabolite_pi";
  species molecule_13bpg_rheostatbiocrnpyler_66442 in default_vire2biocrnpyler_385100_combined = 0;
  species complex_enzyme_mGapDH_2x_metabolite_nadp_metabolite_pi_2x_molecule_g3p_rheostatbiocrnpyler_66442 in default_vire2biocrnpyler_385100_combined = 0;
  species complex_enzyme_mGapDH_2x_metabolite_nadph_molecule_13bpg_rheostatbiocrnpyler_66442 in default_vire2biocrnpyler_385100_combined = 0;
  species enzyme_pgk_rheostatbiocrnpyler_66442 in default_vire2biocrnpyler_385100_combined = 0.2/default_vire2biocrnpyler_385100_combined;
  species complex_enzyme_pgk_metabolite_adp_molecule_13bpg_rheostatbiocrnpyler_66442 in default_vire2biocrnpyler_385100_combined = 0;
  species complex_enzyme_pgk_metabolite_atp_2x_molecule_3pg_rheostatbiocrnpyler_66442 in default_vire2biocrnpyler_385100_combined = 0;
  species enzyme_pgm_rheostatbiocrnpyler_66442 in default_vire2biocrnpyler_385100_combined = 0.2/default_vire2biocrnpyler_385100_combined;
  species molecule_2pg_rheostatbiocrnpyler_66442 in default_vire2biocrnpyler_385100_combined = 0;
  species complex_enzyme_pgm_2x_molecule_3pg_rheostatbiocrnpyler_66442 in default_vire2biocrnpyler_385100_combined = 0;
  species complex_enzyme_pgm_2x_molecule_2pg_rheostatbiocrnpyler_66442 in default_vire2biocrnpyler_385100_combined = 0;
  species enzyme_eno_rheostatbiocrnpyler_66442 in default_vire2biocrnpyler_385100_combined = 0.2/default_vire2biocrnpyler_385100_combined;
  species molecule_pep_rheostatbiocrnpyler_66442 in default_vire2biocrnpyler_385100_combined = 0;
  species complex_enzyme_eno_2x_molecule_2pg_rheostatbiocrnpyler_66442 in default_vire2biocrnpyler_385100_combined = 0;
  species complex_enzyme_eno_2x_molecule_pep_rheostatbiocrnpyler_66442 in default_vire2biocrnpyler_385100_combined = 0;
  species enzyme_pyk_rheostatbiocrnpyler_66442 in default_vire2biocrnpyler_385100_combined = 0.2/default_vire2biocrnpyler_385100_combined;
  species molecule_pyruvate_rheostatbiocrnpyler_66442 in default_vire2biocrnpyler_385100_combined = 0;
  species complex_enzyme_pyk_2x_metabolite_adp_2x_molecule_pep_rheostatbiocrnpyler_66442 in default_vire2biocrnpyler_385100_combined = 0;
  species complex_enzyme_pyk_2x_metabolite_atp_2x_molecule_pyruvate_rheostatbiocrnpyler_66442 in default_vire2biocrnpyler_385100_combined = 0;
  species enzyme_alsS_rheostatbiocrnpyler_66442 in default_vire2biocrnpyler_385100_combined = 0.2/default_vire2biocrnpyler_385100_combined;
  species molecule_acetolac_rheostatbiocrnpyler_66442 in default_vire2biocrnpyler_385100_combined = 0;
  species complex_enzyme_alsS_2x_molecule_pyruvate_rheostatbiocrnpyler_66442 in default_vire2biocrnpyler_385100_combined = 0;
  species complex_enzyme_alsS_molecule_acetolac_rheostatbiocrnpyler_66442 in default_vire2biocrnpyler_385100_combined = 0;
  species enzyme_IlvC_rheostatbiocrnpyler_66442 in default_vire2biocrnpyler_385100_combined = 0.2/default_vire2biocrnpyler_385100_combined;
  species molecule_23dih3mebut_rheostatbiocrnpyler_66442 in default_vire2biocrnpyler_385100_combined = 0;
  species complex_enzyme_IlvC_metabolite_nadph_molecule_acetolac_rheostatbiocrnpyler_66442 in default_vire2biocrnpyler_385100_combined = 0;
  species complex_enzyme_IlvC_metabolite_nadp_molecule_23dih3mebut_rheostatbiocrnpyler_66442 in default_vire2biocrnpyler_385100_combined = 0;
  species enzyme_IlvD_rheostatbiocrnpyler_66442 in default_vire2biocrnpyler_385100_combined = 0;
  species molecule_3me2oxo_rheostatbiocrnpyler_66442 in default_vire2biocrnpyler_385100_combined = 0;
  species complex_enzyme_IlvD_molecule_23dih3mebut_rheostatbiocrnpyler_66442 in default_vire2biocrnpyler_385100_combined = 0;
  species complex_enzyme_IlvD_molecule_3me2oxo_rheostatbiocrnpyler_66442 in default_vire2biocrnpyler_385100_combined = 0;
  species enzyme_kivD_rheostatbiocrnpyler_66442 in default_vire2biocrnpyler_385100_combined = 0.2/default_vire2biocrnpyler_385100_combined;
  species molecule_isobutanal_rheostatbiocrnpyler_66442 in default_vire2biocrnpyler_385100_combined = 0;
  species complex_enzyme_kivD_molecule_3me2oxo_rheostatbiocrnpyler_66442 in default_vire2biocrnpyler_385100_combined = 0;
  species complex_enzyme_kivD_molecule_isobutanal_rheostatbiocrnpyler_66442 in default_vire2biocrnpyler_385100_combined = 0;
  species enzyme_yahk_rheostatbiocrnpyler_66442 in default_vire2biocrnpyler_385100_combined = 0.2/default_vire2biocrnpyler_385100_combined;
  species molecule_isobutanol_rheostatbiocrnpyler_66442 in default_vire2biocrnpyler_385100_combined = 0;
  species complex_enzyme_yahk_metabolite_nadph_molecule_isobutanal_rheostatbiocrnpyler_66442 in default_vire2biocrnpyler_385100_combined = 0;
  species complex_enzyme_yahk_metabolite_nadp_molecule_isobutanol_rheostatbiocrnpyler_66442 in default_vire2biocrnpyler_385100_combined = 0;

  // Reactions:
  r0_vire2biocrnpyler_385100: dna_g_vire2biocrnpyler_385100 + tetR_vire2biocrnpyler_385100 => complex_dna_g_tetR_vire2biocrnpyler_385100; r0_vire2biocrnpyler_385100_k*dna_g_vire2biocrnpyler_385100*tetR_vire2biocrnpyler_385100;
    r0_vire2biocrnpyler_385100_k = 0.001;
  r0_1_vire2biocrnpyler_385100: complex_dna_g_tetR_vire2biocrnpyler_385100 => dna_g_vire2biocrnpyler_385100 + tetR_vire2biocrnpyler_385100; r0_1_vire2biocrnpyler_385100_k*complex_dna_g_tetR_vire2biocrnpyler_385100;
    r0_1_vire2biocrnpyler_385100_k = 1e-5;
  r2_vire2biocrnpyler_385100: complex_dna_g_tetR_vire2biocrnpyler_385100 + aTc_i_vire2biocrnpyler_385100 => complex_aTc_i_dna_g_tetR_vire2biocrnpyler_385100; r2_vire2biocrnpyler_385100_k*complex_dna_g_tetR_vire2biocrnpyler_385100*aTc_i_vire2biocrnpyler_385100;
    r2_vire2biocrnpyler_385100_k = 0.065;
  r2_1_vire2biocrnpyler_385100: complex_aTc_i_dna_g_tetR_vire2biocrnpyler_385100 => complex_dna_g_tetR_vire2biocrnpyler_385100 + aTc_i_vire2biocrnpyler_385100; r2_1_vire2biocrnpyler_385100_k*complex_aTc_i_dna_g_tetR_vire2biocrnpyler_385100;
    r2_1_vire2biocrnpyler_385100_k = 0.0003;
  r4_vire2biocrnpyler_385100: complex_aTc_i_dna_g_tetR_vire2biocrnpyler_385100 => dna_g_vire2biocrnpyler_385100 + complex_aTc_i_tetR_vire2biocrnpyler_385100; r4_vire2biocrnpyler_385100_k*complex_aTc_i_dna_g_tetR_vire2biocrnpyler_385100;
    r4_vire2biocrnpyler_385100_k = 100;
  r4_1_vire2biocrnpyler_385100: dna_g_vire2biocrnpyler_385100 + complex_aTc_i_tetR_vire2biocrnpyler_385100 => complex_aTc_i_dna_g_tetR_vire2biocrnpyler_385100; r4_1_vire2biocrnpyler_385100_k*dna_g_vire2biocrnpyler_385100*complex_aTc_i_tetR_vire2biocrnpyler_385100;
    r4_1_vire2biocrnpyler_385100_k = 10;
  r6_vire2biocrnpyler_385100: dna_g_vire2biocrnpyler_385100 => dna_g_vire2biocrnpyler_385100 + rna_g_vire2biocrnpyler_385100; r6_vire2biocrnpyler_385100_k*dna_g_vire2biocrnpyler_385100/(tetR_vire2biocrnpyler_385100^r6_vire2biocrnpyler_385100_n + r6_vire2biocrnpyler_385100_K);
    r6_vire2biocrnpyler_385100_k = 0.01875; r6_vire2biocrnpyler_385100_n = 1; r6_vire2biocrnpyler_385100_K = 20;
  r7_vire2biocrnpyler_385100: dna_g_vire2biocrnpyler_385100 => dna_g_vire2biocrnpyler_385100 + rna_g_vire2biocrnpyler_385100; r7_vire2biocrnpyler_385100_k*dna_g_vire2biocrnpyler_385100;
    r7_vire2biocrnpyler_385100_k = 0.001;
  r8_vire2biocrnpyler_385100: rna_g_vire2biocrnpyler_385100 + ATP_vire2biocrnpyler_385100_1_combined => rna_g_vire2biocrnpyler_385100 + ADP_vire2biocrnpyler_385100_1_combined + VirE2_f_vire2biocrnpyler_385100 + P_vire2biocrnpyler_385100_1_combined; r8_vire2biocrnpyler_385100_k*rna_g_vire2biocrnpyler_385100*ATP_vire2biocrnpyler_385100_1_combined^r8_vire2biocrnpyler_385100_n/(ATP_vire2biocrnpyler_385100_1_combined^r8_vire2biocrnpyler_385100_n + r8_vire2biocrnpyler_385100_K);
    r8_vire2biocrnpyler_385100_k = 0.6; r8_vire2biocrnpyler_385100_n = 1; r8_vire2biocrnpyler_385100_K = 1;
  r9_vire2biocrnpyler_385100: VirE2_f_vire2biocrnpyler_385100 => VirE2_b_vire2biocrnpyler_385100; r9_vire2biocrnpyler_385100_k*VirE2_f_vire2biocrnpyler_385100;
    r9_vire2biocrnpyler_385100_k = 1;
  r10_vire2biocrnpyler_385100: rna_g_vire2biocrnpyler_385100 => ; r10_vire2biocrnpyler_385100_k*rna_g_vire2biocrnpyler_385100;
    r10_vire2biocrnpyler_385100_k = 0.001;
  r11_vire2biocrnpyler_385100: VirE2_f_vire2biocrnpyler_385100 => ; r11_vire2biocrnpyler_385100_k*VirE2_f_vire2biocrnpyler_385100;
    r11_vire2biocrnpyler_385100_k = 1e-5;
  r0_rheostatbiocrnpyler_66442: enzyme_hex_rheostatbiocrnpyler_66442 + ATP_vire2biocrnpyler_385100_1_combined + molecule_glucose_rheostatbiocrnpyler_66442 => complex_enzyme_hex_metabolite_atp_molecule_glucose_rheostatbiocrnpyler_66442; r0_rheostatbiocrnpyler_66442_k*enzyme_hex_rheostatbiocrnpyler_66442*ATP_vire2biocrnpyler_385100_1_combined*molecule_glucose_rheostatbiocrnpyler_66442;
    r0_rheostatbiocrnpyler_66442_k = 15;
  r0_1_rheostatbiocrnpyler_66442: complex_enzyme_hex_metabolite_atp_molecule_glucose_rheostatbiocrnpyler_66442 => enzyme_hex_rheostatbiocrnpyler_66442 + ATP_vire2biocrnpyler_385100_1_combined + molecule_glucose_rheostatbiocrnpyler_66442; r0_1_rheostatbiocrnpyler_66442_k*complex_enzyme_hex_metabolite_atp_molecule_glucose_rheostatbiocrnpyler_66442;
    r0_1_rheostatbiocrnpyler_66442_k = 1.5;
  r2_rheostatbiocrnpyler_66442: complex_enzyme_hex_metabolite_atp_molecule_glucose_rheostatbiocrnpyler_66442 => complex_enzyme_hex_metabolite_adp_molecule_g6p_rheostatbiocrnpyler_66442; r2_rheostatbiocrnpyler_66442_k*complex_enzyme_hex_metabolite_atp_molecule_glucose_rheostatbiocrnpyler_66442;
    r2_rheostatbiocrnpyler_66442_k = 36000;
  r3_rheostatbiocrnpyler_66442: complex_enzyme_hex_metabolite_adp_molecule_g6p_rheostatbiocrnpyler_66442 => enzyme_hex_rheostatbiocrnpyler_66442 + molecule_g6p_rheostatbiocrnpyler_66442 + ADP_vire2biocrnpyler_385100_1_combined; r3_rheostatbiocrnpyler_66442_k*complex_enzyme_hex_metabolite_adp_molecule_g6p_rheostatbiocrnpyler_66442;
    r3_rheostatbiocrnpyler_66442_k = 15;
  r3_1_rheostatbiocrnpyler_66442: enzyme_hex_rheostatbiocrnpyler_66442 + molecule_g6p_rheostatbiocrnpyler_66442 + ADP_vire2biocrnpyler_385100_1_combined => complex_enzyme_hex_metabolite_adp_molecule_g6p_rheostatbiocrnpyler_66442; r3_1_rheostatbiocrnpyler_66442_k*enzyme_hex_rheostatbiocrnpyler_66442*molecule_g6p_rheostatbiocrnpyler_66442*ADP_vire2biocrnpyler_385100_1_combined;
    r3_1_rheostatbiocrnpyler_66442_k = 1.5;
  r5_rheostatbiocrnpyler_66442: enzyme_pgi_rheostatbiocrnpyler_66442 + molecule_g6p_rheostatbiocrnpyler_66442 => complex_enzyme_pgi_molecule_g6p_rheostatbiocrnpyler_66442; r5_rheostatbiocrnpyler_66442_k*enzyme_pgi_rheostatbiocrnpyler_66442*molecule_g6p_rheostatbiocrnpyler_66442;
    r5_rheostatbiocrnpyler_66442_k = 15;
  r5_1_rheostatbiocrnpyler_66442: complex_enzyme_pgi_molecule_g6p_rheostatbiocrnpyler_66442 => enzyme_pgi_rheostatbiocrnpyler_66442 + molecule_g6p_rheostatbiocrnpyler_66442; r5_1_rheostatbiocrnpyler_66442_k*complex_enzyme_pgi_molecule_g6p_rheostatbiocrnpyler_66442;
    r5_1_rheostatbiocrnpyler_66442_k = 1.5;
  r7_rheostatbiocrnpyler_66442: complex_enzyme_pgi_molecule_g6p_rheostatbiocrnpyler_66442 => complex_enzyme_pgi_molecule_f6p_rheostatbiocrnpyler_66442; r7_rheostatbiocrnpyler_66442_k*complex_enzyme_pgi_molecule_g6p_rheostatbiocrnpyler_66442;
    r7_rheostatbiocrnpyler_66442_k = 36000;
  r8_rheostatbiocrnpyler_66442: complex_enzyme_pgi_molecule_f6p_rheostatbiocrnpyler_66442 => enzyme_pgi_rheostatbiocrnpyler_66442 + molecule_f6p_rheostatbiocrnpyler_66442; r8_rheostatbiocrnpyler_66442_k*complex_enzyme_pgi_molecule_f6p_rheostatbiocrnpyler_66442;
    r8_rheostatbiocrnpyler_66442_k = 15;
  r8_1_rheostatbiocrnpyler_66442: enzyme_pgi_rheostatbiocrnpyler_66442 + molecule_f6p_rheostatbiocrnpyler_66442 => complex_enzyme_pgi_molecule_f6p_rheostatbiocrnpyler_66442; r8_1_rheostatbiocrnpyler_66442_k*enzyme_pgi_rheostatbiocrnpyler_66442*molecule_f6p_rheostatbiocrnpyler_66442;
    r8_1_rheostatbiocrnpyler_66442_k = 1.5;
  r10_rheostatbiocrnpyler_66442: enzyme_pfk_rheostatbiocrnpyler_66442 + ATP_vire2biocrnpyler_385100_1_combined + molecule_f6p_rheostatbiocrnpyler_66442 => complex_enzyme_pfk_metabolite_atp_molecule_f6p_rheostatbiocrnpyler_66442; r10_rheostatbiocrnpyler_66442_k*enzyme_pfk_rheostatbiocrnpyler_66442*ATP_vire2biocrnpyler_385100_1_combined*molecule_f6p_rheostatbiocrnpyler_66442;
    r10_rheostatbiocrnpyler_66442_k = 15;
  r10_1_rheostatbiocrnpyler_66442: complex_enzyme_pfk_metabolite_atp_molecule_f6p_rheostatbiocrnpyler_66442 => enzyme_pfk_rheostatbiocrnpyler_66442 + ATP_vire2biocrnpyler_385100_1_combined + molecule_f6p_rheostatbiocrnpyler_66442; r10_1_rheostatbiocrnpyler_66442_k*complex_enzyme_pfk_metabolite_atp_molecule_f6p_rheostatbiocrnpyler_66442;
    r10_1_rheostatbiocrnpyler_66442_k = 1.5;
  r12_rheostatbiocrnpyler_66442: complex_enzyme_pfk_metabolite_atp_molecule_f6p_rheostatbiocrnpyler_66442 => complex_enzyme_pfk_metabolite_adp_molecule_f16p_rheostatbiocrnpyler_66442; r12_rheostatbiocrnpyler_66442_k*complex_enzyme_pfk_metabolite_atp_molecule_f6p_rheostatbiocrnpyler_66442;
    r12_rheostatbiocrnpyler_66442_k = 36000;
  r13_rheostatbiocrnpyler_66442: complex_enzyme_pfk_metabolite_adp_molecule_f16p_rheostatbiocrnpyler_66442 => enzyme_pfk_rheostatbiocrnpyler_66442 + molecule_f16p_rheostatbiocrnpyler_66442 + ADP_vire2biocrnpyler_385100_1_combined; r13_rheostatbiocrnpyler_66442_k*complex_enzyme_pfk_metabolite_adp_molecule_f16p_rheostatbiocrnpyler_66442;
    r13_rheostatbiocrnpyler_66442_k = 15;
  r13_1_rheostatbiocrnpyler_66442: enzyme_pfk_rheostatbiocrnpyler_66442 + molecule_f16p_rheostatbiocrnpyler_66442 + ADP_vire2biocrnpyler_385100_1_combined => complex_enzyme_pfk_metabolite_adp_molecule_f16p_rheostatbiocrnpyler_66442; r13_1_rheostatbiocrnpyler_66442_k*enzyme_pfk_rheostatbiocrnpyler_66442*molecule_f16p_rheostatbiocrnpyler_66442*ADP_vire2biocrnpyler_385100_1_combined;
    r13_1_rheostatbiocrnpyler_66442_k = 1.5;
  r15_rheostatbiocrnpyler_66442: enzyme_ald_tpi_rheostatbiocrnpyler_66442 + molecule_f16p_rheostatbiocrnpyler_66442 => complex_enzyme_ald_tpi_molecule_f16p_rheostatbiocrnpyler_66442; r15_rheostatbiocrnpyler_66442_k*enzyme_ald_tpi_rheostatbiocrnpyler_66442*molecule_f16p_rheostatbiocrnpyler_66442;
    r15_rheostatbiocrnpyler_66442_k = 15;
  r15_1_rheostatbiocrnpyler_66442: complex_enzyme_ald_tpi_molecule_f16p_rheostatbiocrnpyler_66442 => enzyme_ald_tpi_rheostatbiocrnpyler_66442 + molecule_f16p_rheostatbiocrnpyler_66442; r15_1_rheostatbiocrnpyler_66442_k*complex_enzyme_ald_tpi_molecule_f16p_rheostatbiocrnpyler_66442;
    r15_1_rheostatbiocrnpyler_66442_k = 1.5;
  r17_rheostatbiocrnpyler_66442: complex_enzyme_ald_tpi_molecule_f16p_rheostatbiocrnpyler_66442 => complex_enzyme_ald_tpi_2x_molecule_g3p_rheostatbiocrnpyler_66442; r17_rheostatbiocrnpyler_66442_k*complex_enzyme_ald_tpi_molecule_f16p_rheostatbiocrnpyler_66442;
    r17_rheostatbiocrnpyler_66442_k = 36000;
  r18_rheostatbiocrnpyler_66442: complex_enzyme_ald_tpi_2x_molecule_g3p_rheostatbiocrnpyler_66442 => enzyme_ald_tpi_rheostatbiocrnpyler_66442 + 2 molecule_g3p_rheostatbiocrnpyler_66442; r18_rheostatbiocrnpyler_66442_k*complex_enzyme_ald_tpi_2x_molecule_g3p_rheostatbiocrnpyler_66442;
    r18_rheostatbiocrnpyler_66442_k = 15;
  r18_1_rheostatbiocrnpyler_66442: enzyme_ald_tpi_rheostatbiocrnpyler_66442 + 2 molecule_g3p_rheostatbiocrnpyler_66442 => complex_enzyme_ald_tpi_2x_molecule_g3p_rheostatbiocrnpyler_66442; r18_1_rheostatbiocrnpyler_66442_k*enzyme_ald_tpi_rheostatbiocrnpyler_66442*molecule_g3p_rheostatbiocrnpyler_66442^2;
    r18_1_rheostatbiocrnpyler_66442_k = 1.5;
  r20_rheostatbiocrnpyler_66442: enzyme_gapN_rheostatbiocrnpyler_66442 + 2 metabolite_nadp_rheostatbiocrnpyler_66442 + 2 molecule_g3p_rheostatbiocrnpyler_66442 => complex_enzyme_gapN_2x_metabolite_nadp_2x_molecule_g3p_rheostatbiocrnpyler_66442; r20_rheostatbiocrnpyler_66442_k*enzyme_gapN_rheostatbiocrnpyler_66442*metabolite_nadp_rheostatbiocrnpyler_66442^2*molecule_g3p_rheostatbiocrnpyler_66442^2;
    r20_rheostatbiocrnpyler_66442_k = 15;
  r20_1_rheostatbiocrnpyler_66442: complex_enzyme_gapN_2x_metabolite_nadp_2x_molecule_g3p_rheostatbiocrnpyler_66442 => enzyme_gapN_rheostatbiocrnpyler_66442 + 2 metabolite_nadp_rheostatbiocrnpyler_66442 + 2 molecule_g3p_rheostatbiocrnpyler_66442; r20_1_rheostatbiocrnpyler_66442_k*complex_enzyme_gapN_2x_metabolite_nadp_2x_molecule_g3p_rheostatbiocrnpyler_66442;
    r20_1_rheostatbiocrnpyler_66442_k = 1.5;
  r22_rheostatbiocrnpyler_66442: complex_enzyme_gapN_2x_metabolite_nadp_2x_molecule_g3p_rheostatbiocrnpyler_66442 => complex_enzyme_gapN_2x_metabolite_nadph_2x_molecule_3pg_rheostatbiocrnpyler_66442; r22_rheostatbiocrnpyler_66442_k*complex_enzyme_gapN_2x_metabolite_nadp_2x_molecule_g3p_rheostatbiocrnpyler_66442;
    r22_rheostatbiocrnpyler_66442_k = 36000;
  r23_rheostatbiocrnpyler_66442: complex_enzyme_gapN_2x_metabolite_nadph_2x_molecule_3pg_rheostatbiocrnpyler_66442 => enzyme_gapN_rheostatbiocrnpyler_66442 + 2 molecule_3pg_rheostatbiocrnpyler_66442 + 2 metabolite_nadph_rheostatbiocrnpyler_66442; r23_rheostatbiocrnpyler_66442_k*complex_enzyme_gapN_2x_metabolite_nadph_2x_molecule_3pg_rheostatbiocrnpyler_66442;
    r23_rheostatbiocrnpyler_66442_k = 15;
  r23_1_rheostatbiocrnpyler_66442: enzyme_gapN_rheostatbiocrnpyler_66442 + 2 molecule_3pg_rheostatbiocrnpyler_66442 + 2 metabolite_nadph_rheostatbiocrnpyler_66442 => complex_enzyme_gapN_2x_metabolite_nadph_2x_molecule_3pg_rheostatbiocrnpyler_66442; r23_1_rheostatbiocrnpyler_66442_k*enzyme_gapN_rheostatbiocrnpyler_66442*molecule_3pg_rheostatbiocrnpyler_66442^2*metabolite_nadph_rheostatbiocrnpyler_66442^2;
    r23_1_rheostatbiocrnpyler_66442_k = 1.5;
  r25_rheostatbiocrnpyler_66442: enzyme_mGapDH_rheostatbiocrnpyler_66442 + P_vire2biocrnpyler_385100_1_combined + 2 metabolite_nadp_rheostatbiocrnpyler_66442 + 2 molecule_g3p_rheostatbiocrnpyler_66442 => complex_enzyme_mGapDH_2x_metabolite_nadp_metabolite_pi_2x_molecule_g3p_rheostatbiocrnpyler_66442; r25_rheostatbiocrnpyler_66442_k*enzyme_mGapDH_rheostatbiocrnpyler_66442*P_vire2biocrnpyler_385100_1_combined*metabolite_nadp_rheostatbiocrnpyler_66442^2*molecule_g3p_rheostatbiocrnpyler_66442^2;
    r25_rheostatbiocrnpyler_66442_k = 15;
  r25_1_rheostatbiocrnpyler_66442: complex_enzyme_mGapDH_2x_metabolite_nadp_metabolite_pi_2x_molecule_g3p_rheostatbiocrnpyler_66442 => enzyme_mGapDH_rheostatbiocrnpyler_66442 + P_vire2biocrnpyler_385100_1_combined + 2 metabolite_nadp_rheostatbiocrnpyler_66442 + 2 molecule_g3p_rheostatbiocrnpyler_66442; r25_1_rheostatbiocrnpyler_66442_k*complex_enzyme_mGapDH_2x_metabolite_nadp_metabolite_pi_2x_molecule_g3p_rheostatbiocrnpyler_66442;
    r25_1_rheostatbiocrnpyler_66442_k = 1.5;
  r27_rheostatbiocrnpyler_66442: complex_enzyme_mGapDH_2x_metabolite_nadp_metabolite_pi_2x_molecule_g3p_rheostatbiocrnpyler_66442 => complex_enzyme_mGapDH_2x_metabolite_nadph_molecule_13bpg_rheostatbiocrnpyler_66442; r27_rheostatbiocrnpyler_66442_k*complex_enzyme_mGapDH_2x_metabolite_nadp_metabolite_pi_2x_molecule_g3p_rheostatbiocrnpyler_66442;
    r27_rheostatbiocrnpyler_66442_k = 36000;
  r28_rheostatbiocrnpyler_66442: complex_enzyme_mGapDH_2x_metabolite_nadph_molecule_13bpg_rheostatbiocrnpyler_66442 => enzyme_mGapDH_rheostatbiocrnpyler_66442 + molecule_13bpg_rheostatbiocrnpyler_66442 + 2 metabolite_nadph_rheostatbiocrnpyler_66442; r28_rheostatbiocrnpyler_66442_k*complex_enzyme_mGapDH_2x_metabolite_nadph_molecule_13bpg_rheostatbiocrnpyler_66442;
    r28_rheostatbiocrnpyler_66442_k = 15;
  r28_1_rheostatbiocrnpyler_66442: enzyme_mGapDH_rheostatbiocrnpyler_66442 + molecule_13bpg_rheostatbiocrnpyler_66442 + 2 metabolite_nadph_rheostatbiocrnpyler_66442 => complex_enzyme_mGapDH_2x_metabolite_nadph_molecule_13bpg_rheostatbiocrnpyler_66442; r28_1_rheostatbiocrnpyler_66442_k*enzyme_mGapDH_rheostatbiocrnpyler_66442*molecule_13bpg_rheostatbiocrnpyler_66442*metabolite_nadph_rheostatbiocrnpyler_66442^2;
    r28_1_rheostatbiocrnpyler_66442_k = 1.5;
  r30_rheostatbiocrnpyler_66442: enzyme_pgk_rheostatbiocrnpyler_66442 + ADP_vire2biocrnpyler_385100_1_combined + molecule_13bpg_rheostatbiocrnpyler_66442 => complex_enzyme_pgk_metabolite_adp_molecule_13bpg_rheostatbiocrnpyler_66442; r30_rheostatbiocrnpyler_66442_k*enzyme_pgk_rheostatbiocrnpyler_66442*ADP_vire2biocrnpyler_385100_1_combined*molecule_13bpg_rheostatbiocrnpyler_66442;
    r30_rheostatbiocrnpyler_66442_k = 15;
  r30_1_rheostatbiocrnpyler_66442: complex_enzyme_pgk_metabolite_adp_molecule_13bpg_rheostatbiocrnpyler_66442 => enzyme_pgk_rheostatbiocrnpyler_66442 + ADP_vire2biocrnpyler_385100_1_combined + molecule_13bpg_rheostatbiocrnpyler_66442; r30_1_rheostatbiocrnpyler_66442_k*complex_enzyme_pgk_metabolite_adp_molecule_13bpg_rheostatbiocrnpyler_66442;
    r30_1_rheostatbiocrnpyler_66442_k = 1.5;
  r32_rheostatbiocrnpyler_66442: complex_enzyme_pgk_metabolite_adp_molecule_13bpg_rheostatbiocrnpyler_66442 => complex_enzyme_pgk_metabolite_atp_2x_molecule_3pg_rheostatbiocrnpyler_66442; r32_rheostatbiocrnpyler_66442_k*complex_enzyme_pgk_metabolite_adp_molecule_13bpg_rheostatbiocrnpyler_66442;
    r32_rheostatbiocrnpyler_66442_k = 36000;
  r33_rheostatbiocrnpyler_66442: complex_enzyme_pgk_metabolite_atp_2x_molecule_3pg_rheostatbiocrnpyler_66442 => enzyme_pgk_rheostatbiocrnpyler_66442 + 2 molecule_3pg_rheostatbiocrnpyler_66442 + ATP_vire2biocrnpyler_385100_1_combined; r33_rheostatbiocrnpyler_66442_k*complex_enzyme_pgk_metabolite_atp_2x_molecule_3pg_rheostatbiocrnpyler_66442;
    r33_rheostatbiocrnpyler_66442_k = 15;
  r33_1_rheostatbiocrnpyler_66442: enzyme_pgk_rheostatbiocrnpyler_66442 + 2 molecule_3pg_rheostatbiocrnpyler_66442 + ATP_vire2biocrnpyler_385100_1_combined => complex_enzyme_pgk_metabolite_atp_2x_molecule_3pg_rheostatbiocrnpyler_66442; r33_1_rheostatbiocrnpyler_66442_k*enzyme_pgk_rheostatbiocrnpyler_66442*molecule_3pg_rheostatbiocrnpyler_66442^2*ATP_vire2biocrnpyler_385100_1_combined;
    r33_1_rheostatbiocrnpyler_66442_k = 1.5;
  r35_rheostatbiocrnpyler_66442: enzyme_pgm_rheostatbiocrnpyler_66442 + 2 molecule_3pg_rheostatbiocrnpyler_66442 => complex_enzyme_pgm_2x_molecule_3pg_rheostatbiocrnpyler_66442; r35_rheostatbiocrnpyler_66442_k*enzyme_pgm_rheostatbiocrnpyler_66442*molecule_3pg_rheostatbiocrnpyler_66442^2;
    r35_rheostatbiocrnpyler_66442_k = 15;
  r35_1_rheostatbiocrnpyler_66442: complex_enzyme_pgm_2x_molecule_3pg_rheostatbiocrnpyler_66442 => enzyme_pgm_rheostatbiocrnpyler_66442 + 2 molecule_3pg_rheostatbiocrnpyler_66442; r35_1_rheostatbiocrnpyler_66442_k*complex_enzyme_pgm_2x_molecule_3pg_rheostatbiocrnpyler_66442;
    r35_1_rheostatbiocrnpyler_66442_k = 1.5;
  r37_rheostatbiocrnpyler_66442: complex_enzyme_pgm_2x_molecule_3pg_rheostatbiocrnpyler_66442 => complex_enzyme_pgm_2x_molecule_2pg_rheostatbiocrnpyler_66442; r37_rheostatbiocrnpyler_66442_k*complex_enzyme_pgm_2x_molecule_3pg_rheostatbiocrnpyler_66442;
    r37_rheostatbiocrnpyler_66442_k = 36000;
  r38_rheostatbiocrnpyler_66442: complex_enzyme_pgm_2x_molecule_2pg_rheostatbiocrnpyler_66442 => enzyme_pgm_rheostatbiocrnpyler_66442 + 2 molecule_2pg_rheostatbiocrnpyler_66442; r38_rheostatbiocrnpyler_66442_k*complex_enzyme_pgm_2x_molecule_2pg_rheostatbiocrnpyler_66442;
    r38_rheostatbiocrnpyler_66442_k = 15;
  r38_1_rheostatbiocrnpyler_66442: enzyme_pgm_rheostatbiocrnpyler_66442 + 2 molecule_2pg_rheostatbiocrnpyler_66442 => complex_enzyme_pgm_2x_molecule_2pg_rheostatbiocrnpyler_66442; r38_1_rheostatbiocrnpyler_66442_k*enzyme_pgm_rheostatbiocrnpyler_66442*molecule_2pg_rheostatbiocrnpyler_66442^2;
    r38_1_rheostatbiocrnpyler_66442_k = 1.5;
  r40_rheostatbiocrnpyler_66442: enzyme_eno_rheostatbiocrnpyler_66442 + 2 molecule_2pg_rheostatbiocrnpyler_66442 => complex_enzyme_eno_2x_molecule_2pg_rheostatbiocrnpyler_66442; r40_rheostatbiocrnpyler_66442_k*enzyme_eno_rheostatbiocrnpyler_66442*molecule_2pg_rheostatbiocrnpyler_66442^2;
    r40_rheostatbiocrnpyler_66442_k = 15;
  r40_1_rheostatbiocrnpyler_66442: complex_enzyme_eno_2x_molecule_2pg_rheostatbiocrnpyler_66442 => enzyme_eno_rheostatbiocrnpyler_66442 + 2 molecule_2pg_rheostatbiocrnpyler_66442; r40_1_rheostatbiocrnpyler_66442_k*complex_enzyme_eno_2x_molecule_2pg_rheostatbiocrnpyler_66442;
    r40_1_rheostatbiocrnpyler_66442_k = 1.5;
  r42_rheostatbiocrnpyler_66442: complex_enzyme_eno_2x_molecule_2pg_rheostatbiocrnpyler_66442 => complex_enzyme_eno_2x_molecule_pep_rheostatbiocrnpyler_66442; r42_rheostatbiocrnpyler_66442_k*complex_enzyme_eno_2x_molecule_2pg_rheostatbiocrnpyler_66442;
    r42_rheostatbiocrnpyler_66442_k = 36000;
  r43_rheostatbiocrnpyler_66442: complex_enzyme_eno_2x_molecule_pep_rheostatbiocrnpyler_66442 => enzyme_eno_rheostatbiocrnpyler_66442 + 2 molecule_pep_rheostatbiocrnpyler_66442; r43_rheostatbiocrnpyler_66442_k*complex_enzyme_eno_2x_molecule_pep_rheostatbiocrnpyler_66442;
    r43_rheostatbiocrnpyler_66442_k = 15;
  r43_1_rheostatbiocrnpyler_66442: enzyme_eno_rheostatbiocrnpyler_66442 + 2 molecule_pep_rheostatbiocrnpyler_66442 => complex_enzyme_eno_2x_molecule_pep_rheostatbiocrnpyler_66442; r43_1_rheostatbiocrnpyler_66442_k*enzyme_eno_rheostatbiocrnpyler_66442*molecule_pep_rheostatbiocrnpyler_66442^2;
    r43_1_rheostatbiocrnpyler_66442_k = 1.5;
  r45_rheostatbiocrnpyler_66442: enzyme_pyk_rheostatbiocrnpyler_66442 + 2 ADP_vire2biocrnpyler_385100_1_combined + 2 molecule_pep_rheostatbiocrnpyler_66442 => complex_enzyme_pyk_2x_metabolite_adp_2x_molecule_pep_rheostatbiocrnpyler_66442; r45_rheostatbiocrnpyler_66442_k*enzyme_pyk_rheostatbiocrnpyler_66442*ADP_vire2biocrnpyler_385100_1_combined^2*molecule_pep_rheostatbiocrnpyler_66442^2;
    r45_rheostatbiocrnpyler_66442_k = 15;
  r45_1_rheostatbiocrnpyler_66442: complex_enzyme_pyk_2x_metabolite_adp_2x_molecule_pep_rheostatbiocrnpyler_66442 => enzyme_pyk_rheostatbiocrnpyler_66442 + 2 ADP_vire2biocrnpyler_385100_1_combined + 2 molecule_pep_rheostatbiocrnpyler_66442; r45_1_rheostatbiocrnpyler_66442_k*complex_enzyme_pyk_2x_metabolite_adp_2x_molecule_pep_rheostatbiocrnpyler_66442;
    r45_1_rheostatbiocrnpyler_66442_k = 1.5;
  r47_rheostatbiocrnpyler_66442: complex_enzyme_pyk_2x_metabolite_adp_2x_molecule_pep_rheostatbiocrnpyler_66442 => complex_enzyme_pyk_2x_metabolite_atp_2x_molecule_pyruvate_rheostatbiocrnpyler_66442; r47_rheostatbiocrnpyler_66442_k*complex_enzyme_pyk_2x_metabolite_adp_2x_molecule_pep_rheostatbiocrnpyler_66442;
    r47_rheostatbiocrnpyler_66442_k = 36000;
  r48_rheostatbiocrnpyler_66442: complex_enzyme_pyk_2x_metabolite_atp_2x_molecule_pyruvate_rheostatbiocrnpyler_66442 => enzyme_pyk_rheostatbiocrnpyler_66442 + 2 molecule_pyruvate_rheostatbiocrnpyler_66442 + 2 ATP_vire2biocrnpyler_385100_1_combined; r48_rheostatbiocrnpyler_66442_k*complex_enzyme_pyk_2x_metabolite_atp_2x_molecule_pyruvate_rheostatbiocrnpyler_66442;
    r48_rheostatbiocrnpyler_66442_k = 15;
  r48_1_rheostatbiocrnpyler_66442: enzyme_pyk_rheostatbiocrnpyler_66442 + 2 molecule_pyruvate_rheostatbiocrnpyler_66442 + 2 ATP_vire2biocrnpyler_385100_1_combined => complex_enzyme_pyk_2x_metabolite_atp_2x_molecule_pyruvate_rheostatbiocrnpyler_66442; r48_1_rheostatbiocrnpyler_66442_k*enzyme_pyk_rheostatbiocrnpyler_66442*molecule_pyruvate_rheostatbiocrnpyler_66442^2*ATP_vire2biocrnpyler_385100_1_combined^2;
    r48_1_rheostatbiocrnpyler_66442_k = 1.5;
  r50_rheostatbiocrnpyler_66442: enzyme_alsS_rheostatbiocrnpyler_66442 + 2 molecule_pyruvate_rheostatbiocrnpyler_66442 => complex_enzyme_alsS_2x_molecule_pyruvate_rheostatbiocrnpyler_66442; r50_rheostatbiocrnpyler_66442_k*enzyme_alsS_rheostatbiocrnpyler_66442*molecule_pyruvate_rheostatbiocrnpyler_66442^2;
    r50_rheostatbiocrnpyler_66442_k = 15;
  r50_1_rheostatbiocrnpyler_66442: complex_enzyme_alsS_2x_molecule_pyruvate_rheostatbiocrnpyler_66442 => enzyme_alsS_rheostatbiocrnpyler_66442 + 2 molecule_pyruvate_rheostatbiocrnpyler_66442; r50_1_rheostatbiocrnpyler_66442_k*complex_enzyme_alsS_2x_molecule_pyruvate_rheostatbiocrnpyler_66442;
    r50_1_rheostatbiocrnpyler_66442_k = 1.5;
  r52_rheostatbiocrnpyler_66442: complex_enzyme_alsS_2x_molecule_pyruvate_rheostatbiocrnpyler_66442 => complex_enzyme_alsS_molecule_acetolac_rheostatbiocrnpyler_66442; r52_rheostatbiocrnpyler_66442_k*complex_enzyme_alsS_2x_molecule_pyruvate_rheostatbiocrnpyler_66442;
    r52_rheostatbiocrnpyler_66442_k = 36000;
  r53_rheostatbiocrnpyler_66442: complex_enzyme_alsS_molecule_acetolac_rheostatbiocrnpyler_66442 => enzyme_alsS_rheostatbiocrnpyler_66442 + molecule_acetolac_rheostatbiocrnpyler_66442; r53_rheostatbiocrnpyler_66442_k*complex_enzyme_alsS_molecule_acetolac_rheostatbiocrnpyler_66442;
    r53_rheostatbiocrnpyler_66442_k = 15;
  r53_1_rheostatbiocrnpyler_66442: enzyme_alsS_rheostatbiocrnpyler_66442 + molecule_acetolac_rheostatbiocrnpyler_66442 => complex_enzyme_alsS_molecule_acetolac_rheostatbiocrnpyler_66442; r53_1_rheostatbiocrnpyler_66442_k*enzyme_alsS_rheostatbiocrnpyler_66442*molecule_acetolac_rheostatbiocrnpyler_66442;
    r53_1_rheostatbiocrnpyler_66442_k = 1.5;
  r55_rheostatbiocrnpyler_66442: enzyme_IlvC_rheostatbiocrnpyler_66442 + metabolite_nadph_rheostatbiocrnpyler_66442 + molecule_acetolac_rheostatbiocrnpyler_66442 => complex_enzyme_IlvC_metabolite_nadph_molecule_acetolac_rheostatbiocrnpyler_66442; r55_rheostatbiocrnpyler_66442_k*enzyme_IlvC_rheostatbiocrnpyler_66442*metabolite_nadph_rheostatbiocrnpyler_66442*molecule_acetolac_rheostatbiocrnpyler_66442;
    r55_rheostatbiocrnpyler_66442_k = 15;
  r55_1_rheostatbiocrnpyler_66442: complex_enzyme_IlvC_metabolite_nadph_molecule_acetolac_rheostatbiocrnpyler_66442 => enzyme_IlvC_rheostatbiocrnpyler_66442 + metabolite_nadph_rheostatbiocrnpyler_66442 + molecule_acetolac_rheostatbiocrnpyler_66442; r55_1_rheostatbiocrnpyler_66442_k*complex_enzyme_IlvC_metabolite_nadph_molecule_acetolac_rheostatbiocrnpyler_66442;
    r55_1_rheostatbiocrnpyler_66442_k = 1.5;
  r57_rheostatbiocrnpyler_66442: complex_enzyme_IlvC_metabolite_nadph_molecule_acetolac_rheostatbiocrnpyler_66442 => complex_enzyme_IlvC_metabolite_nadp_molecule_23dih3mebut_rheostatbiocrnpyler_66442; r57_rheostatbiocrnpyler_66442_k*complex_enzyme_IlvC_metabolite_nadph_molecule_acetolac_rheostatbiocrnpyler_66442;
    r57_rheostatbiocrnpyler_66442_k = 36000;
  r58_rheostatbiocrnpyler_66442: complex_enzyme_IlvC_metabolite_nadp_molecule_23dih3mebut_rheostatbiocrnpyler_66442 => enzyme_IlvC_rheostatbiocrnpyler_66442 + molecule_23dih3mebut_rheostatbiocrnpyler_66442 + metabolite_nadp_rheostatbiocrnpyler_66442; r58_rheostatbiocrnpyler_66442_k*complex_enzyme_IlvC_metabolite_nadp_molecule_23dih3mebut_rheostatbiocrnpyler_66442;
    r58_rheostatbiocrnpyler_66442_k = 15;
  r58_1_rheostatbiocrnpyler_66442: enzyme_IlvC_rheostatbiocrnpyler_66442 + molecule_23dih3mebut_rheostatbiocrnpyler_66442 + metabolite_nadp_rheostatbiocrnpyler_66442 => complex_enzyme_IlvC_metabolite_nadp_molecule_23dih3mebut_rheostatbiocrnpyler_66442; r58_1_rheostatbiocrnpyler_66442_k*enzyme_IlvC_rheostatbiocrnpyler_66442*molecule_23dih3mebut_rheostatbiocrnpyler_66442*metabolite_nadp_rheostatbiocrnpyler_66442;
    r58_1_rheostatbiocrnpyler_66442_k = 1.5;
  r60_rheostatbiocrnpyler_66442: enzyme_IlvD_rheostatbiocrnpyler_66442 + molecule_23dih3mebut_rheostatbiocrnpyler_66442 => complex_enzyme_IlvD_molecule_23dih3mebut_rheostatbiocrnpyler_66442; r60_rheostatbiocrnpyler_66442_k*enzyme_IlvD_rheostatbiocrnpyler_66442*molecule_23dih3mebut_rheostatbiocrnpyler_66442;
    r60_rheostatbiocrnpyler_66442_k = 15;
  r60_1_rheostatbiocrnpyler_66442: complex_enzyme_IlvD_molecule_23dih3mebut_rheostatbiocrnpyler_66442 => enzyme_IlvD_rheostatbiocrnpyler_66442 + molecule_23dih3mebut_rheostatbiocrnpyler_66442; r60_1_rheostatbiocrnpyler_66442_k*complex_enzyme_IlvD_molecule_23dih3mebut_rheostatbiocrnpyler_66442;
    r60_1_rheostatbiocrnpyler_66442_k = 1.5;
  r62_rheostatbiocrnpyler_66442: complex_enzyme_IlvD_molecule_23dih3mebut_rheostatbiocrnpyler_66442 => complex_enzyme_IlvD_molecule_3me2oxo_rheostatbiocrnpyler_66442; r62_rheostatbiocrnpyler_66442_k*complex_enzyme_IlvD_molecule_23dih3mebut_rheostatbiocrnpyler_66442;
    r62_rheostatbiocrnpyler_66442_k = 36000;
  r63_rheostatbiocrnpyler_66442: complex_enzyme_IlvD_molecule_3me2oxo_rheostatbiocrnpyler_66442 => enzyme_IlvD_rheostatbiocrnpyler_66442 + molecule_3me2oxo_rheostatbiocrnpyler_66442; r63_rheostatbiocrnpyler_66442_k*complex_enzyme_IlvD_molecule_3me2oxo_rheostatbiocrnpyler_66442;
    r63_rheostatbiocrnpyler_66442_k = 15;
  r63_1_rheostatbiocrnpyler_66442: enzyme_IlvD_rheostatbiocrnpyler_66442 + molecule_3me2oxo_rheostatbiocrnpyler_66442 => complex_enzyme_IlvD_molecule_3me2oxo_rheostatbiocrnpyler_66442; r63_1_rheostatbiocrnpyler_66442_k*enzyme_IlvD_rheostatbiocrnpyler_66442*molecule_3me2oxo_rheostatbiocrnpyler_66442;
    r63_1_rheostatbiocrnpyler_66442_k = 1.5;
  r65_rheostatbiocrnpyler_66442: enzyme_kivD_rheostatbiocrnpyler_66442 + molecule_3me2oxo_rheostatbiocrnpyler_66442 => complex_enzyme_kivD_molecule_3me2oxo_rheostatbiocrnpyler_66442; r65_rheostatbiocrnpyler_66442_k*enzyme_kivD_rheostatbiocrnpyler_66442*molecule_3me2oxo_rheostatbiocrnpyler_66442;
    r65_rheostatbiocrnpyler_66442_k = 15;
  r65_1_rheostatbiocrnpyler_66442: complex_enzyme_kivD_molecule_3me2oxo_rheostatbiocrnpyler_66442 => enzyme_kivD_rheostatbiocrnpyler_66442 + molecule_3me2oxo_rheostatbiocrnpyler_66442; r65_1_rheostatbiocrnpyler_66442_k*complex_enzyme_kivD_molecule_3me2oxo_rheostatbiocrnpyler_66442;
    r65_1_rheostatbiocrnpyler_66442_k = 1.5;
  r67_rheostatbiocrnpyler_66442: complex_enzyme_kivD_molecule_3me2oxo_rheostatbiocrnpyler_66442 => complex_enzyme_kivD_molecule_isobutanal_rheostatbiocrnpyler_66442; r67_rheostatbiocrnpyler_66442_k*complex_enzyme_kivD_molecule_3me2oxo_rheostatbiocrnpyler_66442;
    r67_rheostatbiocrnpyler_66442_k = 36000;
  r68_rheostatbiocrnpyler_66442: complex_enzyme_kivD_molecule_isobutanal_rheostatbiocrnpyler_66442 => enzyme_kivD_rheostatbiocrnpyler_66442 + molecule_isobutanal_rheostatbiocrnpyler_66442; r68_rheostatbiocrnpyler_66442_k*complex_enzyme_kivD_molecule_isobutanal_rheostatbiocrnpyler_66442;
    r68_rheostatbiocrnpyler_66442_k = 15;
  r68_1_rheostatbiocrnpyler_66442: enzyme_kivD_rheostatbiocrnpyler_66442 + molecule_isobutanal_rheostatbiocrnpyler_66442 => complex_enzyme_kivD_molecule_isobutanal_rheostatbiocrnpyler_66442; r68_1_rheostatbiocrnpyler_66442_k*enzyme_kivD_rheostatbiocrnpyler_66442*molecule_isobutanal_rheostatbiocrnpyler_66442;
    r68_1_rheostatbiocrnpyler_66442_k = 1.5;
  r70_rheostatbiocrnpyler_66442: enzyme_yahk_rheostatbiocrnpyler_66442 + metabolite_nadph_rheostatbiocrnpyler_66442 + molecule_isobutanal_rheostatbiocrnpyler_66442 => complex_enzyme_yahk_metabolite_nadph_molecule_isobutanal_rheostatbiocrnpyler_66442; r70_rheostatbiocrnpyler_66442_k*enzyme_yahk_rheostatbiocrnpyler_66442*metabolite_nadph_rheostatbiocrnpyler_66442*molecule_isobutanal_rheostatbiocrnpyler_66442;
    r70_rheostatbiocrnpyler_66442_k = 15;
  r70_1_rheostatbiocrnpyler_66442: complex_enzyme_yahk_metabolite_nadph_molecule_isobutanal_rheostatbiocrnpyler_66442 => enzyme_yahk_rheostatbiocrnpyler_66442 + metabolite_nadph_rheostatbiocrnpyler_66442 + molecule_isobutanal_rheostatbiocrnpyler_66442; r70_1_rheostatbiocrnpyler_66442_k*complex_enzyme_yahk_metabolite_nadph_molecule_isobutanal_rheostatbiocrnpyler_66442;
    r70_1_rheostatbiocrnpyler_66442_k = 1.5;
  r72_rheostatbiocrnpyler_66442: complex_enzyme_yahk_metabolite_nadph_molecule_isobutanal_rheostatbiocrnpyler_66442 => complex_enzyme_yahk_metabolite_nadp_molecule_isobutanol_rheostatbiocrnpyler_66442; r72_rheostatbiocrnpyler_66442_k*complex_enzyme_yahk_metabolite_nadph_molecule_isobutanal_rheostatbiocrnpyler_66442;
    r72_rheostatbiocrnpyler_66442_k = 36000;
  r73_rheostatbiocrnpyler_66442: complex_enzyme_yahk_metabolite_nadp_molecule_isobutanol_rheostatbiocrnpyler_66442 => enzyme_yahk_rheostatbiocrnpyler_66442 + molecule_isobutanol_rheostatbiocrnpyler_66442 + metabolite_nadp_rheostatbiocrnpyler_66442; r73_rheostatbiocrnpyler_66442_k*complex_enzyme_yahk_metabolite_nadp_molecule_isobutanol_rheostatbiocrnpyler_66442;
    r73_rheostatbiocrnpyler_66442_k = 15;
  r73_1_rheostatbiocrnpyler_66442: enzyme_yahk_rheostatbiocrnpyler_66442 + molecule_isobutanol_rheostatbiocrnpyler_66442 + metabolite_nadp_rheostatbiocrnpyler_66442 => complex_enzyme_yahk_metabolite_nadp_molecule_isobutanol_rheostatbiocrnpyler_66442; r73_1_rheostatbiocrnpyler_66442_k*enzyme_yahk_rheostatbiocrnpyler_66442*molecule_isobutanol_rheostatbiocrnpyler_66442*metabolite_nadp_rheostatbiocrnpyler_66442;
    r73_1_rheostatbiocrnpyler_66442_k = 1.5;

  // Unit definitions:
  unit square_metre = metre^2;
end
