// SBML level 3 version 2

model combined_model_of__combined_model_of__external_reservoir_model_combined_model_of__atc_membrane_dnaexp_membrane_combined_model_of__combined_model_of__biocrnpyler_715245_biocrnpyler_745024()
  // model units - substance: mole, time: second, volume: litre, area: square_metre, length: metre, extent: mole

  // Compartments:
  compartment cell_1_internal_combined = 3e-6 litre;
  compartment cell_1_external_combined_1 = 0.0001 litre;

  // Species:
  species atc_e_external_reservoir_model_1_combined in cell_1_external_combined_1 = 10000/cell_1_external_combined_1;
  species ssDNA_e in cell_1_external_combined_1 = 0;
  species ssDNA in cell_1_internal_combined = 50/cell_1_internal_combined;
  species VirE2_b_ssDNA in cell_1_internal_combined = 0;
  species dna_g_virE2biocrnpyler_715245_combined_model_of__biocrnpyler_715245_biocrnpyler_745024 in cell_1_internal_combined = 1/cell_1_internal_combined;
  species tetR_virE2biocrnpyler_715245_combined_model_of__biocrnpyler_715245_biocrnpyler_745024 in cell_1_internal_combined = 10/cell_1_internal_combined;
  species rna_g_virE2biocrnpyler_715245_combined_model_of__biocrnpyler_715245_biocrnpyler_745024 in cell_1_internal_combined = 0;
  species VirE2_f_virE2biocrnpyler_715245_combined_model_of__biocrnpyler_715245_biocrnpyler_745024 in cell_1_internal_combined = 0;
  species atc_i_1_combined in cell_1_internal_combined = 0;
  species complex_atc_i_tetR_virE2biocrnpyler_715245_combined_model_of__biocrnpyler_715245_biocrnpyler_745024 in cell_1_internal_combined = 0;
  species VirE2_b_1_combined in cell_1_internal_combined = 0;
  species complex_dna_g_tetR_virE2biocrnpyler_715245_combined_model_of__biocrnpyler_715245_biocrnpyler_745024 in cell_1_internal_combined = 0;
  species complex_atc_i_dna_g_tetR_virE2biocrnpyler_715245_combined_model_of__biocrnpyler_715245_biocrnpyler_745024 in cell_1_internal_combined = 0;
  species enzyme_hex_ATP_rheostatbiocrnpyler_745024_combined_model_of__biocrnpyler_715245_biocrnpyler_745024 in cell_1_internal_combined = 0.2/cell_1_internal_combined;
  species ATP_virE2biocrnpyler_715245_1_combined_combined_model_of__biocrnpyler_715245_biocrnpyler_745024 in cell_1_internal_combined = 10/cell_1_internal_combined;
  species molecule_glucose_ATP_rheostatbiocrnpyler_745024_combined_model_of__biocrnpyler_715245_biocrnpyler_745024 in cell_1_internal_combined = 30/cell_1_internal_combined;
  species molecule_g6p_ATP_rheostatbiocrnpyler_745024_combined_model_of__biocrnpyler_715245_biocrnpyler_745024 in cell_1_internal_combined = 0;
  species ADP_virE2biocrnpyler_715245_1_combined_combined_model_of__biocrnpyler_715245_biocrnpyler_745024 in cell_1_internal_combined = 0;
  species complex_enzyme_hex_metabolite_atp_molecule_glucose_ATP_rheostatbiocrnpyler_745024_combined_model_of__biocrnpyler_715245_biocrnpyler_745024 in cell_1_internal_combined = 0;
  species complex_enzyme_hex_metabolite_adp_molecule_g6p_ATP_rheostatbiocrnpyler_745024_combined_model_of__biocrnpyler_715245_biocrnpyler_745024 in cell_1_internal_combined = 0;
  species enzyme_pgi_ATP_rheostatbiocrnpyler_745024_combined_model_of__biocrnpyler_715245_biocrnpyler_745024 in cell_1_internal_combined = 0.2/cell_1_internal_combined;
  species molecule_f6p_ATP_rheostatbiocrnpyler_745024_combined_model_of__biocrnpyler_715245_biocrnpyler_745024 in cell_1_internal_combined = 0;
  species complex_enzyme_pgi_molecule_g6p_ATP_rheostatbiocrnpyler_745024_combined_model_of__biocrnpyler_715245_biocrnpyler_745024 in cell_1_internal_combined = 0;
  species complex_enzyme_pgi_molecule_f6p_ATP_rheostatbiocrnpyler_745024_combined_model_of__biocrnpyler_715245_biocrnpyler_745024 in cell_1_internal_combined = 0;
  species enzyme_pfk_ATP_rheostatbiocrnpyler_745024_combined_model_of__biocrnpyler_715245_biocrnpyler_745024 in cell_1_internal_combined = 0.2/cell_1_internal_combined;
  species molecule_f16p_ATP_rheostatbiocrnpyler_745024_combined_model_of__biocrnpyler_715245_biocrnpyler_745024 in cell_1_internal_combined = 0;
  species complex_enzyme_pfk_metabolite_atp_molecule_f6p_ATP_rheostatbiocrnpyler_745024_combined_model_of__biocrnpyler_715245_biocrnpyler_745024 in cell_1_internal_combined = 0;
  species complex_enzyme_pfk_metabolite_adp_molecule_f16p_ATP_rheostatbiocrnpyler_745024_combined_model_of__biocrnpyler_715245_biocrnpyler_745024 in cell_1_internal_combined = 0;
  species enzyme_ald_tpi_ATP_rheostatbiocrnpyler_745024_combined_model_of__biocrnpyler_715245_biocrnpyler_745024 in cell_1_internal_combined = 0.2/cell_1_internal_combined;
  species molecule_g3p_ATP_rheostatbiocrnpyler_745024_combined_model_of__biocrnpyler_715245_biocrnpyler_745024 in cell_1_internal_combined = 0;
  species complex_enzyme_ald_tpi_molecule_f16p_ATP_rheostatbiocrnpyler_745024_combined_model_of__biocrnpyler_715245_biocrnpyler_745024 in cell_1_internal_combined = 0;
  species complex_enzyme_ald_tpi_2x_molecule_g3p_ATP_rheostatbiocrnpyler_745024_combined_model_of__biocrnpyler_715245_biocrnpyler_745024 in cell_1_internal_combined = 0;
  species enzyme_gapN_ATP_rheostatbiocrnpyler_745024_combined_model_of__biocrnpyler_715245_biocrnpyler_745024 in cell_1_internal_combined = 0.2/cell_1_internal_combined;
  species metabolite_nadp_ATP_rheostatbiocrnpyler_745024_combined_model_of__biocrnpyler_715245_biocrnpyler_745024 in cell_1_internal_combined = 30/cell_1_internal_combined;
  species molecule_3pg_ATP_rheostatbiocrnpyler_745024_combined_model_of__biocrnpyler_715245_biocrnpyler_745024 in cell_1_internal_combined = 0;
  species metabolite_nadph_ATP_rheostatbiocrnpyler_745024_combined_model_of__biocrnpyler_715245_biocrnpyler_745024 in cell_1_internal_combined = 0;
  species complex_enzyme_gapN_2x_metabolite_nadp_2x_molecule_g3p_ATP_rheostatbiocrnpyler_745024_combined_model_of__biocrnpyler_715245_biocrnpyler_745024 in cell_1_internal_combined = 0;
  species complex_enzyme_gapN_2x_metabolite_nadph_2x_molecule_3pg_ATP_rheostatbiocrnpyler_745024_combined_model_of__biocrnpyler_715245_biocrnpyler_745024 in cell_1_internal_combined = 0;
  species enzyme_mGapDH_ATP_rheostatbiocrnpyler_745024_combined_model_of__biocrnpyler_715245_biocrnpyler_745024 in cell_1_internal_combined = 0.2/cell_1_internal_combined;
  species P_virE2biocrnpyler_715245_1_combined_combined_model_of__biocrnpyler_715245_biocrnpyler_745024 in cell_1_internal_combined = 30/cell_1_internal_combined;
  species molecule_13bpg_ATP_rheostatbiocrnpyler_745024_combined_model_of__biocrnpyler_715245_biocrnpyler_745024 in cell_1_internal_combined = 0;
  species complex_enzyme_mGapDH_2x_metabolite_nadp_metabolite_pi_2x_molecule_g3p_ATP_rheostatbiocrnpyler_745024_combined_model_of__biocrnpyler_715245_biocrnpyler_745024 in cell_1_internal_combined = 0;
  species complex_enzyme_mGapDH_2x_metabolite_nadph_molecule_13bpg_ATP_rheostatbiocrnpyler_745024_combined_model_of__biocrnpyler_715245_biocrnpyler_745024 in cell_1_internal_combined = 0;
  species enzyme_pgk_ATP_rheostatbiocrnpyler_745024_combined_model_of__biocrnpyler_715245_biocrnpyler_745024 in cell_1_internal_combined = 0.2/cell_1_internal_combined;
  species complex_enzyme_pgk_metabolite_adp_molecule_13bpg_ATP_rheostatbiocrnpyler_745024_combined_model_of__biocrnpyler_715245_biocrnpyler_745024 in cell_1_internal_combined = 0;
  species complex_enzyme_pgk_metabolite_atp_2x_molecule_3pg_ATP_rheostatbiocrnpyler_745024_combined_model_of__biocrnpyler_715245_biocrnpyler_745024 in cell_1_internal_combined = 0;
  species enzyme_pgm_ATP_rheostatbiocrnpyler_745024_combined_model_of__biocrnpyler_715245_biocrnpyler_745024 in cell_1_internal_combined = 0.2/cell_1_internal_combined;
  species molecule_2pg_ATP_rheostatbiocrnpyler_745024_combined_model_of__biocrnpyler_715245_biocrnpyler_745024 in cell_1_internal_combined = 0;
  species complex_enzyme_pgm_2x_molecule_3pg_ATP_rheostatbiocrnpyler_745024_combined_model_of__biocrnpyler_715245_biocrnpyler_745024 in cell_1_internal_combined = 0;
  species complex_enzyme_pgm_2x_molecule_2pg_ATP_rheostatbiocrnpyler_745024_combined_model_of__biocrnpyler_715245_biocrnpyler_745024 in cell_1_internal_combined = 0;
  species enzyme_eno_ATP_rheostatbiocrnpyler_745024_combined_model_of__biocrnpyler_715245_biocrnpyler_745024 in cell_1_internal_combined = 0.2/cell_1_internal_combined;
  species molecule_pep_ATP_rheostatbiocrnpyler_745024_combined_model_of__biocrnpyler_715245_biocrnpyler_745024 in cell_1_internal_combined = 0;
  species complex_enzyme_eno_2x_molecule_2pg_ATP_rheostatbiocrnpyler_745024_combined_model_of__biocrnpyler_715245_biocrnpyler_745024 in cell_1_internal_combined = 0;
  species complex_enzyme_eno_2x_molecule_pep_ATP_rheostatbiocrnpyler_745024_combined_model_of__biocrnpyler_715245_biocrnpyler_745024 in cell_1_internal_combined = 0;
  species enzyme_pyk_ATP_rheostatbiocrnpyler_745024_combined_model_of__biocrnpyler_715245_biocrnpyler_745024 in cell_1_internal_combined = 0.2/cell_1_internal_combined;
  species molecule_pyruvate_ATP_rheostatbiocrnpyler_745024_combined_model_of__biocrnpyler_715245_biocrnpyler_745024 in cell_1_internal_combined = 0;
  species complex_enzyme_pyk_2x_metabolite_adp_2x_molecule_pep_ATP_rheostatbiocrnpyler_745024_combined_model_of__biocrnpyler_715245_biocrnpyler_745024 in cell_1_internal_combined = 0;
  species complex_enzyme_pyk_2x_metabolite_atp_2x_molecule_pyruvate_ATP_rheostatbiocrnpyler_745024_combined_model_of__biocrnpyler_715245_biocrnpyler_745024 in cell_1_internal_combined = 0;
  species enzyme_alsS_ATP_rheostatbiocrnpyler_745024_combined_model_of__biocrnpyler_715245_biocrnpyler_745024 in cell_1_internal_combined = 0.2/cell_1_internal_combined;
  species molecule_acetolac_ATP_rheostatbiocrnpyler_745024_combined_model_of__biocrnpyler_715245_biocrnpyler_745024 in cell_1_internal_combined = 0;
  species complex_enzyme_alsS_2x_molecule_pyruvate_ATP_rheostatbiocrnpyler_745024_combined_model_of__biocrnpyler_715245_biocrnpyler_745024 in cell_1_internal_combined = 0;
  species complex_enzyme_alsS_molecule_acetolac_ATP_rheostatbiocrnpyler_745024_combined_model_of__biocrnpyler_715245_biocrnpyler_745024 in cell_1_internal_combined = 0;
  species enzyme_IlvC_ATP_rheostatbiocrnpyler_745024_combined_model_of__biocrnpyler_715245_biocrnpyler_745024 in cell_1_internal_combined = 0.2/cell_1_internal_combined;
  species molecule_23dih3mebut_ATP_rheostatbiocrnpyler_745024_combined_model_of__biocrnpyler_715245_biocrnpyler_745024 in cell_1_internal_combined = 0;
  species complex_enzyme_IlvC_metabolite_nadph_molecule_acetolac_ATP_rheostatbiocrnpyler_745024_combined_model_of__biocrnpyler_715245_biocrnpyler_745024 in cell_1_internal_combined = 0;
  species complex_enzyme_IlvC_metabolite_nadp_molecule_23dih3mebut_ATP_rheostatbiocrnpyler_745024_combined_model_of__biocrnpyler_715245_biocrnpyler_745024 in cell_1_internal_combined = 0;
  species enzyme_IlvD_ATP_rheostatbiocrnpyler_745024_combined_model_of__biocrnpyler_715245_biocrnpyler_745024 in cell_1_internal_combined = 0.2/cell_1_internal_combined;
  species molecule_3me2oxo_ATP_rheostatbiocrnpyler_745024_combined_model_of__biocrnpyler_715245_biocrnpyler_745024 in cell_1_internal_combined = 0;
  species complex_enzyme_IlvD_molecule_23dih3mebut_ATP_rheostatbiocrnpyler_745024_combined_model_of__biocrnpyler_715245_biocrnpyler_745024 in cell_1_internal_combined = 0;
  species complex_enzyme_IlvD_molecule_3me2oxo_ATP_rheostatbiocrnpyler_745024_combined_model_of__biocrnpyler_715245_biocrnpyler_745024 in cell_1_internal_combined = 0;
  species enzyme_kivD_ATP_rheostatbiocrnpyler_745024_combined_model_of__biocrnpyler_715245_biocrnpyler_745024 in cell_1_internal_combined = 0.2/cell_1_internal_combined;
  species molecule_isobutanal_ATP_rheostatbiocrnpyler_745024_combined_model_of__biocrnpyler_715245_biocrnpyler_745024 in cell_1_internal_combined = 0;
  species complex_enzyme_kivD_molecule_3me2oxo_ATP_rheostatbiocrnpyler_745024_combined_model_of__biocrnpyler_715245_biocrnpyler_745024 in cell_1_internal_combined = 0;
  species complex_enzyme_kivD_molecule_isobutanal_ATP_rheostatbiocrnpyler_745024_combined_model_of__biocrnpyler_715245_biocrnpyler_745024 in cell_1_internal_combined = 0;
  species enzyme_yahk_ATP_rheostatbiocrnpyler_745024_combined_model_of__biocrnpyler_715245_biocrnpyler_745024 in cell_1_internal_combined = 0.2/cell_1_internal_combined;
  species molecule_isobutanol_ATP_rheostatbiocrnpyler_745024_combined_model_of__biocrnpyler_715245_biocrnpyler_745024 in cell_1_internal_combined = 0;
  species complex_enzyme_yahk_metabolite_nadph_molecule_isobutanal_ATP_rheostatbiocrnpyler_745024_combined_model_of__biocrnpyler_715245_biocrnpyler_745024 in cell_1_internal_combined = 0;
  species complex_enzyme_yahk_metabolite_nadp_molecule_isobutanol_ATP_rheostatbiocrnpyler_745024_combined_model_of__biocrnpyler_715245_biocrnpyler_745024 in cell_1_internal_combined = 0;
  species enzyme_atp_use_ATP_rheostatbiocrnpyler_745024_combined_model_of__biocrnpyler_715245_biocrnpyler_745024 in cell_1_internal_combined = 0;
  species complex_enzyme_atp_use_metabolite_atp_ATP_rheostatbiocrnpyler_745024_combined_model_of__biocrnpyler_715245_biocrnpyler_745024 in cell_1_internal_combined = 0;
  species complex_enzyme_atp_use_metabolite_adp_metabolite_pi_ATP_rheostatbiocrnpyler_745024_combined_model_of__biocrnpyler_715245_biocrnpyler_745024 in cell_1_internal_combined = 0;

  // Parameters:
  kb = 0.002 per_second;
  kd = 1e-5 per_second;
  kb1 = 0.002 per_second;
  kd1 = 1e-5 per_second;
  kd2 = 0.0002 per_second;

  // Reactions:
  r1: atc_e_external_reservoir_model_1_combined -> atc_i_1_combined; kb*atc_e_external_reservoir_model_1_combined - kd*atc_i_1_combined;
  R1: VirE2_b_1_combined + ssDNA -> VirE2_b_ssDNA; kb1*VirE2_b_1_combined*ssDNA - kd1*VirE2_b_ssDNA;
  R2: VirE2_b_ssDNA => ssDNA_e + VirE2_b_1_combined; kd2*VirE2_b_ssDNA;
  r0_virE2biocrnpyler_715245_combined_model_of__biocrnpyler_715245_biocrnpyler_745024: atc_i_1_combined + tetR_virE2biocrnpyler_715245_combined_model_of__biocrnpyler_715245_biocrnpyler_745024 => complex_atc_i_tetR_virE2biocrnpyler_715245_combined_model_of__biocrnpyler_715245_biocrnpyler_745024; r0_virE2biocrnpyler_715245_combined_model_of__biocrnpyler_715245_biocrnpyler_745024_k*atc_i_1_combined*tetR_virE2biocrnpyler_715245_combined_model_of__biocrnpyler_715245_biocrnpyler_745024;
    r0_virE2biocrnpyler_715245_combined_model_of__biocrnpyler_715245_biocrnpyler_745024_k = 0.0002;
  r0_1_virE2biocrnpyler_715245_combined_model_of__biocrnpyler_715245_biocrnpyler_745024: complex_atc_i_tetR_virE2biocrnpyler_715245_combined_model_of__biocrnpyler_715245_biocrnpyler_745024 => atc_i_1_combined + tetR_virE2biocrnpyler_715245_combined_model_of__biocrnpyler_715245_biocrnpyler_745024; r0_1_virE2biocrnpyler_715245_combined_model_of__biocrnpyler_715245_biocrnpyler_745024_k*complex_atc_i_tetR_virE2biocrnpyler_715245_combined_model_of__biocrnpyler_715245_biocrnpyler_745024;
    r0_1_virE2biocrnpyler_715245_combined_model_of__biocrnpyler_715245_biocrnpyler_745024_k = 2e-9;
  r2_virE2biocrnpyler_715245_combined_model_of__biocrnpyler_715245_biocrnpyler_745024: dna_g_virE2biocrnpyler_715245_combined_model_of__biocrnpyler_715245_biocrnpyler_745024 + tetR_virE2biocrnpyler_715245_combined_model_of__biocrnpyler_715245_biocrnpyler_745024 => complex_dna_g_tetR_virE2biocrnpyler_715245_combined_model_of__biocrnpyler_715245_biocrnpyler_745024; r2_virE2biocrnpyler_715245_combined_model_of__biocrnpyler_715245_biocrnpyler_745024_k*dna_g_virE2biocrnpyler_715245_combined_model_of__biocrnpyler_715245_biocrnpyler_745024*tetR_virE2biocrnpyler_715245_combined_model_of__biocrnpyler_715245_biocrnpyler_745024;
    r2_virE2biocrnpyler_715245_combined_model_of__biocrnpyler_715245_biocrnpyler_745024_k = 4e-5;
  r2_1_virE2biocrnpyler_715245_combined_model_of__biocrnpyler_715245_biocrnpyler_745024: complex_dna_g_tetR_virE2biocrnpyler_715245_combined_model_of__biocrnpyler_715245_biocrnpyler_745024 => dna_g_virE2biocrnpyler_715245_combined_model_of__biocrnpyler_715245_biocrnpyler_745024 + tetR_virE2biocrnpyler_715245_combined_model_of__biocrnpyler_715245_biocrnpyler_745024; r2_1_virE2biocrnpyler_715245_combined_model_of__biocrnpyler_715245_biocrnpyler_745024_k*complex_dna_g_tetR_virE2biocrnpyler_715245_combined_model_of__biocrnpyler_715245_biocrnpyler_745024;
    r2_1_virE2biocrnpyler_715245_combined_model_of__biocrnpyler_715245_biocrnpyler_745024_k = 1e-12;
  r4_virE2biocrnpyler_715245_combined_model_of__biocrnpyler_715245_biocrnpyler_745024: complex_dna_g_tetR_virE2biocrnpyler_715245_combined_model_of__biocrnpyler_715245_biocrnpyler_745024 + atc_i_1_combined => complex_atc_i_dna_g_tetR_virE2biocrnpyler_715245_combined_model_of__biocrnpyler_715245_biocrnpyler_745024; r4_virE2biocrnpyler_715245_combined_model_of__biocrnpyler_715245_biocrnpyler_745024_k*complex_dna_g_tetR_virE2biocrnpyler_715245_combined_model_of__biocrnpyler_715245_biocrnpyler_745024*atc_i_1_combined;
    r4_virE2biocrnpyler_715245_combined_model_of__biocrnpyler_715245_biocrnpyler_745024_k = 6e-6;
  r4_1_virE2biocrnpyler_715245_combined_model_of__biocrnpyler_715245_biocrnpyler_745024: complex_atc_i_dna_g_tetR_virE2biocrnpyler_715245_combined_model_of__biocrnpyler_715245_biocrnpyler_745024 => complex_dna_g_tetR_virE2biocrnpyler_715245_combined_model_of__biocrnpyler_715245_biocrnpyler_745024 + atc_i_1_combined; r4_1_virE2biocrnpyler_715245_combined_model_of__biocrnpyler_715245_biocrnpyler_745024_k*complex_atc_i_dna_g_tetR_virE2biocrnpyler_715245_combined_model_of__biocrnpyler_715245_biocrnpyler_745024;
    r4_1_virE2biocrnpyler_715245_combined_model_of__biocrnpyler_715245_biocrnpyler_745024_k = 3e-9;
  r6_virE2biocrnpyler_715245_combined_model_of__biocrnpyler_715245_biocrnpyler_745024: complex_atc_i_dna_g_tetR_virE2biocrnpyler_715245_combined_model_of__biocrnpyler_715245_biocrnpyler_745024 => dna_g_virE2biocrnpyler_715245_combined_model_of__biocrnpyler_715245_biocrnpyler_745024 + complex_atc_i_tetR_virE2biocrnpyler_715245_combined_model_of__biocrnpyler_715245_biocrnpyler_745024; r6_virE2biocrnpyler_715245_combined_model_of__biocrnpyler_715245_biocrnpyler_745024_k*complex_atc_i_dna_g_tetR_virE2biocrnpyler_715245_combined_model_of__biocrnpyler_715245_biocrnpyler_745024;
    r6_virE2biocrnpyler_715245_combined_model_of__biocrnpyler_715245_biocrnpyler_745024_k = 0.005;
  r6_1_virE2biocrnpyler_715245_combined_model_of__biocrnpyler_715245_biocrnpyler_745024: dna_g_virE2biocrnpyler_715245_combined_model_of__biocrnpyler_715245_biocrnpyler_745024 + complex_atc_i_tetR_virE2biocrnpyler_715245_combined_model_of__biocrnpyler_715245_biocrnpyler_745024 => complex_atc_i_dna_g_tetR_virE2biocrnpyler_715245_combined_model_of__biocrnpyler_715245_biocrnpyler_745024; r6_1_virE2biocrnpyler_715245_combined_model_of__biocrnpyler_715245_biocrnpyler_745024_k*dna_g_virE2biocrnpyler_715245_combined_model_of__biocrnpyler_715245_biocrnpyler_745024*complex_atc_i_tetR_virE2biocrnpyler_715245_combined_model_of__biocrnpyler_715245_biocrnpyler_745024;
    r6_1_virE2biocrnpyler_715245_combined_model_of__biocrnpyler_715245_biocrnpyler_745024_k = 1e-10;
  r8_virE2biocrnpyler_715245_combined_model_of__biocrnpyler_715245_biocrnpyler_745024: dna_g_virE2biocrnpyler_715245_combined_model_of__biocrnpyler_715245_biocrnpyler_745024 => dna_g_virE2biocrnpyler_715245_combined_model_of__biocrnpyler_715245_biocrnpyler_745024 + rna_g_virE2biocrnpyler_715245_combined_model_of__biocrnpyler_715245_biocrnpyler_745024; r8_virE2biocrnpyler_715245_combined_model_of__biocrnpyler_715245_biocrnpyler_745024_k*dna_g_virE2biocrnpyler_715245_combined_model_of__biocrnpyler_715245_biocrnpyler_745024;
    r8_virE2biocrnpyler_715245_combined_model_of__biocrnpyler_715245_biocrnpyler_745024_k = 0.0031875;
  r9_virE2biocrnpyler_715245_combined_model_of__biocrnpyler_715245_biocrnpyler_745024: rna_g_virE2biocrnpyler_715245_combined_model_of__biocrnpyler_715245_biocrnpyler_745024 + ATP_virE2biocrnpyler_715245_1_combined_combined_model_of__biocrnpyler_715245_biocrnpyler_745024 => rna_g_virE2biocrnpyler_715245_combined_model_of__biocrnpyler_715245_biocrnpyler_745024 + ADP_virE2biocrnpyler_715245_1_combined_combined_model_of__biocrnpyler_715245_biocrnpyler_745024 + VirE2_f_virE2biocrnpyler_715245_combined_model_of__biocrnpyler_715245_biocrnpyler_745024 + P_virE2biocrnpyler_715245_1_combined_combined_model_of__biocrnpyler_715245_biocrnpyler_745024; r9_virE2biocrnpyler_715245_combined_model_of__biocrnpyler_715245_biocrnpyler_745024_k*rna_g_virE2biocrnpyler_715245_combined_model_of__biocrnpyler_715245_biocrnpyler_745024*ATP_virE2biocrnpyler_715245_1_combined_combined_model_of__biocrnpyler_715245_biocrnpyler_745024^r9_virE2biocrnpyler_715245_combined_model_of__biocrnpyler_715245_biocrnpyler_745024_n/(ATP_virE2biocrnpyler_715245_1_combined_combined_model_of__biocrnpyler_715245_biocrnpyler_745024^r9_virE2biocrnpyler_715245_combined_model_of__biocrnpyler_715245_biocrnpyler_745024_n + r9_virE2biocrnpyler_715245_combined_model_of__biocrnpyler_715245_biocrnpyler_745024_K);
    r9_virE2biocrnpyler_715245_combined_model_of__biocrnpyler_715245_biocrnpyler_745024_k = 0.001; r9_virE2biocrnpyler_715245_combined_model_of__biocrnpyler_715245_biocrnpyler_745024_n = 1; r9_virE2biocrnpyler_715245_combined_model_of__biocrnpyler_715245_biocrnpyler_745024_K = 1;
  r10_virE2biocrnpyler_715245_combined_model_of__biocrnpyler_715245_biocrnpyler_745024: VirE2_f_virE2biocrnpyler_715245_combined_model_of__biocrnpyler_715245_biocrnpyler_745024 => VirE2_b_1_combined; r10_virE2biocrnpyler_715245_combined_model_of__biocrnpyler_715245_biocrnpyler_745024_k*VirE2_f_virE2biocrnpyler_715245_combined_model_of__biocrnpyler_715245_biocrnpyler_745024/(VirE2_b_1_combined^r10_virE2biocrnpyler_715245_combined_model_of__biocrnpyler_715245_biocrnpyler_745024_n + r10_virE2biocrnpyler_715245_combined_model_of__biocrnpyler_715245_biocrnpyler_745024_K);
    r10_virE2biocrnpyler_715245_combined_model_of__biocrnpyler_715245_biocrnpyler_745024_k = 0.0005; r10_virE2biocrnpyler_715245_combined_model_of__biocrnpyler_715245_biocrnpyler_745024_n = 1; r10_virE2biocrnpyler_715245_combined_model_of__biocrnpyler_715245_biocrnpyler_745024_K = 1;
  r11_virE2biocrnpyler_715245_combined_model_of__biocrnpyler_715245_biocrnpyler_745024: rna_g_virE2biocrnpyler_715245_combined_model_of__biocrnpyler_715245_biocrnpyler_745024 => ; r11_virE2biocrnpyler_715245_combined_model_of__biocrnpyler_715245_biocrnpyler_745024_k*rna_g_virE2biocrnpyler_715245_combined_model_of__biocrnpyler_715245_biocrnpyler_745024;
    r11_virE2biocrnpyler_715245_combined_model_of__biocrnpyler_715245_biocrnpyler_745024_k = 0.001;
  r12_virE2biocrnpyler_715245_combined_model_of__biocrnpyler_715245_biocrnpyler_745024: VirE2_f_virE2biocrnpyler_715245_combined_model_of__biocrnpyler_715245_biocrnpyler_745024 => ; r12_virE2biocrnpyler_715245_combined_model_of__biocrnpyler_715245_biocrnpyler_745024_k*VirE2_f_virE2biocrnpyler_715245_combined_model_of__biocrnpyler_715245_biocrnpyler_745024;
    r12_virE2biocrnpyler_715245_combined_model_of__biocrnpyler_715245_biocrnpyler_745024_k = 1e-5;
  r0_ATP_rheostatbiocrnpyler_745024_combined_model_of__biocrnpyler_715245_biocrnpyler_745024: enzyme_hex_ATP_rheostatbiocrnpyler_745024_combined_model_of__biocrnpyler_715245_biocrnpyler_745024 + ATP_virE2biocrnpyler_715245_1_combined_combined_model_of__biocrnpyler_715245_biocrnpyler_745024 + molecule_glucose_ATP_rheostatbiocrnpyler_745024_combined_model_of__biocrnpyler_715245_biocrnpyler_745024 => complex_enzyme_hex_metabolite_atp_molecule_glucose_ATP_rheostatbiocrnpyler_745024_combined_model_of__biocrnpyler_715245_biocrnpyler_745024; r0_ATP_rheostatbiocrnpyler_745024_combined_model_of__biocrnpyler_715245_biocrnpyler_745024_k*enzyme_hex_ATP_rheostatbiocrnpyler_745024_combined_model_of__biocrnpyler_715245_biocrnpyler_745024*ATP_virE2biocrnpyler_715245_1_combined_combined_model_of__biocrnpyler_715245_biocrnpyler_745024*molecule_glucose_ATP_rheostatbiocrnpyler_745024_combined_model_of__biocrnpyler_715245_biocrnpyler_745024;
    r0_ATP_rheostatbiocrnpyler_745024_combined_model_of__biocrnpyler_715245_biocrnpyler_745024_k = 0.004166667;
  r0_1_ATP_rheostatbiocrnpyler_745024_combined_model_of__biocrnpyler_715245_biocrnpyler_745024: complex_enzyme_hex_metabolite_atp_molecule_glucose_ATP_rheostatbiocrnpyler_745024_combined_model_of__biocrnpyler_715245_biocrnpyler_745024 => enzyme_hex_ATP_rheostatbiocrnpyler_745024_combined_model_of__biocrnpyler_715245_biocrnpyler_745024 + ATP_virE2biocrnpyler_715245_1_combined_combined_model_of__biocrnpyler_715245_biocrnpyler_745024 + molecule_glucose_ATP_rheostatbiocrnpyler_745024_combined_model_of__biocrnpyler_715245_biocrnpyler_745024; r0_1_ATP_rheostatbiocrnpyler_745024_combined_model_of__biocrnpyler_715245_biocrnpyler_745024_k*complex_enzyme_hex_metabolite_atp_molecule_glucose_ATP_rheostatbiocrnpyler_745024_combined_model_of__biocrnpyler_715245_biocrnpyler_745024;
    r0_1_ATP_rheostatbiocrnpyler_745024_combined_model_of__biocrnpyler_715245_biocrnpyler_745024_k = 0.0004166667;
  r2_ATP_rheostatbiocrnpyler_745024_combined_model_of__biocrnpyler_715245_biocrnpyler_745024: complex_enzyme_hex_metabolite_atp_molecule_glucose_ATP_rheostatbiocrnpyler_745024_combined_model_of__biocrnpyler_715245_biocrnpyler_745024 => complex_enzyme_hex_metabolite_adp_molecule_g6p_ATP_rheostatbiocrnpyler_745024_combined_model_of__biocrnpyler_715245_biocrnpyler_745024; r2_ATP_rheostatbiocrnpyler_745024_combined_model_of__biocrnpyler_715245_biocrnpyler_745024_k*complex_enzyme_hex_metabolite_atp_molecule_glucose_ATP_rheostatbiocrnpyler_745024_combined_model_of__biocrnpyler_715245_biocrnpyler_745024;
    r2_ATP_rheostatbiocrnpyler_745024_combined_model_of__biocrnpyler_715245_biocrnpyler_745024_k = 36000;
  r3_ATP_rheostatbiocrnpyler_745024_combined_model_of__biocrnpyler_715245_biocrnpyler_745024: complex_enzyme_hex_metabolite_adp_molecule_g6p_ATP_rheostatbiocrnpyler_745024_combined_model_of__biocrnpyler_715245_biocrnpyler_745024 => enzyme_hex_ATP_rheostatbiocrnpyler_745024_combined_model_of__biocrnpyler_715245_biocrnpyler_745024 + molecule_g6p_ATP_rheostatbiocrnpyler_745024_combined_model_of__biocrnpyler_715245_biocrnpyler_745024 + ADP_virE2biocrnpyler_715245_1_combined_combined_model_of__biocrnpyler_715245_biocrnpyler_745024; r3_ATP_rheostatbiocrnpyler_745024_combined_model_of__biocrnpyler_715245_biocrnpyler_745024_k*complex_enzyme_hex_metabolite_adp_molecule_g6p_ATP_rheostatbiocrnpyler_745024_combined_model_of__biocrnpyler_715245_biocrnpyler_745024;
    r3_ATP_rheostatbiocrnpyler_745024_combined_model_of__biocrnpyler_715245_biocrnpyler_745024_k = 0.004166667;
  r3_1_ATP_rheostatbiocrnpyler_745024_combined_model_of__biocrnpyler_715245_biocrnpyler_745024: enzyme_hex_ATP_rheostatbiocrnpyler_745024_combined_model_of__biocrnpyler_715245_biocrnpyler_745024 + molecule_g6p_ATP_rheostatbiocrnpyler_745024_combined_model_of__biocrnpyler_715245_biocrnpyler_745024 + ADP_virE2biocrnpyler_715245_1_combined_combined_model_of__biocrnpyler_715245_biocrnpyler_745024 => complex_enzyme_hex_metabolite_adp_molecule_g6p_ATP_rheostatbiocrnpyler_745024_combined_model_of__biocrnpyler_715245_biocrnpyler_745024; r3_1_ATP_rheostatbiocrnpyler_745024_combined_model_of__biocrnpyler_715245_biocrnpyler_745024_k*enzyme_hex_ATP_rheostatbiocrnpyler_745024_combined_model_of__biocrnpyler_715245_biocrnpyler_745024*molecule_g6p_ATP_rheostatbiocrnpyler_745024_combined_model_of__biocrnpyler_715245_biocrnpyler_745024*ADP_virE2biocrnpyler_715245_1_combined_combined_model_of__biocrnpyler_715245_biocrnpyler_745024;
    r3_1_ATP_rheostatbiocrnpyler_745024_combined_model_of__biocrnpyler_715245_biocrnpyler_745024_k = 0.0004166667;
  r5_ATP_rheostatbiocrnpyler_745024_combined_model_of__biocrnpyler_715245_biocrnpyler_745024: enzyme_pgi_ATP_rheostatbiocrnpyler_745024_combined_model_of__biocrnpyler_715245_biocrnpyler_745024 + molecule_g6p_ATP_rheostatbiocrnpyler_745024_combined_model_of__biocrnpyler_715245_biocrnpyler_745024 => complex_enzyme_pgi_molecule_g6p_ATP_rheostatbiocrnpyler_745024_combined_model_of__biocrnpyler_715245_biocrnpyler_745024; r5_ATP_rheostatbiocrnpyler_745024_combined_model_of__biocrnpyler_715245_biocrnpyler_745024_k*enzyme_pgi_ATP_rheostatbiocrnpyler_745024_combined_model_of__biocrnpyler_715245_biocrnpyler_745024*molecule_g6p_ATP_rheostatbiocrnpyler_745024_combined_model_of__biocrnpyler_715245_biocrnpyler_745024;
    r5_ATP_rheostatbiocrnpyler_745024_combined_model_of__biocrnpyler_715245_biocrnpyler_745024_k = 0.004166667;
  r5_1_ATP_rheostatbiocrnpyler_745024_combined_model_of__biocrnpyler_715245_biocrnpyler_745024: complex_enzyme_pgi_molecule_g6p_ATP_rheostatbiocrnpyler_745024_combined_model_of__biocrnpyler_715245_biocrnpyler_745024 => enzyme_pgi_ATP_rheostatbiocrnpyler_745024_combined_model_of__biocrnpyler_715245_biocrnpyler_745024 + molecule_g6p_ATP_rheostatbiocrnpyler_745024_combined_model_of__biocrnpyler_715245_biocrnpyler_745024; r5_1_ATP_rheostatbiocrnpyler_745024_combined_model_of__biocrnpyler_715245_biocrnpyler_745024_k*complex_enzyme_pgi_molecule_g6p_ATP_rheostatbiocrnpyler_745024_combined_model_of__biocrnpyler_715245_biocrnpyler_745024;
    r5_1_ATP_rheostatbiocrnpyler_745024_combined_model_of__biocrnpyler_715245_biocrnpyler_745024_k = 0.0004166667;
  r7_ATP_rheostatbiocrnpyler_745024_combined_model_of__biocrnpyler_715245_biocrnpyler_745024: complex_enzyme_pgi_molecule_g6p_ATP_rheostatbiocrnpyler_745024_combined_model_of__biocrnpyler_715245_biocrnpyler_745024 => complex_enzyme_pgi_molecule_f6p_ATP_rheostatbiocrnpyler_745024_combined_model_of__biocrnpyler_715245_biocrnpyler_745024; r7_ATP_rheostatbiocrnpyler_745024_combined_model_of__biocrnpyler_715245_biocrnpyler_745024_k*complex_enzyme_pgi_molecule_g6p_ATP_rheostatbiocrnpyler_745024_combined_model_of__biocrnpyler_715245_biocrnpyler_745024;
    r7_ATP_rheostatbiocrnpyler_745024_combined_model_of__biocrnpyler_715245_biocrnpyler_745024_k = 36000;
  r8_ATP_rheostatbiocrnpyler_745024_combined_model_of__biocrnpyler_715245_biocrnpyler_745024: complex_enzyme_pgi_molecule_f6p_ATP_rheostatbiocrnpyler_745024_combined_model_of__biocrnpyler_715245_biocrnpyler_745024 => enzyme_pgi_ATP_rheostatbiocrnpyler_745024_combined_model_of__biocrnpyler_715245_biocrnpyler_745024 + molecule_f6p_ATP_rheostatbiocrnpyler_745024_combined_model_of__biocrnpyler_715245_biocrnpyler_745024; r8_ATP_rheostatbiocrnpyler_745024_combined_model_of__biocrnpyler_715245_biocrnpyler_745024_k*complex_enzyme_pgi_molecule_f6p_ATP_rheostatbiocrnpyler_745024_combined_model_of__biocrnpyler_715245_biocrnpyler_745024;
    r8_ATP_rheostatbiocrnpyler_745024_combined_model_of__biocrnpyler_715245_biocrnpyler_745024_k = 0.004166667;
  r8_1_ATP_rheostatbiocrnpyler_745024_combined_model_of__biocrnpyler_715245_biocrnpyler_745024: enzyme_pgi_ATP_rheostatbiocrnpyler_745024_combined_model_of__biocrnpyler_715245_biocrnpyler_745024 + molecule_f6p_ATP_rheostatbiocrnpyler_745024_combined_model_of__biocrnpyler_715245_biocrnpyler_745024 => complex_enzyme_pgi_molecule_f6p_ATP_rheostatbiocrnpyler_745024_combined_model_of__biocrnpyler_715245_biocrnpyler_745024; r8_1_ATP_rheostatbiocrnpyler_745024_combined_model_of__biocrnpyler_715245_biocrnpyler_745024_k*enzyme_pgi_ATP_rheostatbiocrnpyler_745024_combined_model_of__biocrnpyler_715245_biocrnpyler_745024*molecule_f6p_ATP_rheostatbiocrnpyler_745024_combined_model_of__biocrnpyler_715245_biocrnpyler_745024;
    r8_1_ATP_rheostatbiocrnpyler_745024_combined_model_of__biocrnpyler_715245_biocrnpyler_745024_k = 0.0004166667;
  r10_ATP_rheostatbiocrnpyler_745024_combined_model_of__biocrnpyler_715245_biocrnpyler_745024: enzyme_pfk_ATP_rheostatbiocrnpyler_745024_combined_model_of__biocrnpyler_715245_biocrnpyler_745024 + ATP_virE2biocrnpyler_715245_1_combined_combined_model_of__biocrnpyler_715245_biocrnpyler_745024 + molecule_f6p_ATP_rheostatbiocrnpyler_745024_combined_model_of__biocrnpyler_715245_biocrnpyler_745024 => complex_enzyme_pfk_metabolite_atp_molecule_f6p_ATP_rheostatbiocrnpyler_745024_combined_model_of__biocrnpyler_715245_biocrnpyler_745024; r10_ATP_rheostatbiocrnpyler_745024_combined_model_of__biocrnpyler_715245_biocrnpyler_745024_k*enzyme_pfk_ATP_rheostatbiocrnpyler_745024_combined_model_of__biocrnpyler_715245_biocrnpyler_745024*ATP_virE2biocrnpyler_715245_1_combined_combined_model_of__biocrnpyler_715245_biocrnpyler_745024*molecule_f6p_ATP_rheostatbiocrnpyler_745024_combined_model_of__biocrnpyler_715245_biocrnpyler_745024;
    r10_ATP_rheostatbiocrnpyler_745024_combined_model_of__biocrnpyler_715245_biocrnpyler_745024_k = 0.004166667;
  r10_1_ATP_rheostatbiocrnpyler_745024_combined_model_of__biocrnpyler_715245_biocrnpyler_745024: complex_enzyme_pfk_metabolite_atp_molecule_f6p_ATP_rheostatbiocrnpyler_745024_combined_model_of__biocrnpyler_715245_biocrnpyler_745024 => enzyme_pfk_ATP_rheostatbiocrnpyler_745024_combined_model_of__biocrnpyler_715245_biocrnpyler_745024 + ATP_virE2biocrnpyler_715245_1_combined_combined_model_of__biocrnpyler_715245_biocrnpyler_745024 + molecule_f6p_ATP_rheostatbiocrnpyler_745024_combined_model_of__biocrnpyler_715245_biocrnpyler_745024; r10_1_ATP_rheostatbiocrnpyler_745024_combined_model_of__biocrnpyler_715245_biocrnpyler_745024_k*complex_enzyme_pfk_metabolite_atp_molecule_f6p_ATP_rheostatbiocrnpyler_745024_combined_model_of__biocrnpyler_715245_biocrnpyler_745024;
    r10_1_ATP_rheostatbiocrnpyler_745024_combined_model_of__biocrnpyler_715245_biocrnpyler_745024_k = 0.0004166667;
  r12_ATP_rheostatbiocrnpyler_745024_combined_model_of__biocrnpyler_715245_biocrnpyler_745024: complex_enzyme_pfk_metabolite_atp_molecule_f6p_ATP_rheostatbiocrnpyler_745024_combined_model_of__biocrnpyler_715245_biocrnpyler_745024 => complex_enzyme_pfk_metabolite_adp_molecule_f16p_ATP_rheostatbiocrnpyler_745024_combined_model_of__biocrnpyler_715245_biocrnpyler_745024; r12_ATP_rheostatbiocrnpyler_745024_combined_model_of__biocrnpyler_715245_biocrnpyler_745024_k*complex_enzyme_pfk_metabolite_atp_molecule_f6p_ATP_rheostatbiocrnpyler_745024_combined_model_of__biocrnpyler_715245_biocrnpyler_745024;
    r12_ATP_rheostatbiocrnpyler_745024_combined_model_of__biocrnpyler_715245_biocrnpyler_745024_k = 36000;
  r13_ATP_rheostatbiocrnpyler_745024_combined_model_of__biocrnpyler_715245_biocrnpyler_745024: complex_enzyme_pfk_metabolite_adp_molecule_f16p_ATP_rheostatbiocrnpyler_745024_combined_model_of__biocrnpyler_715245_biocrnpyler_745024 => enzyme_pfk_ATP_rheostatbiocrnpyler_745024_combined_model_of__biocrnpyler_715245_biocrnpyler_745024 + molecule_f16p_ATP_rheostatbiocrnpyler_745024_combined_model_of__biocrnpyler_715245_biocrnpyler_745024 + ADP_virE2biocrnpyler_715245_1_combined_combined_model_of__biocrnpyler_715245_biocrnpyler_745024; r13_ATP_rheostatbiocrnpyler_745024_combined_model_of__biocrnpyler_715245_biocrnpyler_745024_k*complex_enzyme_pfk_metabolite_adp_molecule_f16p_ATP_rheostatbiocrnpyler_745024_combined_model_of__biocrnpyler_715245_biocrnpyler_745024;
    r13_ATP_rheostatbiocrnpyler_745024_combined_model_of__biocrnpyler_715245_biocrnpyler_745024_k = 0.004166667;
  r13_1_ATP_rheostatbiocrnpyler_745024_combined_model_of__biocrnpyler_715245_biocrnpyler_745024: enzyme_pfk_ATP_rheostatbiocrnpyler_745024_combined_model_of__biocrnpyler_715245_biocrnpyler_745024 + molecule_f16p_ATP_rheostatbiocrnpyler_745024_combined_model_of__biocrnpyler_715245_biocrnpyler_745024 + ADP_virE2biocrnpyler_715245_1_combined_combined_model_of__biocrnpyler_715245_biocrnpyler_745024 => complex_enzyme_pfk_metabolite_adp_molecule_f16p_ATP_rheostatbiocrnpyler_745024_combined_model_of__biocrnpyler_715245_biocrnpyler_745024; r13_1_ATP_rheostatbiocrnpyler_745024_combined_model_of__biocrnpyler_715245_biocrnpyler_745024_k*enzyme_pfk_ATP_rheostatbiocrnpyler_745024_combined_model_of__biocrnpyler_715245_biocrnpyler_745024*molecule_f16p_ATP_rheostatbiocrnpyler_745024_combined_model_of__biocrnpyler_715245_biocrnpyler_745024*ADP_virE2biocrnpyler_715245_1_combined_combined_model_of__biocrnpyler_715245_biocrnpyler_745024;
    r13_1_ATP_rheostatbiocrnpyler_745024_combined_model_of__biocrnpyler_715245_biocrnpyler_745024_k = 0.0004166667;
  r15_ATP_rheostatbiocrnpyler_745024_combined_model_of__biocrnpyler_715245_biocrnpyler_745024: enzyme_ald_tpi_ATP_rheostatbiocrnpyler_745024_combined_model_of__biocrnpyler_715245_biocrnpyler_745024 + molecule_f16p_ATP_rheostatbiocrnpyler_745024_combined_model_of__biocrnpyler_715245_biocrnpyler_745024 => complex_enzyme_ald_tpi_molecule_f16p_ATP_rheostatbiocrnpyler_745024_combined_model_of__biocrnpyler_715245_biocrnpyler_745024; r15_ATP_rheostatbiocrnpyler_745024_combined_model_of__biocrnpyler_715245_biocrnpyler_745024_k*enzyme_ald_tpi_ATP_rheostatbiocrnpyler_745024_combined_model_of__biocrnpyler_715245_biocrnpyler_745024*molecule_f16p_ATP_rheostatbiocrnpyler_745024_combined_model_of__biocrnpyler_715245_biocrnpyler_745024;
    r15_ATP_rheostatbiocrnpyler_745024_combined_model_of__biocrnpyler_715245_biocrnpyler_745024_k = 0.004166667;
  r15_1_ATP_rheostatbiocrnpyler_745024_combined_model_of__biocrnpyler_715245_biocrnpyler_745024: complex_enzyme_ald_tpi_molecule_f16p_ATP_rheostatbiocrnpyler_745024_combined_model_of__biocrnpyler_715245_biocrnpyler_745024 => enzyme_ald_tpi_ATP_rheostatbiocrnpyler_745024_combined_model_of__biocrnpyler_715245_biocrnpyler_745024 + molecule_f16p_ATP_rheostatbiocrnpyler_745024_combined_model_of__biocrnpyler_715245_biocrnpyler_745024; r15_1_ATP_rheostatbiocrnpyler_745024_combined_model_of__biocrnpyler_715245_biocrnpyler_745024_k*complex_enzyme_ald_tpi_molecule_f16p_ATP_rheostatbiocrnpyler_745024_combined_model_of__biocrnpyler_715245_biocrnpyler_745024;
    r15_1_ATP_rheostatbiocrnpyler_745024_combined_model_of__biocrnpyler_715245_biocrnpyler_745024_k = 0.0004166667;
  r17_ATP_rheostatbiocrnpyler_745024_combined_model_of__biocrnpyler_715245_biocrnpyler_745024: complex_enzyme_ald_tpi_molecule_f16p_ATP_rheostatbiocrnpyler_745024_combined_model_of__biocrnpyler_715245_biocrnpyler_745024 => complex_enzyme_ald_tpi_2x_molecule_g3p_ATP_rheostatbiocrnpyler_745024_combined_model_of__biocrnpyler_715245_biocrnpyler_745024; r17_ATP_rheostatbiocrnpyler_745024_combined_model_of__biocrnpyler_715245_biocrnpyler_745024_k*complex_enzyme_ald_tpi_molecule_f16p_ATP_rheostatbiocrnpyler_745024_combined_model_of__biocrnpyler_715245_biocrnpyler_745024;
    r17_ATP_rheostatbiocrnpyler_745024_combined_model_of__biocrnpyler_715245_biocrnpyler_745024_k = 36000;
  r18_ATP_rheostatbiocrnpyler_745024_combined_model_of__biocrnpyler_715245_biocrnpyler_745024: complex_enzyme_ald_tpi_2x_molecule_g3p_ATP_rheostatbiocrnpyler_745024_combined_model_of__biocrnpyler_715245_biocrnpyler_745024 => enzyme_ald_tpi_ATP_rheostatbiocrnpyler_745024_combined_model_of__biocrnpyler_715245_biocrnpyler_745024 + 2 molecule_g3p_ATP_rheostatbiocrnpyler_745024_combined_model_of__biocrnpyler_715245_biocrnpyler_745024; r18_ATP_rheostatbiocrnpyler_745024_combined_model_of__biocrnpyler_715245_biocrnpyler_745024_k*complex_enzyme_ald_tpi_2x_molecule_g3p_ATP_rheostatbiocrnpyler_745024_combined_model_of__biocrnpyler_715245_biocrnpyler_745024;
    r18_ATP_rheostatbiocrnpyler_745024_combined_model_of__biocrnpyler_715245_biocrnpyler_745024_k = 0.004166667;
  r18_1_ATP_rheostatbiocrnpyler_745024_combined_model_of__biocrnpyler_715245_biocrnpyler_745024: enzyme_ald_tpi_ATP_rheostatbiocrnpyler_745024_combined_model_of__biocrnpyler_715245_biocrnpyler_745024 + 2 molecule_g3p_ATP_rheostatbiocrnpyler_745024_combined_model_of__biocrnpyler_715245_biocrnpyler_745024 => complex_enzyme_ald_tpi_2x_molecule_g3p_ATP_rheostatbiocrnpyler_745024_combined_model_of__biocrnpyler_715245_biocrnpyler_745024; r18_1_ATP_rheostatbiocrnpyler_745024_combined_model_of__biocrnpyler_715245_biocrnpyler_745024_k*enzyme_ald_tpi_ATP_rheostatbiocrnpyler_745024_combined_model_of__biocrnpyler_715245_biocrnpyler_745024*molecule_g3p_ATP_rheostatbiocrnpyler_745024_combined_model_of__biocrnpyler_715245_biocrnpyler_745024^2;
    r18_1_ATP_rheostatbiocrnpyler_745024_combined_model_of__biocrnpyler_715245_biocrnpyler_745024_k = 0.0004166667;
  r20_ATP_rheostatbiocrnpyler_745024_combined_model_of__biocrnpyler_715245_biocrnpyler_745024: enzyme_gapN_ATP_rheostatbiocrnpyler_745024_combined_model_of__biocrnpyler_715245_biocrnpyler_745024 + 2 metabolite_nadp_ATP_rheostatbiocrnpyler_745024_combined_model_of__biocrnpyler_715245_biocrnpyler_745024 + 2 molecule_g3p_ATP_rheostatbiocrnpyler_745024_combined_model_of__biocrnpyler_715245_biocrnpyler_745024 => complex_enzyme_gapN_2x_metabolite_nadp_2x_molecule_g3p_ATP_rheostatbiocrnpyler_745024_combined_model_of__biocrnpyler_715245_biocrnpyler_745024; r20_ATP_rheostatbiocrnpyler_745024_combined_model_of__biocrnpyler_715245_biocrnpyler_745024_k*enzyme_gapN_ATP_rheostatbiocrnpyler_745024_combined_model_of__biocrnpyler_715245_biocrnpyler_745024*metabolite_nadp_ATP_rheostatbiocrnpyler_745024_combined_model_of__biocrnpyler_715245_biocrnpyler_745024^2*molecule_g3p_ATP_rheostatbiocrnpyler_745024_combined_model_of__biocrnpyler_715245_biocrnpyler_745024^2;
    r20_ATP_rheostatbiocrnpyler_745024_combined_model_of__biocrnpyler_715245_biocrnpyler_745024_k = 0.004166667;
  r20_1_ATP_rheostatbiocrnpyler_745024_combined_model_of__biocrnpyler_715245_biocrnpyler_745024: complex_enzyme_gapN_2x_metabolite_nadp_2x_molecule_g3p_ATP_rheostatbiocrnpyler_745024_combined_model_of__biocrnpyler_715245_biocrnpyler_745024 => enzyme_gapN_ATP_rheostatbiocrnpyler_745024_combined_model_of__biocrnpyler_715245_biocrnpyler_745024 + 2 metabolite_nadp_ATP_rheostatbiocrnpyler_745024_combined_model_of__biocrnpyler_715245_biocrnpyler_745024 + 2 molecule_g3p_ATP_rheostatbiocrnpyler_745024_combined_model_of__biocrnpyler_715245_biocrnpyler_745024; r20_1_ATP_rheostatbiocrnpyler_745024_combined_model_of__biocrnpyler_715245_biocrnpyler_745024_k*complex_enzyme_gapN_2x_metabolite_nadp_2x_molecule_g3p_ATP_rheostatbiocrnpyler_745024_combined_model_of__biocrnpyler_715245_biocrnpyler_745024;
    r20_1_ATP_rheostatbiocrnpyler_745024_combined_model_of__biocrnpyler_715245_biocrnpyler_745024_k = 0.0004166667;
  r22_ATP_rheostatbiocrnpyler_745024_combined_model_of__biocrnpyler_715245_biocrnpyler_745024: complex_enzyme_gapN_2x_metabolite_nadp_2x_molecule_g3p_ATP_rheostatbiocrnpyler_745024_combined_model_of__biocrnpyler_715245_biocrnpyler_745024 => complex_enzyme_gapN_2x_metabolite_nadph_2x_molecule_3pg_ATP_rheostatbiocrnpyler_745024_combined_model_of__biocrnpyler_715245_biocrnpyler_745024; r22_ATP_rheostatbiocrnpyler_745024_combined_model_of__biocrnpyler_715245_biocrnpyler_745024_k*complex_enzyme_gapN_2x_metabolite_nadp_2x_molecule_g3p_ATP_rheostatbiocrnpyler_745024_combined_model_of__biocrnpyler_715245_biocrnpyler_745024;
    r22_ATP_rheostatbiocrnpyler_745024_combined_model_of__biocrnpyler_715245_biocrnpyler_745024_k = 36000;
  r23_ATP_rheostatbiocrnpyler_745024_combined_model_of__biocrnpyler_715245_biocrnpyler_745024: complex_enzyme_gapN_2x_metabolite_nadph_2x_molecule_3pg_ATP_rheostatbiocrnpyler_745024_combined_model_of__biocrnpyler_715245_biocrnpyler_745024 => enzyme_gapN_ATP_rheostatbiocrnpyler_745024_combined_model_of__biocrnpyler_715245_biocrnpyler_745024 + 2 molecule_3pg_ATP_rheostatbiocrnpyler_745024_combined_model_of__biocrnpyler_715245_biocrnpyler_745024 + 2 metabolite_nadph_ATP_rheostatbiocrnpyler_745024_combined_model_of__biocrnpyler_715245_biocrnpyler_745024; r23_ATP_rheostatbiocrnpyler_745024_combined_model_of__biocrnpyler_715245_biocrnpyler_745024_k*complex_enzyme_gapN_2x_metabolite_nadph_2x_molecule_3pg_ATP_rheostatbiocrnpyler_745024_combined_model_of__biocrnpyler_715245_biocrnpyler_745024;
    r23_ATP_rheostatbiocrnpyler_745024_combined_model_of__biocrnpyler_715245_biocrnpyler_745024_k = 0.004166667;
  r23_1_ATP_rheostatbiocrnpyler_745024_combined_model_of__biocrnpyler_715245_biocrnpyler_745024: enzyme_gapN_ATP_rheostatbiocrnpyler_745024_combined_model_of__biocrnpyler_715245_biocrnpyler_745024 + 2 molecule_3pg_ATP_rheostatbiocrnpyler_745024_combined_model_of__biocrnpyler_715245_biocrnpyler_745024 + 2 metabolite_nadph_ATP_rheostatbiocrnpyler_745024_combined_model_of__biocrnpyler_715245_biocrnpyler_745024 => complex_enzyme_gapN_2x_metabolite_nadph_2x_molecule_3pg_ATP_rheostatbiocrnpyler_745024_combined_model_of__biocrnpyler_715245_biocrnpyler_745024; r23_1_ATP_rheostatbiocrnpyler_745024_combined_model_of__biocrnpyler_715245_biocrnpyler_745024_k*enzyme_gapN_ATP_rheostatbiocrnpyler_745024_combined_model_of__biocrnpyler_715245_biocrnpyler_745024*molecule_3pg_ATP_rheostatbiocrnpyler_745024_combined_model_of__biocrnpyler_715245_biocrnpyler_745024^2*metabolite_nadph_ATP_rheostatbiocrnpyler_745024_combined_model_of__biocrnpyler_715245_biocrnpyler_745024^2;
    r23_1_ATP_rheostatbiocrnpyler_745024_combined_model_of__biocrnpyler_715245_biocrnpyler_745024_k = 0.0004166667;
  r25_ATP_rheostatbiocrnpyler_745024_combined_model_of__biocrnpyler_715245_biocrnpyler_745024: enzyme_mGapDH_ATP_rheostatbiocrnpyler_745024_combined_model_of__biocrnpyler_715245_biocrnpyler_745024 + P_virE2biocrnpyler_715245_1_combined_combined_model_of__biocrnpyler_715245_biocrnpyler_745024 + 2 metabolite_nadp_ATP_rheostatbiocrnpyler_745024_combined_model_of__biocrnpyler_715245_biocrnpyler_745024 + 2 molecule_g3p_ATP_rheostatbiocrnpyler_745024_combined_model_of__biocrnpyler_715245_biocrnpyler_745024 => complex_enzyme_mGapDH_2x_metabolite_nadp_metabolite_pi_2x_molecule_g3p_ATP_rheostatbiocrnpyler_745024_combined_model_of__biocrnpyler_715245_biocrnpyler_745024; r25_ATP_rheostatbiocrnpyler_745024_combined_model_of__biocrnpyler_715245_biocrnpyler_745024_k*enzyme_mGapDH_ATP_rheostatbiocrnpyler_745024_combined_model_of__biocrnpyler_715245_biocrnpyler_745024*P_virE2biocrnpyler_715245_1_combined_combined_model_of__biocrnpyler_715245_biocrnpyler_745024*metabolite_nadp_ATP_rheostatbiocrnpyler_745024_combined_model_of__biocrnpyler_715245_biocrnpyler_745024^2*molecule_g3p_ATP_rheostatbiocrnpyler_745024_combined_model_of__biocrnpyler_715245_biocrnpyler_745024^2;
    r25_ATP_rheostatbiocrnpyler_745024_combined_model_of__biocrnpyler_715245_biocrnpyler_745024_k = 0.004166667;
  r25_1_ATP_rheostatbiocrnpyler_745024_combined_model_of__biocrnpyler_715245_biocrnpyler_745024: complex_enzyme_mGapDH_2x_metabolite_nadp_metabolite_pi_2x_molecule_g3p_ATP_rheostatbiocrnpyler_745024_combined_model_of__biocrnpyler_715245_biocrnpyler_745024 => enzyme_mGapDH_ATP_rheostatbiocrnpyler_745024_combined_model_of__biocrnpyler_715245_biocrnpyler_745024 + P_virE2biocrnpyler_715245_1_combined_combined_model_of__biocrnpyler_715245_biocrnpyler_745024 + 2 metabolite_nadp_ATP_rheostatbiocrnpyler_745024_combined_model_of__biocrnpyler_715245_biocrnpyler_745024 + 2 molecule_g3p_ATP_rheostatbiocrnpyler_745024_combined_model_of__biocrnpyler_715245_biocrnpyler_745024; r25_1_ATP_rheostatbiocrnpyler_745024_combined_model_of__biocrnpyler_715245_biocrnpyler_745024_k*complex_enzyme_mGapDH_2x_metabolite_nadp_metabolite_pi_2x_molecule_g3p_ATP_rheostatbiocrnpyler_745024_combined_model_of__biocrnpyler_715245_biocrnpyler_745024;
    r25_1_ATP_rheostatbiocrnpyler_745024_combined_model_of__biocrnpyler_715245_biocrnpyler_745024_k = 0.0004166667;
  r27_ATP_rheostatbiocrnpyler_745024_combined_model_of__biocrnpyler_715245_biocrnpyler_745024: complex_enzyme_mGapDH_2x_metabolite_nadp_metabolite_pi_2x_molecule_g3p_ATP_rheostatbiocrnpyler_745024_combined_model_of__biocrnpyler_715245_biocrnpyler_745024 => complex_enzyme_mGapDH_2x_metabolite_nadph_molecule_13bpg_ATP_rheostatbiocrnpyler_745024_combined_model_of__biocrnpyler_715245_biocrnpyler_745024; r27_ATP_rheostatbiocrnpyler_745024_combined_model_of__biocrnpyler_715245_biocrnpyler_745024_k*complex_enzyme_mGapDH_2x_metabolite_nadp_metabolite_pi_2x_molecule_g3p_ATP_rheostatbiocrnpyler_745024_combined_model_of__biocrnpyler_715245_biocrnpyler_745024;
    r27_ATP_rheostatbiocrnpyler_745024_combined_model_of__biocrnpyler_715245_biocrnpyler_745024_k = 36000;
  r28_ATP_rheostatbiocrnpyler_745024_combined_model_of__biocrnpyler_715245_biocrnpyler_745024: complex_enzyme_mGapDH_2x_metabolite_nadph_molecule_13bpg_ATP_rheostatbiocrnpyler_745024_combined_model_of__biocrnpyler_715245_biocrnpyler_745024 => enzyme_mGapDH_ATP_rheostatbiocrnpyler_745024_combined_model_of__biocrnpyler_715245_biocrnpyler_745024 + molecule_13bpg_ATP_rheostatbiocrnpyler_745024_combined_model_of__biocrnpyler_715245_biocrnpyler_745024 + 2 metabolite_nadph_ATP_rheostatbiocrnpyler_745024_combined_model_of__biocrnpyler_715245_biocrnpyler_745024; r28_ATP_rheostatbiocrnpyler_745024_combined_model_of__biocrnpyler_715245_biocrnpyler_745024_k*complex_enzyme_mGapDH_2x_metabolite_nadph_molecule_13bpg_ATP_rheostatbiocrnpyler_745024_combined_model_of__biocrnpyler_715245_biocrnpyler_745024;
    r28_ATP_rheostatbiocrnpyler_745024_combined_model_of__biocrnpyler_715245_biocrnpyler_745024_k = 0.004166667;
  r28_1_ATP_rheostatbiocrnpyler_745024_combined_model_of__biocrnpyler_715245_biocrnpyler_745024: enzyme_mGapDH_ATP_rheostatbiocrnpyler_745024_combined_model_of__biocrnpyler_715245_biocrnpyler_745024 + molecule_13bpg_ATP_rheostatbiocrnpyler_745024_combined_model_of__biocrnpyler_715245_biocrnpyler_745024 + 2 metabolite_nadph_ATP_rheostatbiocrnpyler_745024_combined_model_of__biocrnpyler_715245_biocrnpyler_745024 => complex_enzyme_mGapDH_2x_metabolite_nadph_molecule_13bpg_ATP_rheostatbiocrnpyler_745024_combined_model_of__biocrnpyler_715245_biocrnpyler_745024; r28_1_ATP_rheostatbiocrnpyler_745024_combined_model_of__biocrnpyler_715245_biocrnpyler_745024_k*enzyme_mGapDH_ATP_rheostatbiocrnpyler_745024_combined_model_of__biocrnpyler_715245_biocrnpyler_745024*molecule_13bpg_ATP_rheostatbiocrnpyler_745024_combined_model_of__biocrnpyler_715245_biocrnpyler_745024*metabolite_nadph_ATP_rheostatbiocrnpyler_745024_combined_model_of__biocrnpyler_715245_biocrnpyler_745024^2;
    r28_1_ATP_rheostatbiocrnpyler_745024_combined_model_of__biocrnpyler_715245_biocrnpyler_745024_k = 0.0004166667;
  r30_ATP_rheostatbiocrnpyler_745024_combined_model_of__biocrnpyler_715245_biocrnpyler_745024: enzyme_pgk_ATP_rheostatbiocrnpyler_745024_combined_model_of__biocrnpyler_715245_biocrnpyler_745024 + ADP_virE2biocrnpyler_715245_1_combined_combined_model_of__biocrnpyler_715245_biocrnpyler_745024 + molecule_13bpg_ATP_rheostatbiocrnpyler_745024_combined_model_of__biocrnpyler_715245_biocrnpyler_745024 => complex_enzyme_pgk_metabolite_adp_molecule_13bpg_ATP_rheostatbiocrnpyler_745024_combined_model_of__biocrnpyler_715245_biocrnpyler_745024; r30_ATP_rheostatbiocrnpyler_745024_combined_model_of__biocrnpyler_715245_biocrnpyler_745024_k*enzyme_pgk_ATP_rheostatbiocrnpyler_745024_combined_model_of__biocrnpyler_715245_biocrnpyler_745024*ADP_virE2biocrnpyler_715245_1_combined_combined_model_of__biocrnpyler_715245_biocrnpyler_745024*molecule_13bpg_ATP_rheostatbiocrnpyler_745024_combined_model_of__biocrnpyler_715245_biocrnpyler_745024;
    r30_ATP_rheostatbiocrnpyler_745024_combined_model_of__biocrnpyler_715245_biocrnpyler_745024_k = 0.004166667;
  r30_1_ATP_rheostatbiocrnpyler_745024_combined_model_of__biocrnpyler_715245_biocrnpyler_745024: complex_enzyme_pgk_metabolite_adp_molecule_13bpg_ATP_rheostatbiocrnpyler_745024_combined_model_of__biocrnpyler_715245_biocrnpyler_745024 => enzyme_pgk_ATP_rheostatbiocrnpyler_745024_combined_model_of__biocrnpyler_715245_biocrnpyler_745024 + ADP_virE2biocrnpyler_715245_1_combined_combined_model_of__biocrnpyler_715245_biocrnpyler_745024 + molecule_13bpg_ATP_rheostatbiocrnpyler_745024_combined_model_of__biocrnpyler_715245_biocrnpyler_745024; r30_1_ATP_rheostatbiocrnpyler_745024_combined_model_of__biocrnpyler_715245_biocrnpyler_745024_k*complex_enzyme_pgk_metabolite_adp_molecule_13bpg_ATP_rheostatbiocrnpyler_745024_combined_model_of__biocrnpyler_715245_biocrnpyler_745024;
    r30_1_ATP_rheostatbiocrnpyler_745024_combined_model_of__biocrnpyler_715245_biocrnpyler_745024_k = 0.0004166667;
  r32_ATP_rheostatbiocrnpyler_745024_combined_model_of__biocrnpyler_715245_biocrnpyler_745024: complex_enzyme_pgk_metabolite_adp_molecule_13bpg_ATP_rheostatbiocrnpyler_745024_combined_model_of__biocrnpyler_715245_biocrnpyler_745024 => complex_enzyme_pgk_metabolite_atp_2x_molecule_3pg_ATP_rheostatbiocrnpyler_745024_combined_model_of__biocrnpyler_715245_biocrnpyler_745024; r32_ATP_rheostatbiocrnpyler_745024_combined_model_of__biocrnpyler_715245_biocrnpyler_745024_k*complex_enzyme_pgk_metabolite_adp_molecule_13bpg_ATP_rheostatbiocrnpyler_745024_combined_model_of__biocrnpyler_715245_biocrnpyler_745024;
    r32_ATP_rheostatbiocrnpyler_745024_combined_model_of__biocrnpyler_715245_biocrnpyler_745024_k = 36000;
  r33_ATP_rheostatbiocrnpyler_745024_combined_model_of__biocrnpyler_715245_biocrnpyler_745024: complex_enzyme_pgk_metabolite_atp_2x_molecule_3pg_ATP_rheostatbiocrnpyler_745024_combined_model_of__biocrnpyler_715245_biocrnpyler_745024 => enzyme_pgk_ATP_rheostatbiocrnpyler_745024_combined_model_of__biocrnpyler_715245_biocrnpyler_745024 + 2 molecule_3pg_ATP_rheostatbiocrnpyler_745024_combined_model_of__biocrnpyler_715245_biocrnpyler_745024 + ATP_virE2biocrnpyler_715245_1_combined_combined_model_of__biocrnpyler_715245_biocrnpyler_745024; r33_ATP_rheostatbiocrnpyler_745024_combined_model_of__biocrnpyler_715245_biocrnpyler_745024_k*complex_enzyme_pgk_metabolite_atp_2x_molecule_3pg_ATP_rheostatbiocrnpyler_745024_combined_model_of__biocrnpyler_715245_biocrnpyler_745024;
    r33_ATP_rheostatbiocrnpyler_745024_combined_model_of__biocrnpyler_715245_biocrnpyler_745024_k = 0.004166667;
  r33_1_ATP_rheostatbiocrnpyler_745024_combined_model_of__biocrnpyler_715245_biocrnpyler_745024: enzyme_pgk_ATP_rheostatbiocrnpyler_745024_combined_model_of__biocrnpyler_715245_biocrnpyler_745024 + 2 molecule_3pg_ATP_rheostatbiocrnpyler_745024_combined_model_of__biocrnpyler_715245_biocrnpyler_745024 + ATP_virE2biocrnpyler_715245_1_combined_combined_model_of__biocrnpyler_715245_biocrnpyler_745024 => complex_enzyme_pgk_metabolite_atp_2x_molecule_3pg_ATP_rheostatbiocrnpyler_745024_combined_model_of__biocrnpyler_715245_biocrnpyler_745024; r33_1_ATP_rheostatbiocrnpyler_745024_combined_model_of__biocrnpyler_715245_biocrnpyler_745024_k*enzyme_pgk_ATP_rheostatbiocrnpyler_745024_combined_model_of__biocrnpyler_715245_biocrnpyler_745024*molecule_3pg_ATP_rheostatbiocrnpyler_745024_combined_model_of__biocrnpyler_715245_biocrnpyler_745024^2*ATP_virE2biocrnpyler_715245_1_combined_combined_model_of__biocrnpyler_715245_biocrnpyler_745024;
    r33_1_ATP_rheostatbiocrnpyler_745024_combined_model_of__biocrnpyler_715245_biocrnpyler_745024_k = 0.0004166667;
  r35_ATP_rheostatbiocrnpyler_745024_combined_model_of__biocrnpyler_715245_biocrnpyler_745024: enzyme_pgm_ATP_rheostatbiocrnpyler_745024_combined_model_of__biocrnpyler_715245_biocrnpyler_745024 + 2 molecule_3pg_ATP_rheostatbiocrnpyler_745024_combined_model_of__biocrnpyler_715245_biocrnpyler_745024 => complex_enzyme_pgm_2x_molecule_3pg_ATP_rheostatbiocrnpyler_745024_combined_model_of__biocrnpyler_715245_biocrnpyler_745024; r35_ATP_rheostatbiocrnpyler_745024_combined_model_of__biocrnpyler_715245_biocrnpyler_745024_k*enzyme_pgm_ATP_rheostatbiocrnpyler_745024_combined_model_of__biocrnpyler_715245_biocrnpyler_745024*molecule_3pg_ATP_rheostatbiocrnpyler_745024_combined_model_of__biocrnpyler_715245_biocrnpyler_745024^2;
    r35_ATP_rheostatbiocrnpyler_745024_combined_model_of__biocrnpyler_715245_biocrnpyler_745024_k = 0.004166667;
  r35_1_ATP_rheostatbiocrnpyler_745024_combined_model_of__biocrnpyler_715245_biocrnpyler_745024: complex_enzyme_pgm_2x_molecule_3pg_ATP_rheostatbiocrnpyler_745024_combined_model_of__biocrnpyler_715245_biocrnpyler_745024 => enzyme_pgm_ATP_rheostatbiocrnpyler_745024_combined_model_of__biocrnpyler_715245_biocrnpyler_745024 + 2 molecule_3pg_ATP_rheostatbiocrnpyler_745024_combined_model_of__biocrnpyler_715245_biocrnpyler_745024; r35_1_ATP_rheostatbiocrnpyler_745024_combined_model_of__biocrnpyler_715245_biocrnpyler_745024_k*complex_enzyme_pgm_2x_molecule_3pg_ATP_rheostatbiocrnpyler_745024_combined_model_of__biocrnpyler_715245_biocrnpyler_745024;
    r35_1_ATP_rheostatbiocrnpyler_745024_combined_model_of__biocrnpyler_715245_biocrnpyler_745024_k = 0.0004166667;
  r37_ATP_rheostatbiocrnpyler_745024_combined_model_of__biocrnpyler_715245_biocrnpyler_745024: complex_enzyme_pgm_2x_molecule_3pg_ATP_rheostatbiocrnpyler_745024_combined_model_of__biocrnpyler_715245_biocrnpyler_745024 => complex_enzyme_pgm_2x_molecule_2pg_ATP_rheostatbiocrnpyler_745024_combined_model_of__biocrnpyler_715245_biocrnpyler_745024; r37_ATP_rheostatbiocrnpyler_745024_combined_model_of__biocrnpyler_715245_biocrnpyler_745024_k*complex_enzyme_pgm_2x_molecule_3pg_ATP_rheostatbiocrnpyler_745024_combined_model_of__biocrnpyler_715245_biocrnpyler_745024;
    r37_ATP_rheostatbiocrnpyler_745024_combined_model_of__biocrnpyler_715245_biocrnpyler_745024_k = 36000;
  r38_ATP_rheostatbiocrnpyler_745024_combined_model_of__biocrnpyler_715245_biocrnpyler_745024: complex_enzyme_pgm_2x_molecule_2pg_ATP_rheostatbiocrnpyler_745024_combined_model_of__biocrnpyler_715245_biocrnpyler_745024 => enzyme_pgm_ATP_rheostatbiocrnpyler_745024_combined_model_of__biocrnpyler_715245_biocrnpyler_745024 + 2 molecule_2pg_ATP_rheostatbiocrnpyler_745024_combined_model_of__biocrnpyler_715245_biocrnpyler_745024; r38_ATP_rheostatbiocrnpyler_745024_combined_model_of__biocrnpyler_715245_biocrnpyler_745024_k*complex_enzyme_pgm_2x_molecule_2pg_ATP_rheostatbiocrnpyler_745024_combined_model_of__biocrnpyler_715245_biocrnpyler_745024;
    r38_ATP_rheostatbiocrnpyler_745024_combined_model_of__biocrnpyler_715245_biocrnpyler_745024_k = 0.004166667;
  r38_1_ATP_rheostatbiocrnpyler_745024_combined_model_of__biocrnpyler_715245_biocrnpyler_745024: enzyme_pgm_ATP_rheostatbiocrnpyler_745024_combined_model_of__biocrnpyler_715245_biocrnpyler_745024 + 2 molecule_2pg_ATP_rheostatbiocrnpyler_745024_combined_model_of__biocrnpyler_715245_biocrnpyler_745024 => complex_enzyme_pgm_2x_molecule_2pg_ATP_rheostatbiocrnpyler_745024_combined_model_of__biocrnpyler_715245_biocrnpyler_745024; r38_1_ATP_rheostatbiocrnpyler_745024_combined_model_of__biocrnpyler_715245_biocrnpyler_745024_k*enzyme_pgm_ATP_rheostatbiocrnpyler_745024_combined_model_of__biocrnpyler_715245_biocrnpyler_745024*molecule_2pg_ATP_rheostatbiocrnpyler_745024_combined_model_of__biocrnpyler_715245_biocrnpyler_745024^2;
    r38_1_ATP_rheostatbiocrnpyler_745024_combined_model_of__biocrnpyler_715245_biocrnpyler_745024_k = 0.0004166667;
  r40_ATP_rheostatbiocrnpyler_745024_combined_model_of__biocrnpyler_715245_biocrnpyler_745024: enzyme_eno_ATP_rheostatbiocrnpyler_745024_combined_model_of__biocrnpyler_715245_biocrnpyler_745024 + 2 molecule_2pg_ATP_rheostatbiocrnpyler_745024_combined_model_of__biocrnpyler_715245_biocrnpyler_745024 => complex_enzyme_eno_2x_molecule_2pg_ATP_rheostatbiocrnpyler_745024_combined_model_of__biocrnpyler_715245_biocrnpyler_745024; r40_ATP_rheostatbiocrnpyler_745024_combined_model_of__biocrnpyler_715245_biocrnpyler_745024_k*enzyme_eno_ATP_rheostatbiocrnpyler_745024_combined_model_of__biocrnpyler_715245_biocrnpyler_745024*molecule_2pg_ATP_rheostatbiocrnpyler_745024_combined_model_of__biocrnpyler_715245_biocrnpyler_745024^2;
    r40_ATP_rheostatbiocrnpyler_745024_combined_model_of__biocrnpyler_715245_biocrnpyler_745024_k = 0.004166667;
  r40_1_ATP_rheostatbiocrnpyler_745024_combined_model_of__biocrnpyler_715245_biocrnpyler_745024: complex_enzyme_eno_2x_molecule_2pg_ATP_rheostatbiocrnpyler_745024_combined_model_of__biocrnpyler_715245_biocrnpyler_745024 => enzyme_eno_ATP_rheostatbiocrnpyler_745024_combined_model_of__biocrnpyler_715245_biocrnpyler_745024 + 2 molecule_2pg_ATP_rheostatbiocrnpyler_745024_combined_model_of__biocrnpyler_715245_biocrnpyler_745024; r40_1_ATP_rheostatbiocrnpyler_745024_combined_model_of__biocrnpyler_715245_biocrnpyler_745024_k*complex_enzyme_eno_2x_molecule_2pg_ATP_rheostatbiocrnpyler_745024_combined_model_of__biocrnpyler_715245_biocrnpyler_745024;
    r40_1_ATP_rheostatbiocrnpyler_745024_combined_model_of__biocrnpyler_715245_biocrnpyler_745024_k = 0.0004166667;
  r42_ATP_rheostatbiocrnpyler_745024_combined_model_of__biocrnpyler_715245_biocrnpyler_745024: complex_enzyme_eno_2x_molecule_2pg_ATP_rheostatbiocrnpyler_745024_combined_model_of__biocrnpyler_715245_biocrnpyler_745024 => complex_enzyme_eno_2x_molecule_pep_ATP_rheostatbiocrnpyler_745024_combined_model_of__biocrnpyler_715245_biocrnpyler_745024; r42_ATP_rheostatbiocrnpyler_745024_combined_model_of__biocrnpyler_715245_biocrnpyler_745024_k*complex_enzyme_eno_2x_molecule_2pg_ATP_rheostatbiocrnpyler_745024_combined_model_of__biocrnpyler_715245_biocrnpyler_745024;
    r42_ATP_rheostatbiocrnpyler_745024_combined_model_of__biocrnpyler_715245_biocrnpyler_745024_k = 36000;
  r43_ATP_rheostatbiocrnpyler_745024_combined_model_of__biocrnpyler_715245_biocrnpyler_745024: complex_enzyme_eno_2x_molecule_pep_ATP_rheostatbiocrnpyler_745024_combined_model_of__biocrnpyler_715245_biocrnpyler_745024 => enzyme_eno_ATP_rheostatbiocrnpyler_745024_combined_model_of__biocrnpyler_715245_biocrnpyler_745024 + 2 molecule_pep_ATP_rheostatbiocrnpyler_745024_combined_model_of__biocrnpyler_715245_biocrnpyler_745024; r43_ATP_rheostatbiocrnpyler_745024_combined_model_of__biocrnpyler_715245_biocrnpyler_745024_k*complex_enzyme_eno_2x_molecule_pep_ATP_rheostatbiocrnpyler_745024_combined_model_of__biocrnpyler_715245_biocrnpyler_745024;
    r43_ATP_rheostatbiocrnpyler_745024_combined_model_of__biocrnpyler_715245_biocrnpyler_745024_k = 0.004166667;
  r43_1_ATP_rheostatbiocrnpyler_745024_combined_model_of__biocrnpyler_715245_biocrnpyler_745024: enzyme_eno_ATP_rheostatbiocrnpyler_745024_combined_model_of__biocrnpyler_715245_biocrnpyler_745024 + 2 molecule_pep_ATP_rheostatbiocrnpyler_745024_combined_model_of__biocrnpyler_715245_biocrnpyler_745024 => complex_enzyme_eno_2x_molecule_pep_ATP_rheostatbiocrnpyler_745024_combined_model_of__biocrnpyler_715245_biocrnpyler_745024; r43_1_ATP_rheostatbiocrnpyler_745024_combined_model_of__biocrnpyler_715245_biocrnpyler_745024_k*enzyme_eno_ATP_rheostatbiocrnpyler_745024_combined_model_of__biocrnpyler_715245_biocrnpyler_745024*molecule_pep_ATP_rheostatbiocrnpyler_745024_combined_model_of__biocrnpyler_715245_biocrnpyler_745024^2;
    r43_1_ATP_rheostatbiocrnpyler_745024_combined_model_of__biocrnpyler_715245_biocrnpyler_745024_k = 0.0004166667;
  r45_ATP_rheostatbiocrnpyler_745024_combined_model_of__biocrnpyler_715245_biocrnpyler_745024: enzyme_pyk_ATP_rheostatbiocrnpyler_745024_combined_model_of__biocrnpyler_715245_biocrnpyler_745024 + 2 ADP_virE2biocrnpyler_715245_1_combined_combined_model_of__biocrnpyler_715245_biocrnpyler_745024 + 2 molecule_pep_ATP_rheostatbiocrnpyler_745024_combined_model_of__biocrnpyler_715245_biocrnpyler_745024 => complex_enzyme_pyk_2x_metabolite_adp_2x_molecule_pep_ATP_rheostatbiocrnpyler_745024_combined_model_of__biocrnpyler_715245_biocrnpyler_745024; r45_ATP_rheostatbiocrnpyler_745024_combined_model_of__biocrnpyler_715245_biocrnpyler_745024_k*enzyme_pyk_ATP_rheostatbiocrnpyler_745024_combined_model_of__biocrnpyler_715245_biocrnpyler_745024*ADP_virE2biocrnpyler_715245_1_combined_combined_model_of__biocrnpyler_715245_biocrnpyler_745024^2*molecule_pep_ATP_rheostatbiocrnpyler_745024_combined_model_of__biocrnpyler_715245_biocrnpyler_745024^2;
    r45_ATP_rheostatbiocrnpyler_745024_combined_model_of__biocrnpyler_715245_biocrnpyler_745024_k = 0.004166667;
  r45_1_ATP_rheostatbiocrnpyler_745024_combined_model_of__biocrnpyler_715245_biocrnpyler_745024: complex_enzyme_pyk_2x_metabolite_adp_2x_molecule_pep_ATP_rheostatbiocrnpyler_745024_combined_model_of__biocrnpyler_715245_biocrnpyler_745024 => enzyme_pyk_ATP_rheostatbiocrnpyler_745024_combined_model_of__biocrnpyler_715245_biocrnpyler_745024 + 2 ADP_virE2biocrnpyler_715245_1_combined_combined_model_of__biocrnpyler_715245_biocrnpyler_745024 + 2 molecule_pep_ATP_rheostatbiocrnpyler_745024_combined_model_of__biocrnpyler_715245_biocrnpyler_745024; r45_1_ATP_rheostatbiocrnpyler_745024_combined_model_of__biocrnpyler_715245_biocrnpyler_745024_k*complex_enzyme_pyk_2x_metabolite_adp_2x_molecule_pep_ATP_rheostatbiocrnpyler_745024_combined_model_of__biocrnpyler_715245_biocrnpyler_745024;
    r45_1_ATP_rheostatbiocrnpyler_745024_combined_model_of__biocrnpyler_715245_biocrnpyler_745024_k = 0.0004166667;
  r47_ATP_rheostatbiocrnpyler_745024_combined_model_of__biocrnpyler_715245_biocrnpyler_745024: complex_enzyme_pyk_2x_metabolite_adp_2x_molecule_pep_ATP_rheostatbiocrnpyler_745024_combined_model_of__biocrnpyler_715245_biocrnpyler_745024 => complex_enzyme_pyk_2x_metabolite_atp_2x_molecule_pyruvate_ATP_rheostatbiocrnpyler_745024_combined_model_of__biocrnpyler_715245_biocrnpyler_745024; r47_ATP_rheostatbiocrnpyler_745024_combined_model_of__biocrnpyler_715245_biocrnpyler_745024_k*complex_enzyme_pyk_2x_metabolite_adp_2x_molecule_pep_ATP_rheostatbiocrnpyler_745024_combined_model_of__biocrnpyler_715245_biocrnpyler_745024;
    r47_ATP_rheostatbiocrnpyler_745024_combined_model_of__biocrnpyler_715245_biocrnpyler_745024_k = 36000;
  r48_ATP_rheostatbiocrnpyler_745024_combined_model_of__biocrnpyler_715245_biocrnpyler_745024: complex_enzyme_pyk_2x_metabolite_atp_2x_molecule_pyruvate_ATP_rheostatbiocrnpyler_745024_combined_model_of__biocrnpyler_715245_biocrnpyler_745024 => enzyme_pyk_ATP_rheostatbiocrnpyler_745024_combined_model_of__biocrnpyler_715245_biocrnpyler_745024 + 2 molecule_pyruvate_ATP_rheostatbiocrnpyler_745024_combined_model_of__biocrnpyler_715245_biocrnpyler_745024 + 2 ATP_virE2biocrnpyler_715245_1_combined_combined_model_of__biocrnpyler_715245_biocrnpyler_745024; r48_ATP_rheostatbiocrnpyler_745024_combined_model_of__biocrnpyler_715245_biocrnpyler_745024_k*complex_enzyme_pyk_2x_metabolite_atp_2x_molecule_pyruvate_ATP_rheostatbiocrnpyler_745024_combined_model_of__biocrnpyler_715245_biocrnpyler_745024;
    r48_ATP_rheostatbiocrnpyler_745024_combined_model_of__biocrnpyler_715245_biocrnpyler_745024_k = 0.004166667;
  r48_1_ATP_rheostatbiocrnpyler_745024_combined_model_of__biocrnpyler_715245_biocrnpyler_745024: enzyme_pyk_ATP_rheostatbiocrnpyler_745024_combined_model_of__biocrnpyler_715245_biocrnpyler_745024 + 2 molecule_pyruvate_ATP_rheostatbiocrnpyler_745024_combined_model_of__biocrnpyler_715245_biocrnpyler_745024 + 2 ATP_virE2biocrnpyler_715245_1_combined_combined_model_of__biocrnpyler_715245_biocrnpyler_745024 => complex_enzyme_pyk_2x_metabolite_atp_2x_molecule_pyruvate_ATP_rheostatbiocrnpyler_745024_combined_model_of__biocrnpyler_715245_biocrnpyler_745024; r48_1_ATP_rheostatbiocrnpyler_745024_combined_model_of__biocrnpyler_715245_biocrnpyler_745024_k*enzyme_pyk_ATP_rheostatbiocrnpyler_745024_combined_model_of__biocrnpyler_715245_biocrnpyler_745024*molecule_pyruvate_ATP_rheostatbiocrnpyler_745024_combined_model_of__biocrnpyler_715245_biocrnpyler_745024^2*ATP_virE2biocrnpyler_715245_1_combined_combined_model_of__biocrnpyler_715245_biocrnpyler_745024^2;
    r48_1_ATP_rheostatbiocrnpyler_745024_combined_model_of__biocrnpyler_715245_biocrnpyler_745024_k = 0.0004166667;
  r50_ATP_rheostatbiocrnpyler_745024_combined_model_of__biocrnpyler_715245_biocrnpyler_745024: enzyme_alsS_ATP_rheostatbiocrnpyler_745024_combined_model_of__biocrnpyler_715245_biocrnpyler_745024 + 2 molecule_pyruvate_ATP_rheostatbiocrnpyler_745024_combined_model_of__biocrnpyler_715245_biocrnpyler_745024 => complex_enzyme_alsS_2x_molecule_pyruvate_ATP_rheostatbiocrnpyler_745024_combined_model_of__biocrnpyler_715245_biocrnpyler_745024; r50_ATP_rheostatbiocrnpyler_745024_combined_model_of__biocrnpyler_715245_biocrnpyler_745024_k*enzyme_alsS_ATP_rheostatbiocrnpyler_745024_combined_model_of__biocrnpyler_715245_biocrnpyler_745024*molecule_pyruvate_ATP_rheostatbiocrnpyler_745024_combined_model_of__biocrnpyler_715245_biocrnpyler_745024^2;
    r50_ATP_rheostatbiocrnpyler_745024_combined_model_of__biocrnpyler_715245_biocrnpyler_745024_k = 0.004166667;
  r50_1_ATP_rheostatbiocrnpyler_745024_combined_model_of__biocrnpyler_715245_biocrnpyler_745024: complex_enzyme_alsS_2x_molecule_pyruvate_ATP_rheostatbiocrnpyler_745024_combined_model_of__biocrnpyler_715245_biocrnpyler_745024 => enzyme_alsS_ATP_rheostatbiocrnpyler_745024_combined_model_of__biocrnpyler_715245_biocrnpyler_745024 + 2 molecule_pyruvate_ATP_rheostatbiocrnpyler_745024_combined_model_of__biocrnpyler_715245_biocrnpyler_745024; r50_1_ATP_rheostatbiocrnpyler_745024_combined_model_of__biocrnpyler_715245_biocrnpyler_745024_k*complex_enzyme_alsS_2x_molecule_pyruvate_ATP_rheostatbiocrnpyler_745024_combined_model_of__biocrnpyler_715245_biocrnpyler_745024;
    r50_1_ATP_rheostatbiocrnpyler_745024_combined_model_of__biocrnpyler_715245_biocrnpyler_745024_k = 0.0004166667;
  r52_ATP_rheostatbiocrnpyler_745024_combined_model_of__biocrnpyler_715245_biocrnpyler_745024: complex_enzyme_alsS_2x_molecule_pyruvate_ATP_rheostatbiocrnpyler_745024_combined_model_of__biocrnpyler_715245_biocrnpyler_745024 => complex_enzyme_alsS_molecule_acetolac_ATP_rheostatbiocrnpyler_745024_combined_model_of__biocrnpyler_715245_biocrnpyler_745024; r52_ATP_rheostatbiocrnpyler_745024_combined_model_of__biocrnpyler_715245_biocrnpyler_745024_k*complex_enzyme_alsS_2x_molecule_pyruvate_ATP_rheostatbiocrnpyler_745024_combined_model_of__biocrnpyler_715245_biocrnpyler_745024;
    r52_ATP_rheostatbiocrnpyler_745024_combined_model_of__biocrnpyler_715245_biocrnpyler_745024_k = 36000;
  r53_ATP_rheostatbiocrnpyler_745024_combined_model_of__biocrnpyler_715245_biocrnpyler_745024: complex_enzyme_alsS_molecule_acetolac_ATP_rheostatbiocrnpyler_745024_combined_model_of__biocrnpyler_715245_biocrnpyler_745024 => enzyme_alsS_ATP_rheostatbiocrnpyler_745024_combined_model_of__biocrnpyler_715245_biocrnpyler_745024 + molecule_acetolac_ATP_rheostatbiocrnpyler_745024_combined_model_of__biocrnpyler_715245_biocrnpyler_745024; r53_ATP_rheostatbiocrnpyler_745024_combined_model_of__biocrnpyler_715245_biocrnpyler_745024_k*complex_enzyme_alsS_molecule_acetolac_ATP_rheostatbiocrnpyler_745024_combined_model_of__biocrnpyler_715245_biocrnpyler_745024;
    r53_ATP_rheostatbiocrnpyler_745024_combined_model_of__biocrnpyler_715245_biocrnpyler_745024_k = 0.004166667;
  r53_1_ATP_rheostatbiocrnpyler_745024_combined_model_of__biocrnpyler_715245_biocrnpyler_745024: enzyme_alsS_ATP_rheostatbiocrnpyler_745024_combined_model_of__biocrnpyler_715245_biocrnpyler_745024 + molecule_acetolac_ATP_rheostatbiocrnpyler_745024_combined_model_of__biocrnpyler_715245_biocrnpyler_745024 => complex_enzyme_alsS_molecule_acetolac_ATP_rheostatbiocrnpyler_745024_combined_model_of__biocrnpyler_715245_biocrnpyler_745024; r53_1_ATP_rheostatbiocrnpyler_745024_combined_model_of__biocrnpyler_715245_biocrnpyler_745024_k*enzyme_alsS_ATP_rheostatbiocrnpyler_745024_combined_model_of__biocrnpyler_715245_biocrnpyler_745024*molecule_acetolac_ATP_rheostatbiocrnpyler_745024_combined_model_of__biocrnpyler_715245_biocrnpyler_745024;
    r53_1_ATP_rheostatbiocrnpyler_745024_combined_model_of__biocrnpyler_715245_biocrnpyler_745024_k = 0.0004166667;
  r55_ATP_rheostatbiocrnpyler_745024_combined_model_of__biocrnpyler_715245_biocrnpyler_745024: enzyme_IlvC_ATP_rheostatbiocrnpyler_745024_combined_model_of__biocrnpyler_715245_biocrnpyler_745024 + metabolite_nadph_ATP_rheostatbiocrnpyler_745024_combined_model_of__biocrnpyler_715245_biocrnpyler_745024 + molecule_acetolac_ATP_rheostatbiocrnpyler_745024_combined_model_of__biocrnpyler_715245_biocrnpyler_745024 => complex_enzyme_IlvC_metabolite_nadph_molecule_acetolac_ATP_rheostatbiocrnpyler_745024_combined_model_of__biocrnpyler_715245_biocrnpyler_745024; r55_ATP_rheostatbiocrnpyler_745024_combined_model_of__biocrnpyler_715245_biocrnpyler_745024_k*enzyme_IlvC_ATP_rheostatbiocrnpyler_745024_combined_model_of__biocrnpyler_715245_biocrnpyler_745024*metabolite_nadph_ATP_rheostatbiocrnpyler_745024_combined_model_of__biocrnpyler_715245_biocrnpyler_745024*molecule_acetolac_ATP_rheostatbiocrnpyler_745024_combined_model_of__biocrnpyler_715245_biocrnpyler_745024;
    r55_ATP_rheostatbiocrnpyler_745024_combined_model_of__biocrnpyler_715245_biocrnpyler_745024_k = 0.004166667;
  r55_1_ATP_rheostatbiocrnpyler_745024_combined_model_of__biocrnpyler_715245_biocrnpyler_745024: complex_enzyme_IlvC_metabolite_nadph_molecule_acetolac_ATP_rheostatbiocrnpyler_745024_combined_model_of__biocrnpyler_715245_biocrnpyler_745024 => enzyme_IlvC_ATP_rheostatbiocrnpyler_745024_combined_model_of__biocrnpyler_715245_biocrnpyler_745024 + metabolite_nadph_ATP_rheostatbiocrnpyler_745024_combined_model_of__biocrnpyler_715245_biocrnpyler_745024 + molecule_acetolac_ATP_rheostatbiocrnpyler_745024_combined_model_of__biocrnpyler_715245_biocrnpyler_745024; r55_1_ATP_rheostatbiocrnpyler_745024_combined_model_of__biocrnpyler_715245_biocrnpyler_745024_k*complex_enzyme_IlvC_metabolite_nadph_molecule_acetolac_ATP_rheostatbiocrnpyler_745024_combined_model_of__biocrnpyler_715245_biocrnpyler_745024;
    r55_1_ATP_rheostatbiocrnpyler_745024_combined_model_of__biocrnpyler_715245_biocrnpyler_745024_k = 0.0004166667;
  r57_ATP_rheostatbiocrnpyler_745024_combined_model_of__biocrnpyler_715245_biocrnpyler_745024: complex_enzyme_IlvC_metabolite_nadph_molecule_acetolac_ATP_rheostatbiocrnpyler_745024_combined_model_of__biocrnpyler_715245_biocrnpyler_745024 => complex_enzyme_IlvC_metabolite_nadp_molecule_23dih3mebut_ATP_rheostatbiocrnpyler_745024_combined_model_of__biocrnpyler_715245_biocrnpyler_745024; r57_ATP_rheostatbiocrnpyler_745024_combined_model_of__biocrnpyler_715245_biocrnpyler_745024_k*complex_enzyme_IlvC_metabolite_nadph_molecule_acetolac_ATP_rheostatbiocrnpyler_745024_combined_model_of__biocrnpyler_715245_biocrnpyler_745024;
    r57_ATP_rheostatbiocrnpyler_745024_combined_model_of__biocrnpyler_715245_biocrnpyler_745024_k = 36000;
  r58_ATP_rheostatbiocrnpyler_745024_combined_model_of__biocrnpyler_715245_biocrnpyler_745024: complex_enzyme_IlvC_metabolite_nadp_molecule_23dih3mebut_ATP_rheostatbiocrnpyler_745024_combined_model_of__biocrnpyler_715245_biocrnpyler_745024 => enzyme_IlvC_ATP_rheostatbiocrnpyler_745024_combined_model_of__biocrnpyler_715245_biocrnpyler_745024 + molecule_23dih3mebut_ATP_rheostatbiocrnpyler_745024_combined_model_of__biocrnpyler_715245_biocrnpyler_745024 + metabolite_nadp_ATP_rheostatbiocrnpyler_745024_combined_model_of__biocrnpyler_715245_biocrnpyler_745024; r58_ATP_rheostatbiocrnpyler_745024_combined_model_of__biocrnpyler_715245_biocrnpyler_745024_k*complex_enzyme_IlvC_metabolite_nadp_molecule_23dih3mebut_ATP_rheostatbiocrnpyler_745024_combined_model_of__biocrnpyler_715245_biocrnpyler_745024;
    r58_ATP_rheostatbiocrnpyler_745024_combined_model_of__biocrnpyler_715245_biocrnpyler_745024_k = 0.004166667;
  r58_1_ATP_rheostatbiocrnpyler_745024_combined_model_of__biocrnpyler_715245_biocrnpyler_745024: enzyme_IlvC_ATP_rheostatbiocrnpyler_745024_combined_model_of__biocrnpyler_715245_biocrnpyler_745024 + molecule_23dih3mebut_ATP_rheostatbiocrnpyler_745024_combined_model_of__biocrnpyler_715245_biocrnpyler_745024 + metabolite_nadp_ATP_rheostatbiocrnpyler_745024_combined_model_of__biocrnpyler_715245_biocrnpyler_745024 => complex_enzyme_IlvC_metabolite_nadp_molecule_23dih3mebut_ATP_rheostatbiocrnpyler_745024_combined_model_of__biocrnpyler_715245_biocrnpyler_745024; r58_1_ATP_rheostatbiocrnpyler_745024_combined_model_of__biocrnpyler_715245_biocrnpyler_745024_k*enzyme_IlvC_ATP_rheostatbiocrnpyler_745024_combined_model_of__biocrnpyler_715245_biocrnpyler_745024*molecule_23dih3mebut_ATP_rheostatbiocrnpyler_745024_combined_model_of__biocrnpyler_715245_biocrnpyler_745024*metabolite_nadp_ATP_rheostatbiocrnpyler_745024_combined_model_of__biocrnpyler_715245_biocrnpyler_745024;
    r58_1_ATP_rheostatbiocrnpyler_745024_combined_model_of__biocrnpyler_715245_biocrnpyler_745024_k = 0.0004166667;
  r60_ATP_rheostatbiocrnpyler_745024_combined_model_of__biocrnpyler_715245_biocrnpyler_745024: enzyme_IlvD_ATP_rheostatbiocrnpyler_745024_combined_model_of__biocrnpyler_715245_biocrnpyler_745024 + molecule_23dih3mebut_ATP_rheostatbiocrnpyler_745024_combined_model_of__biocrnpyler_715245_biocrnpyler_745024 => complex_enzyme_IlvD_molecule_23dih3mebut_ATP_rheostatbiocrnpyler_745024_combined_model_of__biocrnpyler_715245_biocrnpyler_745024; r60_ATP_rheostatbiocrnpyler_745024_combined_model_of__biocrnpyler_715245_biocrnpyler_745024_k*enzyme_IlvD_ATP_rheostatbiocrnpyler_745024_combined_model_of__biocrnpyler_715245_biocrnpyler_745024*molecule_23dih3mebut_ATP_rheostatbiocrnpyler_745024_combined_model_of__biocrnpyler_715245_biocrnpyler_745024;
    r60_ATP_rheostatbiocrnpyler_745024_combined_model_of__biocrnpyler_715245_biocrnpyler_745024_k = 0.004166667;
  r60_1_ATP_rheostatbiocrnpyler_745024_combined_model_of__biocrnpyler_715245_biocrnpyler_745024: complex_enzyme_IlvD_molecule_23dih3mebut_ATP_rheostatbiocrnpyler_745024_combined_model_of__biocrnpyler_715245_biocrnpyler_745024 => enzyme_IlvD_ATP_rheostatbiocrnpyler_745024_combined_model_of__biocrnpyler_715245_biocrnpyler_745024 + molecule_23dih3mebut_ATP_rheostatbiocrnpyler_745024_combined_model_of__biocrnpyler_715245_biocrnpyler_745024; r60_1_ATP_rheostatbiocrnpyler_745024_combined_model_of__biocrnpyler_715245_biocrnpyler_745024_k*complex_enzyme_IlvD_molecule_23dih3mebut_ATP_rheostatbiocrnpyler_745024_combined_model_of__biocrnpyler_715245_biocrnpyler_745024;
    r60_1_ATP_rheostatbiocrnpyler_745024_combined_model_of__biocrnpyler_715245_biocrnpyler_745024_k = 0.0004166667;
  r62_ATP_rheostatbiocrnpyler_745024_combined_model_of__biocrnpyler_715245_biocrnpyler_745024: complex_enzyme_IlvD_molecule_23dih3mebut_ATP_rheostatbiocrnpyler_745024_combined_model_of__biocrnpyler_715245_biocrnpyler_745024 => complex_enzyme_IlvD_molecule_3me2oxo_ATP_rheostatbiocrnpyler_745024_combined_model_of__biocrnpyler_715245_biocrnpyler_745024; r62_ATP_rheostatbiocrnpyler_745024_combined_model_of__biocrnpyler_715245_biocrnpyler_745024_k*complex_enzyme_IlvD_molecule_23dih3mebut_ATP_rheostatbiocrnpyler_745024_combined_model_of__biocrnpyler_715245_biocrnpyler_745024;
    r62_ATP_rheostatbiocrnpyler_745024_combined_model_of__biocrnpyler_715245_biocrnpyler_745024_k = 36000;
  r63_ATP_rheostatbiocrnpyler_745024_combined_model_of__biocrnpyler_715245_biocrnpyler_745024: complex_enzyme_IlvD_molecule_3me2oxo_ATP_rheostatbiocrnpyler_745024_combined_model_of__biocrnpyler_715245_biocrnpyler_745024 => enzyme_IlvD_ATP_rheostatbiocrnpyler_745024_combined_model_of__biocrnpyler_715245_biocrnpyler_745024 + molecule_3me2oxo_ATP_rheostatbiocrnpyler_745024_combined_model_of__biocrnpyler_715245_biocrnpyler_745024; r63_ATP_rheostatbiocrnpyler_745024_combined_model_of__biocrnpyler_715245_biocrnpyler_745024_k*complex_enzyme_IlvD_molecule_3me2oxo_ATP_rheostatbiocrnpyler_745024_combined_model_of__biocrnpyler_715245_biocrnpyler_745024;
    r63_ATP_rheostatbiocrnpyler_745024_combined_model_of__biocrnpyler_715245_biocrnpyler_745024_k = 0.004166667;
  r63_1_ATP_rheostatbiocrnpyler_745024_combined_model_of__biocrnpyler_715245_biocrnpyler_745024: enzyme_IlvD_ATP_rheostatbiocrnpyler_745024_combined_model_of__biocrnpyler_715245_biocrnpyler_745024 + molecule_3me2oxo_ATP_rheostatbiocrnpyler_745024_combined_model_of__biocrnpyler_715245_biocrnpyler_745024 => complex_enzyme_IlvD_molecule_3me2oxo_ATP_rheostatbiocrnpyler_745024_combined_model_of__biocrnpyler_715245_biocrnpyler_745024; r63_1_ATP_rheostatbiocrnpyler_745024_combined_model_of__biocrnpyler_715245_biocrnpyler_745024_k*enzyme_IlvD_ATP_rheostatbiocrnpyler_745024_combined_model_of__biocrnpyler_715245_biocrnpyler_745024*molecule_3me2oxo_ATP_rheostatbiocrnpyler_745024_combined_model_of__biocrnpyler_715245_biocrnpyler_745024;
    r63_1_ATP_rheostatbiocrnpyler_745024_combined_model_of__biocrnpyler_715245_biocrnpyler_745024_k = 0.0004166667;
  r65_ATP_rheostatbiocrnpyler_745024_combined_model_of__biocrnpyler_715245_biocrnpyler_745024: enzyme_kivD_ATP_rheostatbiocrnpyler_745024_combined_model_of__biocrnpyler_715245_biocrnpyler_745024 + molecule_3me2oxo_ATP_rheostatbiocrnpyler_745024_combined_model_of__biocrnpyler_715245_biocrnpyler_745024 => complex_enzyme_kivD_molecule_3me2oxo_ATP_rheostatbiocrnpyler_745024_combined_model_of__biocrnpyler_715245_biocrnpyler_745024; r65_ATP_rheostatbiocrnpyler_745024_combined_model_of__biocrnpyler_715245_biocrnpyler_745024_k*enzyme_kivD_ATP_rheostatbiocrnpyler_745024_combined_model_of__biocrnpyler_715245_biocrnpyler_745024*molecule_3me2oxo_ATP_rheostatbiocrnpyler_745024_combined_model_of__biocrnpyler_715245_biocrnpyler_745024;
    r65_ATP_rheostatbiocrnpyler_745024_combined_model_of__biocrnpyler_715245_biocrnpyler_745024_k = 0.004166667;
  r65_1_ATP_rheostatbiocrnpyler_745024_combined_model_of__biocrnpyler_715245_biocrnpyler_745024: complex_enzyme_kivD_molecule_3me2oxo_ATP_rheostatbiocrnpyler_745024_combined_model_of__biocrnpyler_715245_biocrnpyler_745024 => enzyme_kivD_ATP_rheostatbiocrnpyler_745024_combined_model_of__biocrnpyler_715245_biocrnpyler_745024 + molecule_3me2oxo_ATP_rheostatbiocrnpyler_745024_combined_model_of__biocrnpyler_715245_biocrnpyler_745024; r65_1_ATP_rheostatbiocrnpyler_745024_combined_model_of__biocrnpyler_715245_biocrnpyler_745024_k*complex_enzyme_kivD_molecule_3me2oxo_ATP_rheostatbiocrnpyler_745024_combined_model_of__biocrnpyler_715245_biocrnpyler_745024;
    r65_1_ATP_rheostatbiocrnpyler_745024_combined_model_of__biocrnpyler_715245_biocrnpyler_745024_k = 0.0004166667;
  r67_ATP_rheostatbiocrnpyler_745024_combined_model_of__biocrnpyler_715245_biocrnpyler_745024: complex_enzyme_kivD_molecule_3me2oxo_ATP_rheostatbiocrnpyler_745024_combined_model_of__biocrnpyler_715245_biocrnpyler_745024 => complex_enzyme_kivD_molecule_isobutanal_ATP_rheostatbiocrnpyler_745024_combined_model_of__biocrnpyler_715245_biocrnpyler_745024; r67_ATP_rheostatbiocrnpyler_745024_combined_model_of__biocrnpyler_715245_biocrnpyler_745024_k*complex_enzyme_kivD_molecule_3me2oxo_ATP_rheostatbiocrnpyler_745024_combined_model_of__biocrnpyler_715245_biocrnpyler_745024;
    r67_ATP_rheostatbiocrnpyler_745024_combined_model_of__biocrnpyler_715245_biocrnpyler_745024_k = 36000;
  r68_ATP_rheostatbiocrnpyler_745024_combined_model_of__biocrnpyler_715245_biocrnpyler_745024: complex_enzyme_kivD_molecule_isobutanal_ATP_rheostatbiocrnpyler_745024_combined_model_of__biocrnpyler_715245_biocrnpyler_745024 => enzyme_kivD_ATP_rheostatbiocrnpyler_745024_combined_model_of__biocrnpyler_715245_biocrnpyler_745024 + molecule_isobutanal_ATP_rheostatbiocrnpyler_745024_combined_model_of__biocrnpyler_715245_biocrnpyler_745024; r68_ATP_rheostatbiocrnpyler_745024_combined_model_of__biocrnpyler_715245_biocrnpyler_745024_k*complex_enzyme_kivD_molecule_isobutanal_ATP_rheostatbiocrnpyler_745024_combined_model_of__biocrnpyler_715245_biocrnpyler_745024;
    r68_ATP_rheostatbiocrnpyler_745024_combined_model_of__biocrnpyler_715245_biocrnpyler_745024_k = 0.004166667;
  r68_1_ATP_rheostatbiocrnpyler_745024_combined_model_of__biocrnpyler_715245_biocrnpyler_745024: enzyme_kivD_ATP_rheostatbiocrnpyler_745024_combined_model_of__biocrnpyler_715245_biocrnpyler_745024 + molecule_isobutanal_ATP_rheostatbiocrnpyler_745024_combined_model_of__biocrnpyler_715245_biocrnpyler_745024 => complex_enzyme_kivD_molecule_isobutanal_ATP_rheostatbiocrnpyler_745024_combined_model_of__biocrnpyler_715245_biocrnpyler_745024; r68_1_ATP_rheostatbiocrnpyler_745024_combined_model_of__biocrnpyler_715245_biocrnpyler_745024_k*enzyme_kivD_ATP_rheostatbiocrnpyler_745024_combined_model_of__biocrnpyler_715245_biocrnpyler_745024*molecule_isobutanal_ATP_rheostatbiocrnpyler_745024_combined_model_of__biocrnpyler_715245_biocrnpyler_745024;
    r68_1_ATP_rheostatbiocrnpyler_745024_combined_model_of__biocrnpyler_715245_biocrnpyler_745024_k = 0.0004166667;
  r70_ATP_rheostatbiocrnpyler_745024_combined_model_of__biocrnpyler_715245_biocrnpyler_745024: enzyme_yahk_ATP_rheostatbiocrnpyler_745024_combined_model_of__biocrnpyler_715245_biocrnpyler_745024 + metabolite_nadph_ATP_rheostatbiocrnpyler_745024_combined_model_of__biocrnpyler_715245_biocrnpyler_745024 + molecule_isobutanal_ATP_rheostatbiocrnpyler_745024_combined_model_of__biocrnpyler_715245_biocrnpyler_745024 => complex_enzyme_yahk_metabolite_nadph_molecule_isobutanal_ATP_rheostatbiocrnpyler_745024_combined_model_of__biocrnpyler_715245_biocrnpyler_745024; r70_ATP_rheostatbiocrnpyler_745024_combined_model_of__biocrnpyler_715245_biocrnpyler_745024_k*enzyme_yahk_ATP_rheostatbiocrnpyler_745024_combined_model_of__biocrnpyler_715245_biocrnpyler_745024*metabolite_nadph_ATP_rheostatbiocrnpyler_745024_combined_model_of__biocrnpyler_715245_biocrnpyler_745024*molecule_isobutanal_ATP_rheostatbiocrnpyler_745024_combined_model_of__biocrnpyler_715245_biocrnpyler_745024;
    r70_ATP_rheostatbiocrnpyler_745024_combined_model_of__biocrnpyler_715245_biocrnpyler_745024_k = 0.004166667;
  r70_1_ATP_rheostatbiocrnpyler_745024_combined_model_of__biocrnpyler_715245_biocrnpyler_745024: complex_enzyme_yahk_metabolite_nadph_molecule_isobutanal_ATP_rheostatbiocrnpyler_745024_combined_model_of__biocrnpyler_715245_biocrnpyler_745024 => enzyme_yahk_ATP_rheostatbiocrnpyler_745024_combined_model_of__biocrnpyler_715245_biocrnpyler_745024 + metabolite_nadph_ATP_rheostatbiocrnpyler_745024_combined_model_of__biocrnpyler_715245_biocrnpyler_745024 + molecule_isobutanal_ATP_rheostatbiocrnpyler_745024_combined_model_of__biocrnpyler_715245_biocrnpyler_745024; r70_1_ATP_rheostatbiocrnpyler_745024_combined_model_of__biocrnpyler_715245_biocrnpyler_745024_k*complex_enzyme_yahk_metabolite_nadph_molecule_isobutanal_ATP_rheostatbiocrnpyler_745024_combined_model_of__biocrnpyler_715245_biocrnpyler_745024;
    r70_1_ATP_rheostatbiocrnpyler_745024_combined_model_of__biocrnpyler_715245_biocrnpyler_745024_k = 0.0004166667;
  r72_ATP_rheostatbiocrnpyler_745024_combined_model_of__biocrnpyler_715245_biocrnpyler_745024: complex_enzyme_yahk_metabolite_nadph_molecule_isobutanal_ATP_rheostatbiocrnpyler_745024_combined_model_of__biocrnpyler_715245_biocrnpyler_745024 => complex_enzyme_yahk_metabolite_nadp_molecule_isobutanol_ATP_rheostatbiocrnpyler_745024_combined_model_of__biocrnpyler_715245_biocrnpyler_745024; r72_ATP_rheostatbiocrnpyler_745024_combined_model_of__biocrnpyler_715245_biocrnpyler_745024_k*complex_enzyme_yahk_metabolite_nadph_molecule_isobutanal_ATP_rheostatbiocrnpyler_745024_combined_model_of__biocrnpyler_715245_biocrnpyler_745024;
    r72_ATP_rheostatbiocrnpyler_745024_combined_model_of__biocrnpyler_715245_biocrnpyler_745024_k = 36000;
  r73_ATP_rheostatbiocrnpyler_745024_combined_model_of__biocrnpyler_715245_biocrnpyler_745024: complex_enzyme_yahk_metabolite_nadp_molecule_isobutanol_ATP_rheostatbiocrnpyler_745024_combined_model_of__biocrnpyler_715245_biocrnpyler_745024 => enzyme_yahk_ATP_rheostatbiocrnpyler_745024_combined_model_of__biocrnpyler_715245_biocrnpyler_745024 + molecule_isobutanol_ATP_rheostatbiocrnpyler_745024_combined_model_of__biocrnpyler_715245_biocrnpyler_745024 + metabolite_nadp_ATP_rheostatbiocrnpyler_745024_combined_model_of__biocrnpyler_715245_biocrnpyler_745024; r73_ATP_rheostatbiocrnpyler_745024_combined_model_of__biocrnpyler_715245_biocrnpyler_745024_k*complex_enzyme_yahk_metabolite_nadp_molecule_isobutanol_ATP_rheostatbiocrnpyler_745024_combined_model_of__biocrnpyler_715245_biocrnpyler_745024;
    r73_ATP_rheostatbiocrnpyler_745024_combined_model_of__biocrnpyler_715245_biocrnpyler_745024_k = 0.004166667;
  r73_1_ATP_rheostatbiocrnpyler_745024_combined_model_of__biocrnpyler_715245_biocrnpyler_745024: enzyme_yahk_ATP_rheostatbiocrnpyler_745024_combined_model_of__biocrnpyler_715245_biocrnpyler_745024 + molecule_isobutanol_ATP_rheostatbiocrnpyler_745024_combined_model_of__biocrnpyler_715245_biocrnpyler_745024 + metabolite_nadp_ATP_rheostatbiocrnpyler_745024_combined_model_of__biocrnpyler_715245_biocrnpyler_745024 => complex_enzyme_yahk_metabolite_nadp_molecule_isobutanol_ATP_rheostatbiocrnpyler_745024_combined_model_of__biocrnpyler_715245_biocrnpyler_745024; r73_1_ATP_rheostatbiocrnpyler_745024_combined_model_of__biocrnpyler_715245_biocrnpyler_745024_k*enzyme_yahk_ATP_rheostatbiocrnpyler_745024_combined_model_of__biocrnpyler_715245_biocrnpyler_745024*molecule_isobutanol_ATP_rheostatbiocrnpyler_745024_combined_model_of__biocrnpyler_715245_biocrnpyler_745024*metabolite_nadp_ATP_rheostatbiocrnpyler_745024_combined_model_of__biocrnpyler_715245_biocrnpyler_745024;
    r73_1_ATP_rheostatbiocrnpyler_745024_combined_model_of__biocrnpyler_715245_biocrnpyler_745024_k = 0.0004166667;
  r75_ATP_rheostatbiocrnpyler_745024_combined_model_of__biocrnpyler_715245_biocrnpyler_745024: enzyme_atp_use_ATP_rheostatbiocrnpyler_745024_combined_model_of__biocrnpyler_715245_biocrnpyler_745024 + ATP_virE2biocrnpyler_715245_1_combined_combined_model_of__biocrnpyler_715245_biocrnpyler_745024 => complex_enzyme_atp_use_metabolite_atp_ATP_rheostatbiocrnpyler_745024_combined_model_of__biocrnpyler_715245_biocrnpyler_745024; r75_ATP_rheostatbiocrnpyler_745024_combined_model_of__biocrnpyler_715245_biocrnpyler_745024_k*enzyme_atp_use_ATP_rheostatbiocrnpyler_745024_combined_model_of__biocrnpyler_715245_biocrnpyler_745024*ATP_virE2biocrnpyler_715245_1_combined_combined_model_of__biocrnpyler_715245_biocrnpyler_745024;
    r75_ATP_rheostatbiocrnpyler_745024_combined_model_of__biocrnpyler_715245_biocrnpyler_745024_k = 0.004166667;
  r75_1_ATP_rheostatbiocrnpyler_745024_combined_model_of__biocrnpyler_715245_biocrnpyler_745024: complex_enzyme_atp_use_metabolite_atp_ATP_rheostatbiocrnpyler_745024_combined_model_of__biocrnpyler_715245_biocrnpyler_745024 => enzyme_atp_use_ATP_rheostatbiocrnpyler_745024_combined_model_of__biocrnpyler_715245_biocrnpyler_745024 + ATP_virE2biocrnpyler_715245_1_combined_combined_model_of__biocrnpyler_715245_biocrnpyler_745024; r75_1_ATP_rheostatbiocrnpyler_745024_combined_model_of__biocrnpyler_715245_biocrnpyler_745024_k*complex_enzyme_atp_use_metabolite_atp_ATP_rheostatbiocrnpyler_745024_combined_model_of__biocrnpyler_715245_biocrnpyler_745024;
    r75_1_ATP_rheostatbiocrnpyler_745024_combined_model_of__biocrnpyler_715245_biocrnpyler_745024_k = 0.0004166667;
  r77_ATP_rheostatbiocrnpyler_745024_combined_model_of__biocrnpyler_715245_biocrnpyler_745024: complex_enzyme_atp_use_metabolite_atp_ATP_rheostatbiocrnpyler_745024_combined_model_of__biocrnpyler_715245_biocrnpyler_745024 => complex_enzyme_atp_use_metabolite_adp_metabolite_pi_ATP_rheostatbiocrnpyler_745024_combined_model_of__biocrnpyler_715245_biocrnpyler_745024; r77_ATP_rheostatbiocrnpyler_745024_combined_model_of__biocrnpyler_715245_biocrnpyler_745024_k*complex_enzyme_atp_use_metabolite_atp_ATP_rheostatbiocrnpyler_745024_combined_model_of__biocrnpyler_715245_biocrnpyler_745024;
    r77_ATP_rheostatbiocrnpyler_745024_combined_model_of__biocrnpyler_715245_biocrnpyler_745024_k = 2;
  r78_ATP_rheostatbiocrnpyler_745024_combined_model_of__biocrnpyler_715245_biocrnpyler_745024: complex_enzyme_atp_use_metabolite_adp_metabolite_pi_ATP_rheostatbiocrnpyler_745024_combined_model_of__biocrnpyler_715245_biocrnpyler_745024 => enzyme_atp_use_ATP_rheostatbiocrnpyler_745024_combined_model_of__biocrnpyler_715245_biocrnpyler_745024 + ADP_virE2biocrnpyler_715245_1_combined_combined_model_of__biocrnpyler_715245_biocrnpyler_745024 + P_virE2biocrnpyler_715245_1_combined_combined_model_of__biocrnpyler_715245_biocrnpyler_745024; r78_ATP_rheostatbiocrnpyler_745024_combined_model_of__biocrnpyler_715245_biocrnpyler_745024_k*complex_enzyme_atp_use_metabolite_adp_metabolite_pi_ATP_rheostatbiocrnpyler_745024_combined_model_of__biocrnpyler_715245_biocrnpyler_745024;
    r78_ATP_rheostatbiocrnpyler_745024_combined_model_of__biocrnpyler_715245_biocrnpyler_745024_k = 0.004166667;
  r78_1_ATP_rheostatbiocrnpyler_745024_combined_model_of__biocrnpyler_715245_biocrnpyler_745024: enzyme_atp_use_ATP_rheostatbiocrnpyler_745024_combined_model_of__biocrnpyler_715245_biocrnpyler_745024 + ADP_virE2biocrnpyler_715245_1_combined_combined_model_of__biocrnpyler_715245_biocrnpyler_745024 + P_virE2biocrnpyler_715245_1_combined_combined_model_of__biocrnpyler_715245_biocrnpyler_745024 => complex_enzyme_atp_use_metabolite_adp_metabolite_pi_ATP_rheostatbiocrnpyler_745024_combined_model_of__biocrnpyler_715245_biocrnpyler_745024; r78_1_ATP_rheostatbiocrnpyler_745024_combined_model_of__biocrnpyler_715245_biocrnpyler_745024_k*enzyme_atp_use_ATP_rheostatbiocrnpyler_745024_combined_model_of__biocrnpyler_715245_biocrnpyler_745024*ADP_virE2biocrnpyler_715245_1_combined_combined_model_of__biocrnpyler_715245_biocrnpyler_745024*P_virE2biocrnpyler_715245_1_combined_combined_model_of__biocrnpyler_715245_biocrnpyler_745024;
    r78_1_ATP_rheostatbiocrnpyler_745024_combined_model_of__biocrnpyler_715245_biocrnpyler_745024_k = 0.0004166667;

  // Unit definitions:
  unit square_metre = metre^2;
  unit per_second = 1 / second;
  unit substance = dimensionless;
end
