// SBML level 3 version 2

model combined_model_of__biocrnpyler_715245_biocrnpyler_610971()
  // model units - substance: mole, time: second, volume: litre, area: square_metre, length: metre, extent: mole

  // Compartments:
  compartment default_virE2biocrnpyler_715245_combined = 2e-6;

  // Species:
  species dna_g_virE2biocrnpyler_715245 in default_virE2biocrnpyler_715245_combined = 0;
  species tetR_virE2biocrnpyler_715245 in default_virE2biocrnpyler_715245_combined = 0;
  species rna_g_virE2biocrnpyler_715245 in default_virE2biocrnpyler_715245_combined = 0;
  species VirE2_f_virE2biocrnpyler_715245 in default_virE2biocrnpyler_715245_combined = 0;
  species ADP_virE2biocrnpyler_715245 in default_virE2biocrnpyler_715245_combined = 0;
  species atc_i_virE2biocrnpyler_715245 in default_virE2biocrnpyler_715245_combined = 0;
  species complex_atc_i_tetR_virE2biocrnpyler_715245 in default_virE2biocrnpyler_715245_combined = 0;
  species VirE2_b_virE2biocrnpyler_715245 in default_virE2biocrnpyler_715245_combined = 0;
  species complex_dna_g_tetR_virE2biocrnpyler_715245 in default_virE2biocrnpyler_715245_combined = 0;
  species complex_atc_i_dna_g_tetR_virE2biocrnpyler_715245 in default_virE2biocrnpyler_715245_combined = 0;
  species rna_atpsyn_atp_synthasebiocrnpyler_610971 in default_virE2biocrnpyler_715245_combined = 0;
  species dna_atpsyn_atp_synthasebiocrnpyler_610971 in default_virE2biocrnpyler_715245_combined = 0;
  species protein_atpsyn_atp_synthasebiocrnpyler_610971 in default_virE2biocrnpyler_715245_combined = 0;
  species protein_RNAP_machinery_atp_synthasebiocrnpyler_610971 in default_virE2biocrnpyler_715245_combined = 0;
  species protein_Ribo_machinery_atp_synthasebiocrnpyler_610971 in default_virE2biocrnpyler_715245_combined = 0;
  species protein_RNAse_machinery_atp_synthasebiocrnpyler_610971 in default_virE2biocrnpyler_715245_combined = 0;
  species complex_dna_atpsyn_protein_RNAP_machinery_atp_synthasebiocrnpyler_610971 in default_virE2biocrnpyler_715245_combined = 0;
  species complex_protein_Ribo_machinery_rna_atpsyn_atp_synthasebiocrnpyler_610971 in default_virE2biocrnpyler_715245_combined = 0;
  species complex_protein_RNAse_machinery_rna_atpsyn_atp_synthasebiocrnpyler_610971 in default_virE2biocrnpyler_715245_combined = 0;
  species protein_atpsyn_b_atp_synthasebiocrnpyler_610971 in default_virE2biocrnpyler_715245_combined = 0;
  species proton_outside_H_atp_synthasebiocrnpyler_610971 in default_virE2biocrnpyler_715245_combined = 0;
  species proton_inside_H_atp_synthasebiocrnpyler_610971 in default_virE2biocrnpyler_715245_combined = 0;
  species metabolite_adp_atp_synthasebiocrnpyler_610971 in default_virE2biocrnpyler_715245_combined = 0;
  species ATP_virE2biocrnpyler_715245_1_combined in default_virE2biocrnpyler_715245_combined = 0; ATP_virE2biocrnpyler_715245_1_combined is "metabolite_atp";
  species P_virE2biocrnpyler_715245_1_combined in default_virE2biocrnpyler_715245_combined = 0; P_virE2biocrnpyler_715245_1_combined is "metabolite_pi";
  species rna_proton_pump_atp_synthasebiocrnpyler_610971 in default_virE2biocrnpyler_715245_combined = 0;
  species dna_proton_pump_atp_synthasebiocrnpyler_610971 in default_virE2biocrnpyler_715245_combined = 0;
  species protein_proton_pump_atp_synthasebiocrnpyler_610971 in default_virE2biocrnpyler_715245_combined = 0;
  species protein_proton_pump_b_atp_synthasebiocrnpyler_610971 in default_virE2biocrnpyler_715245_combined = 0;
  species complex_dna_proton_pump_protein_RNAP_machinery_atp_synthasebiocrnpyler_610971 in default_virE2biocrnpyler_715245_combined = 0;
  species complex_protein_Ribo_machinery_rna_proton_pump_atp_synthasebiocrnpyler_610971 in default_virE2biocrnpyler_715245_combined = 0;
  species complex_protein_RNAse_machinery_rna_proton_pump_atp_synthasebiocrnpyler_610971 in default_virE2biocrnpyler_715245_combined = 0;

  // Reactions:
  r0_virE2biocrnpyler_715245: atc_i_virE2biocrnpyler_715245 + tetR_virE2biocrnpyler_715245 => complex_atc_i_tetR_virE2biocrnpyler_715245; r0_virE2biocrnpyler_715245_k*atc_i_virE2biocrnpyler_715245*tetR_virE2biocrnpyler_715245;
    r0_virE2biocrnpyler_715245_k = 0.0002;
  r0_1_virE2biocrnpyler_715245: complex_atc_i_tetR_virE2biocrnpyler_715245 => atc_i_virE2biocrnpyler_715245 + tetR_virE2biocrnpyler_715245; r0_1_virE2biocrnpyler_715245_k*complex_atc_i_tetR_virE2biocrnpyler_715245;
    r0_1_virE2biocrnpyler_715245_k = 2e-9;
  r2_virE2biocrnpyler_715245: dna_g_virE2biocrnpyler_715245 + tetR_virE2biocrnpyler_715245 => complex_dna_g_tetR_virE2biocrnpyler_715245; r2_virE2biocrnpyler_715245_k*dna_g_virE2biocrnpyler_715245*tetR_virE2biocrnpyler_715245;
    r2_virE2biocrnpyler_715245_k = 4e-5;
  r2_1_virE2biocrnpyler_715245: complex_dna_g_tetR_virE2biocrnpyler_715245 => dna_g_virE2biocrnpyler_715245 + tetR_virE2biocrnpyler_715245; r2_1_virE2biocrnpyler_715245_k*complex_dna_g_tetR_virE2biocrnpyler_715245;
    r2_1_virE2biocrnpyler_715245_k = 1e-12;
  r4_virE2biocrnpyler_715245: complex_dna_g_tetR_virE2biocrnpyler_715245 + atc_i_virE2biocrnpyler_715245 => complex_atc_i_dna_g_tetR_virE2biocrnpyler_715245; r4_virE2biocrnpyler_715245_k*complex_dna_g_tetR_virE2biocrnpyler_715245*atc_i_virE2biocrnpyler_715245;
    r4_virE2biocrnpyler_715245_k = 6e-6;
  r4_1_virE2biocrnpyler_715245: complex_atc_i_dna_g_tetR_virE2biocrnpyler_715245 => complex_dna_g_tetR_virE2biocrnpyler_715245 + atc_i_virE2biocrnpyler_715245; r4_1_virE2biocrnpyler_715245_k*complex_atc_i_dna_g_tetR_virE2biocrnpyler_715245;
    r4_1_virE2biocrnpyler_715245_k = 3e-9;
  r6_virE2biocrnpyler_715245: complex_atc_i_dna_g_tetR_virE2biocrnpyler_715245 => dna_g_virE2biocrnpyler_715245 + complex_atc_i_tetR_virE2biocrnpyler_715245; r6_virE2biocrnpyler_715245_k*complex_atc_i_dna_g_tetR_virE2biocrnpyler_715245;
    r6_virE2biocrnpyler_715245_k = 0.005;
  r6_1_virE2biocrnpyler_715245: dna_g_virE2biocrnpyler_715245 + complex_atc_i_tetR_virE2biocrnpyler_715245 => complex_atc_i_dna_g_tetR_virE2biocrnpyler_715245; r6_1_virE2biocrnpyler_715245_k*dna_g_virE2biocrnpyler_715245*complex_atc_i_tetR_virE2biocrnpyler_715245;
    r6_1_virE2biocrnpyler_715245_k = 1e-10;
  r8_virE2biocrnpyler_715245: dna_g_virE2biocrnpyler_715245 => dna_g_virE2biocrnpyler_715245 + rna_g_virE2biocrnpyler_715245; r8_virE2biocrnpyler_715245_k*dna_g_virE2biocrnpyler_715245;
    r8_virE2biocrnpyler_715245_k = 0.0031875;
  r9_virE2biocrnpyler_715245: rna_g_virE2biocrnpyler_715245 + ATP_virE2biocrnpyler_715245_1_combined => rna_g_virE2biocrnpyler_715245 + ADP_virE2biocrnpyler_715245 + VirE2_f_virE2biocrnpyler_715245 + P_virE2biocrnpyler_715245_1_combined; r9_virE2biocrnpyler_715245_k*rna_g_virE2biocrnpyler_715245*ATP_virE2biocrnpyler_715245_1_combined^r9_virE2biocrnpyler_715245_n/(ATP_virE2biocrnpyler_715245_1_combined^r9_virE2biocrnpyler_715245_n + r9_virE2biocrnpyler_715245_K);
    r9_virE2biocrnpyler_715245_k = 0.001; r9_virE2biocrnpyler_715245_n = 1; r9_virE2biocrnpyler_715245_K = 1;
  r10_virE2biocrnpyler_715245: VirE2_f_virE2biocrnpyler_715245 => VirE2_b_virE2biocrnpyler_715245; r10_virE2biocrnpyler_715245_k*VirE2_f_virE2biocrnpyler_715245/(VirE2_b_virE2biocrnpyler_715245^r10_virE2biocrnpyler_715245_n + r10_virE2biocrnpyler_715245_K);
    r10_virE2biocrnpyler_715245_k = 0.0005; r10_virE2biocrnpyler_715245_n = 1; r10_virE2biocrnpyler_715245_K = 1;
  r11_virE2biocrnpyler_715245: rna_g_virE2biocrnpyler_715245 => ; r11_virE2biocrnpyler_715245_k*rna_g_virE2biocrnpyler_715245;
    r11_virE2biocrnpyler_715245_k = 0.001;
  r12_virE2biocrnpyler_715245: VirE2_f_virE2biocrnpyler_715245 => ; r12_virE2biocrnpyler_715245_k*VirE2_f_virE2biocrnpyler_715245;
    r12_virE2biocrnpyler_715245_k = 1e-5;
  r0_atp_synthasebiocrnpyler_610971: dna_atpsyn_atp_synthasebiocrnpyler_610971 + protein_RNAP_machinery_atp_synthasebiocrnpyler_610971 => complex_dna_atpsyn_protein_RNAP_machinery_atp_synthasebiocrnpyler_610971; r0_atp_synthasebiocrnpyler_610971_k*dna_atpsyn_atp_synthasebiocrnpyler_610971*protein_RNAP_machinery_atp_synthasebiocrnpyler_610971;
    r0_atp_synthasebiocrnpyler_610971_k = 100;
  r1_atp_synthasebiocrnpyler_610971: complex_dna_atpsyn_protein_RNAP_machinery_atp_synthasebiocrnpyler_610971 => rna_atpsyn_atp_synthasebiocrnpyler_610971 + protein_RNAP_machinery_atp_synthasebiocrnpyler_610971; r1_atp_synthasebiocrnpyler_610971_k*complex_dna_atpsyn_protein_RNAP_machinery_atp_synthasebiocrnpyler_610971;
    r1_atp_synthasebiocrnpyler_610971_k = 0.05;
  r2_atp_synthasebiocrnpyler_610971: rna_atpsyn_atp_synthasebiocrnpyler_610971 + protein_Ribo_machinery_atp_synthasebiocrnpyler_610971 => complex_protein_Ribo_machinery_rna_atpsyn_atp_synthasebiocrnpyler_610971; r2_atp_synthasebiocrnpyler_610971_k*rna_atpsyn_atp_synthasebiocrnpyler_610971*protein_Ribo_machinery_atp_synthasebiocrnpyler_610971;
    r2_atp_synthasebiocrnpyler_610971_k = 100;
  r3_atp_synthasebiocrnpyler_610971: complex_protein_Ribo_machinery_rna_atpsyn_atp_synthasebiocrnpyler_610971 => rna_atpsyn_atp_synthasebiocrnpyler_610971 + protein_atpsyn_atp_synthasebiocrnpyler_610971 + protein_Ribo_machinery_atp_synthasebiocrnpyler_610971; r3_atp_synthasebiocrnpyler_610971_k*complex_protein_Ribo_machinery_rna_atpsyn_atp_synthasebiocrnpyler_610971;
    r3_atp_synthasebiocrnpyler_610971_k = 0.05;
  r4_atp_synthasebiocrnpyler_610971: rna_atpsyn_atp_synthasebiocrnpyler_610971 + protein_RNAse_machinery_atp_synthasebiocrnpyler_610971 => complex_protein_RNAse_machinery_rna_atpsyn_atp_synthasebiocrnpyler_610971; r4_atp_synthasebiocrnpyler_610971_k*rna_atpsyn_atp_synthasebiocrnpyler_610971*protein_RNAse_machinery_atp_synthasebiocrnpyler_610971;
    r4_atp_synthasebiocrnpyler_610971_k = 100;
  r5_atp_synthasebiocrnpyler_610971: complex_protein_RNAse_machinery_rna_atpsyn_atp_synthasebiocrnpyler_610971 => protein_RNAse_machinery_atp_synthasebiocrnpyler_610971; r5_atp_synthasebiocrnpyler_610971_k*complex_protein_RNAse_machinery_rna_atpsyn_atp_synthasebiocrnpyler_610971;
    r5_atp_synthasebiocrnpyler_610971_k = 0.001;
  r6_atp_synthasebiocrnpyler_610971: protein_atpsyn_atp_synthasebiocrnpyler_610971 => protein_atpsyn_b_atp_synthasebiocrnpyler_610971; r6_atp_synthasebiocrnpyler_610971_k*protein_atpsyn_atp_synthasebiocrnpyler_610971;
    r6_atp_synthasebiocrnpyler_610971_k = 0.0003;
  r7_atp_synthasebiocrnpyler_610971: 4 proton_outside_H_atp_synthasebiocrnpyler_610971 + metabolite_adp_atp_synthasebiocrnpyler_610971 + P_virE2biocrnpyler_715245_1_combined + protein_atpsyn_b_atp_synthasebiocrnpyler_610971 => 4 proton_inside_H_atp_synthasebiocrnpyler_610971 + ATP_virE2biocrnpyler_715245_1_combined + protein_atpsyn_b_atp_synthasebiocrnpyler_610971; r7_atp_synthasebiocrnpyler_610971_k*proton_outside_H_atp_synthasebiocrnpyler_610971^4*metabolite_adp_atp_synthasebiocrnpyler_610971*P_virE2biocrnpyler_715245_1_combined*protein_atpsyn_b_atp_synthasebiocrnpyler_610971;
    r7_atp_synthasebiocrnpyler_610971_k = 100;
  r8_atp_synthasebiocrnpyler_610971: dna_proton_pump_atp_synthasebiocrnpyler_610971 + protein_RNAP_machinery_atp_synthasebiocrnpyler_610971 => complex_dna_proton_pump_protein_RNAP_machinery_atp_synthasebiocrnpyler_610971; r8_atp_synthasebiocrnpyler_610971_k*dna_proton_pump_atp_synthasebiocrnpyler_610971*protein_RNAP_machinery_atp_synthasebiocrnpyler_610971;
    r8_atp_synthasebiocrnpyler_610971_k = 100;
  r9_atp_synthasebiocrnpyler_610971: complex_dna_proton_pump_protein_RNAP_machinery_atp_synthasebiocrnpyler_610971 => rna_proton_pump_atp_synthasebiocrnpyler_610971 + protein_RNAP_machinery_atp_synthasebiocrnpyler_610971; r9_atp_synthasebiocrnpyler_610971_k*complex_dna_proton_pump_protein_RNAP_machinery_atp_synthasebiocrnpyler_610971;
    r9_atp_synthasebiocrnpyler_610971_k = 0.05;
  r10_atp_synthasebiocrnpyler_610971: rna_proton_pump_atp_synthasebiocrnpyler_610971 + protein_Ribo_machinery_atp_synthasebiocrnpyler_610971 => complex_protein_Ribo_machinery_rna_proton_pump_atp_synthasebiocrnpyler_610971; r10_atp_synthasebiocrnpyler_610971_k*rna_proton_pump_atp_synthasebiocrnpyler_610971*protein_Ribo_machinery_atp_synthasebiocrnpyler_610971;
    r10_atp_synthasebiocrnpyler_610971_k = 100;
  r11_atp_synthasebiocrnpyler_610971: complex_protein_Ribo_machinery_rna_proton_pump_atp_synthasebiocrnpyler_610971 => rna_proton_pump_atp_synthasebiocrnpyler_610971 + protein_proton_pump_atp_synthasebiocrnpyler_610971 + protein_Ribo_machinery_atp_synthasebiocrnpyler_610971; r11_atp_synthasebiocrnpyler_610971_k*complex_protein_Ribo_machinery_rna_proton_pump_atp_synthasebiocrnpyler_610971;
    r11_atp_synthasebiocrnpyler_610971_k = 0.05;
  r12_atp_synthasebiocrnpyler_610971: rna_proton_pump_atp_synthasebiocrnpyler_610971 + protein_RNAse_machinery_atp_synthasebiocrnpyler_610971 => complex_protein_RNAse_machinery_rna_proton_pump_atp_synthasebiocrnpyler_610971; r12_atp_synthasebiocrnpyler_610971_k*rna_proton_pump_atp_synthasebiocrnpyler_610971*protein_RNAse_machinery_atp_synthasebiocrnpyler_610971;
    r12_atp_synthasebiocrnpyler_610971_k = 100;
  r13_atp_synthasebiocrnpyler_610971: complex_protein_RNAse_machinery_rna_proton_pump_atp_synthasebiocrnpyler_610971 => protein_RNAse_machinery_atp_synthasebiocrnpyler_610971; r13_atp_synthasebiocrnpyler_610971_k*complex_protein_RNAse_machinery_rna_proton_pump_atp_synthasebiocrnpyler_610971;
    r13_atp_synthasebiocrnpyler_610971_k = 0.001;
  r14_atp_synthasebiocrnpyler_610971: protein_proton_pump_atp_synthasebiocrnpyler_610971 => protein_proton_pump_b_atp_synthasebiocrnpyler_610971; r14_atp_synthasebiocrnpyler_610971_k*protein_proton_pump_atp_synthasebiocrnpyler_610971;
    r14_atp_synthasebiocrnpyler_610971_k = 0.0003;
  r15_atp_synthasebiocrnpyler_610971: metabolite_adp_atp_synthasebiocrnpyler_610971 + P_virE2biocrnpyler_715245_1_combined => ATP_virE2biocrnpyler_715245_1_combined; r15_atp_synthasebiocrnpyler_610971_k*metabolite_adp_atp_synthasebiocrnpyler_610971*P_virE2biocrnpyler_715245_1_combined;
    r15_atp_synthasebiocrnpyler_610971_k = 0.2;
  r16_atp_synthasebiocrnpyler_610971: 4 proton_inside_H_atp_synthasebiocrnpyler_610971 => 4 proton_outside_H_atp_synthasebiocrnpyler_610971; r16_atp_synthasebiocrnpyler_610971_k*proton_inside_H_atp_synthasebiocrnpyler_610971^4;
    r16_atp_synthasebiocrnpyler_610971_k = 100;

  // Unit definitions:
  unit square_metre = metre^2;
end
