// SBML level 3 version 2

model combined_model_of__combined_model_of__external_reservoir_model_combined_model_of__atc_membrane_combined_model_of__biocrnpyler_468481()
  // model units - substance: mole, time: second, volume: litre, area: square_metre, length: metre, extent: mole

  // Compartments:
  compartment cellfusedexternal2 = 2e-6 litre;
  compartment cellfusedinternal2 = 1e-6 litre;

  // Species:
  species atc_e_external_reservoir_model_1_combined in cellfusedexternal2 = 10000/cellfusedexternal2;
  species atc_i in cellfusedinternal2 = 0;
  species dna_h_biocrnpyler_468481 in cellfusedinternal2 = 1/cellfusedinternal2;
  species rna_h_biocrnpyler_468481 in cellfusedinternal2 = 0;
  species exsA_biocrnpyler_468481 in cellfusedinternal2 = 0;
  species ATP_biocrnpyler_468481 in cellfusedinternal2 = 20/cellfusedinternal2;
  species ADP_biocrnpyler_468481 in cellfusedinternal2 = 0;
  species P_biocrnpyler_468481 in cellfusedinternal2 = 0;
  species complex_dna_h_exsA_biocrnpyler_468481 in cellfusedinternal2 = 0;
  species gfp_biocrnpyler_468481 in cellfusedinternal2 = 0;

  // Parameters:
  kb = 0.002 per_second;
  kd = 1e-5 per_second;

  // Reactions:
  r1: atc_e_external_reservoir_model_1_combined -> atc_i; kb*atc_e_external_reservoir_model_1_combined - kd*atc_i;
  r0_biocrnpyler_468481: dna_h_biocrnpyler_468481 + exsA_biocrnpyler_468481 => complex_dna_h_exsA_biocrnpyler_468481; r0_biocrnpyler_468481_k*dna_h_biocrnpyler_468481*exsA_biocrnpyler_468481;
    r0_biocrnpyler_468481_k = 4e-5;
  r0_1_biocrnpyler_468481: complex_dna_h_exsA_biocrnpyler_468481 => dna_h_biocrnpyler_468481 + exsA_biocrnpyler_468481; r0_1_biocrnpyler_468481_k*complex_dna_h_exsA_biocrnpyler_468481;
    r0_1_biocrnpyler_468481_k = 1e-12;
  r2_biocrnpyler_468481: complex_dna_h_exsA_biocrnpyler_468481 => complex_dna_h_exsA_biocrnpyler_468481 + rna_h_biocrnpyler_468481; r2_biocrnpyler_468481_k*complex_dna_h_exsA_biocrnpyler_468481;
    r2_biocrnpyler_468481_k = 0.001875;
  r3_biocrnpyler_468481: rna_h_biocrnpyler_468481 + ATP_biocrnpyler_468481 => rna_h_biocrnpyler_468481 + ADP_biocrnpyler_468481 + gfp_biocrnpyler_468481 + P_biocrnpyler_468481; r3_biocrnpyler_468481_k*rna_h_biocrnpyler_468481*ATP_biocrnpyler_468481^n/(ATP_biocrnpyler_468481^n + K);
    r3_biocrnpyler_468481_k = 0.0007; n = 1; K = 1;
  r4_biocrnpyler_468481: rna_h_biocrnpyler_468481 => ; r4_biocrnpyler_468481_k*rna_h_biocrnpyler_468481;
    r4_biocrnpyler_468481_k = 0.001;

  // Unit definitions:
  unit square_metre = metre^2;
  unit per_second = 1 / second;
  unit substance = dimensionless;
end
