// SBML level 3 version 2

model combined_model_of__biocrnpyler_369332_biocrnpyler_334638()
  // model units - substance: mole, time: second, volume: litre, area: square_metre, length: metre, extent: mole

  // Compartments:
  compartment default_vire2biocrnpyler_369332_combined = 2e-6;

  // Species:
  species dna_g_vire2biocrnpyler_369332 in default_vire2biocrnpyler_369332_combined = 1/default_vire2biocrnpyler_369332_combined;
  species tetR_vire2biocrnpyler_369332 in default_vire2biocrnpyler_369332_combined = 10/default_vire2biocrnpyler_369332_combined;
  species rna_g_vire2biocrnpyler_369332 in default_vire2biocrnpyler_369332_combined = 0;
  species VirE2_f_vire2biocrnpyler_369332 in default_vire2biocrnpyler_369332_combined = 0;
  species aTc_i_vire2biocrnpyler_369332 in default_vire2biocrnpyler_369332_combined = 15/default_vire2biocrnpyler_369332_combined;
  species complex_aTc_i_tetR_vire2biocrnpyler_369332 in default_vire2biocrnpyler_369332_combined = 0;
  species VirE2_b_vire2biocrnpyler_369332 in default_vire2biocrnpyler_369332_combined = 0;
  species complex_dna_g_tetR_vire2biocrnpyler_369332 in default_vire2biocrnpyler_369332_combined = 0;
  species complex_aTc_i_dna_g_tetR_vire2biocrnpyler_369332 in default_vire2biocrnpyler_369332_combined = 0;
  species enzyme_hex_rheostatbiocrnpyler_334638 in default_vire2biocrnpyler_369332_combined = 0.2/default_vire2biocrnpyler_369332_combined;
  species ATP_vire2biocrnpyler_369332_1_combined in default_vire2biocrnpyler_369332_combined = 30/default_vire2biocrnpyler_369332_combined; ATP_vire2biocrnpyler_369332_1_combined is "metabolite_atp";
  species molecule_glucose_rheostatbiocrnpyler_334638 in default_vire2biocrnpyler_369332_combined = 30/default_vire2biocrnpyler_369332_combined;
  species molecule_g6p_rheostatbiocrnpyler_334638 in default_vire2biocrnpyler_369332_combined = 0;
  species ADP_vire2biocrnpyler_369332_1_combined in default_vire2biocrnpyler_369332_combined = 0; ADP_vire2biocrnpyler_369332_1_combined is "metabolite_adp";
  species complex_enzyme_hex_metabolite_atp_molecule_glucose_rheostatbiocrnpyler_334638 in default_vire2biocrnpyler_369332_combined = 0;
  species complex_enzyme_hex_metabolite_adp_molecule_g6p_rheostatbiocrnpyler_334638 in default_vire2biocrnpyler_369332_combined = 0;
  species enzyme_pgi_rheostatbiocrnpyler_334638 in default_vire2biocrnpyler_369332_combined = 0.2/default_vire2biocrnpyler_369332_combined;
  species molecule_f6p_rheostatbiocrnpyler_334638 in default_vire2biocrnpyler_369332_combined = 0;
  species complex_enzyme_pgi_molecule_g6p_rheostatbiocrnpyler_334638 in default_vire2biocrnpyler_369332_combined = 0;
  species complex_enzyme_pgi_molecule_f6p_rheostatbiocrnpyler_334638 in default_vire2biocrnpyler_369332_combined = 0;
  species enzyme_pfk_rheostatbiocrnpyler_334638 in default_vire2biocrnpyler_369332_combined = 0.2/default_vire2biocrnpyler_369332_combined;
  species molecule_f16p_rheostatbiocrnpyler_334638 in default_vire2biocrnpyler_369332_combined = 0;
  species complex_enzyme_pfk_metabolite_atp_molecule_f6p_rheostatbiocrnpyler_334638 in default_vire2biocrnpyler_369332_combined = 0;
  species complex_enzyme_pfk_metabolite_adp_molecule_f16p_rheostatbiocrnpyler_334638 in default_vire2biocrnpyler_369332_combined = 0;
  species enzyme_ald_tpi_rheostatbiocrnpyler_334638 in default_vire2biocrnpyler_369332_combined = 0.2/default_vire2biocrnpyler_369332_combined;
  species molecule_g3p_rheostatbiocrnpyler_334638 in default_vire2biocrnpyler_369332_combined = 0;
  species complex_enzyme_ald_tpi_molecule_f16p_rheostatbiocrnpyler_334638 in default_vire2biocrnpyler_369332_combined = 0;
  species complex_enzyme_ald_tpi_2x_molecule_g3p_rheostatbiocrnpyler_334638 in default_vire2biocrnpyler_369332_combined = 0;
  species enzyme_gapN_rheostatbiocrnpyler_334638 in default_vire2biocrnpyler_369332_combined = 0.2/default_vire2biocrnpyler_369332_combined;
  species metabolite_nadp_rheostatbiocrnpyler_334638 in default_vire2biocrnpyler_369332_combined = 30/default_vire2biocrnpyler_369332_combined;
  species molecule_3pg_rheostatbiocrnpyler_334638 in default_vire2biocrnpyler_369332_combined = 0;
  species metabolite_nadph_rheostatbiocrnpyler_334638 in default_vire2biocrnpyler_369332_combined = 0;
  species complex_enzyme_gapN_2x_metabolite_nadp_2x_molecule_g3p_rheostatbiocrnpyler_334638 in default_vire2biocrnpyler_369332_combined = 0;
  species complex_enzyme_gapN_2x_metabolite_nadph_2x_molecule_3pg_rheostatbiocrnpyler_334638 in default_vire2biocrnpyler_369332_combined = 0;
  species enzyme_mGapDH_rheostatbiocrnpyler_334638 in default_vire2biocrnpyler_369332_combined = 0.2/default_vire2biocrnpyler_369332_combined;
  species P_vire2biocrnpyler_369332_1_combined in default_vire2biocrnpyler_369332_combined = 30/default_vire2biocrnpyler_369332_combined; P_vire2biocrnpyler_369332_1_combined is "metabolite_pi";
  species molecule_13bpg_rheostatbiocrnpyler_334638 in default_vire2biocrnpyler_369332_combined = 0;
  species complex_enzyme_mGapDH_2x_metabolite_nadp_metabolite_pi_2x_molecule_g3p_rheostatbiocrnpyler_334638 in default_vire2biocrnpyler_369332_combined = 0;
  species complex_enzyme_mGapDH_2x_metabolite_nadph_molecule_13bpg_rheostatbiocrnpyler_334638 in default_vire2biocrnpyler_369332_combined = 0;
  species enzyme_pgk_rheostatbiocrnpyler_334638 in default_vire2biocrnpyler_369332_combined = 0.2/default_vire2biocrnpyler_369332_combined;
  species complex_enzyme_pgk_metabolite_adp_molecule_13bpg_rheostatbiocrnpyler_334638 in default_vire2biocrnpyler_369332_combined = 0;
  species complex_enzyme_pgk_metabolite_atp_2x_molecule_3pg_rheostatbiocrnpyler_334638 in default_vire2biocrnpyler_369332_combined = 0;
  species enzyme_pgm_rheostatbiocrnpyler_334638 in default_vire2biocrnpyler_369332_combined = 0.2/default_vire2biocrnpyler_369332_combined;
  species molecule_2pg_rheostatbiocrnpyler_334638 in default_vire2biocrnpyler_369332_combined = 0;
  species complex_enzyme_pgm_2x_molecule_3pg_rheostatbiocrnpyler_334638 in default_vire2biocrnpyler_369332_combined = 0;
  species complex_enzyme_pgm_2x_molecule_2pg_rheostatbiocrnpyler_334638 in default_vire2biocrnpyler_369332_combined = 0;
  species enzyme_eno_rheostatbiocrnpyler_334638 in default_vire2biocrnpyler_369332_combined = 0.2/default_vire2biocrnpyler_369332_combined;
  species molecule_pep_rheostatbiocrnpyler_334638 in default_vire2biocrnpyler_369332_combined = 0;
  species complex_enzyme_eno_2x_molecule_2pg_rheostatbiocrnpyler_334638 in default_vire2biocrnpyler_369332_combined = 0;
  species complex_enzyme_eno_2x_molecule_pep_rheostatbiocrnpyler_334638 in default_vire2biocrnpyler_369332_combined = 0;
  species enzyme_pyk_rheostatbiocrnpyler_334638 in default_vire2biocrnpyler_369332_combined = 0.2/default_vire2biocrnpyler_369332_combined;
  species molecule_pyruvate_rheostatbiocrnpyler_334638 in default_vire2biocrnpyler_369332_combined = 0;
  species complex_enzyme_pyk_2x_metabolite_adp_2x_molecule_pep_rheostatbiocrnpyler_334638 in default_vire2biocrnpyler_369332_combined = 0;
  species complex_enzyme_pyk_2x_metabolite_atp_2x_molecule_pyruvate_rheostatbiocrnpyler_334638 in default_vire2biocrnpyler_369332_combined = 0;
  species enzyme_alsS_rheostatbiocrnpyler_334638 in default_vire2biocrnpyler_369332_combined = 0.2/default_vire2biocrnpyler_369332_combined;
  species molecule_acetolac_rheostatbiocrnpyler_334638 in default_vire2biocrnpyler_369332_combined = 0;
  species complex_enzyme_alsS_2x_molecule_pyruvate_rheostatbiocrnpyler_334638 in default_vire2biocrnpyler_369332_combined = 0;
  species complex_enzyme_alsS_molecule_acetolac_rheostatbiocrnpyler_334638 in default_vire2biocrnpyler_369332_combined = 0;
  species enzyme_IlvC_rheostatbiocrnpyler_334638 in default_vire2biocrnpyler_369332_combined = 0.2/default_vire2biocrnpyler_369332_combined;
  species molecule_23dih3mebut_rheostatbiocrnpyler_334638 in default_vire2biocrnpyler_369332_combined = 0;
  species complex_enzyme_IlvC_metabolite_nadph_molecule_acetolac_rheostatbiocrnpyler_334638 in default_vire2biocrnpyler_369332_combined = 0;
  species complex_enzyme_IlvC_metabolite_nadp_molecule_23dih3mebut_rheostatbiocrnpyler_334638 in default_vire2biocrnpyler_369332_combined = 0;
  species enzyme_IlvD_rheostatbiocrnpyler_334638 in default_vire2biocrnpyler_369332_combined = 0;
  species molecule_3me2oxo_rheostatbiocrnpyler_334638 in default_vire2biocrnpyler_369332_combined = 0;
  species complex_enzyme_IlvD_molecule_23dih3mebut_rheostatbiocrnpyler_334638 in default_vire2biocrnpyler_369332_combined = 0;
  species complex_enzyme_IlvD_molecule_3me2oxo_rheostatbiocrnpyler_334638 in default_vire2biocrnpyler_369332_combined = 0;
  species enzyme_kivD_rheostatbiocrnpyler_334638 in default_vire2biocrnpyler_369332_combined = 0.2/default_vire2biocrnpyler_369332_combined;
  species molecule_isobutanal_rheostatbiocrnpyler_334638 in default_vire2biocrnpyler_369332_combined = 0;
  species complex_enzyme_kivD_molecule_3me2oxo_rheostatbiocrnpyler_334638 in default_vire2biocrnpyler_369332_combined = 0;
  species complex_enzyme_kivD_molecule_isobutanal_rheostatbiocrnpyler_334638 in default_vire2biocrnpyler_369332_combined = 0;
  species enzyme_yahk_rheostatbiocrnpyler_334638 in default_vire2biocrnpyler_369332_combined = 0.2/default_vire2biocrnpyler_369332_combined;
  species molecule_isobutanol_rheostatbiocrnpyler_334638 in default_vire2biocrnpyler_369332_combined = 0;
  species complex_enzyme_yahk_metabolite_nadph_molecule_isobutanal_rheostatbiocrnpyler_334638 in default_vire2biocrnpyler_369332_combined = 0;
  species complex_enzyme_yahk_metabolite_nadp_molecule_isobutanol_rheostatbiocrnpyler_334638 in default_vire2biocrnpyler_369332_combined = 0;
  species enzyme_atp_use_rheostatbiocrnpyler_334638 in default_vire2biocrnpyler_369332_combined = 0;
  species complex_enzyme_atp_use_metabolite_atp_rheostatbiocrnpyler_334638 in default_vire2biocrnpyler_369332_combined = 0;
  species complex_enzyme_atp_use_metabolite_adp_metabolite_pi_rheostatbiocrnpyler_334638 in default_vire2biocrnpyler_369332_combined = 0;

  // Reactions:
  r0_vire2biocrnpyler_369332: dna_g_vire2biocrnpyler_369332 + tetR_vire2biocrnpyler_369332 => complex_dna_g_tetR_vire2biocrnpyler_369332; r0_vire2biocrnpyler_369332_k*dna_g_vire2biocrnpyler_369332*tetR_vire2biocrnpyler_369332;
    r0_vire2biocrnpyler_369332_k = 0.001;
  r0_1_vire2biocrnpyler_369332: complex_dna_g_tetR_vire2biocrnpyler_369332 => dna_g_vire2biocrnpyler_369332 + tetR_vire2biocrnpyler_369332; r0_1_vire2biocrnpyler_369332_k*complex_dna_g_tetR_vire2biocrnpyler_369332;
    r0_1_vire2biocrnpyler_369332_k = 1e-5;
  r2_vire2biocrnpyler_369332: complex_dna_g_tetR_vire2biocrnpyler_369332 + aTc_i_vire2biocrnpyler_369332 => complex_aTc_i_dna_g_tetR_vire2biocrnpyler_369332; r2_vire2biocrnpyler_369332_k*complex_dna_g_tetR_vire2biocrnpyler_369332*aTc_i_vire2biocrnpyler_369332;
    r2_vire2biocrnpyler_369332_k = 0.065;
  r2_1_vire2biocrnpyler_369332: complex_aTc_i_dna_g_tetR_vire2biocrnpyler_369332 => complex_dna_g_tetR_vire2biocrnpyler_369332 + aTc_i_vire2biocrnpyler_369332; r2_1_vire2biocrnpyler_369332_k*complex_aTc_i_dna_g_tetR_vire2biocrnpyler_369332;
    r2_1_vire2biocrnpyler_369332_k = 0.0003;
  r4_vire2biocrnpyler_369332: complex_aTc_i_dna_g_tetR_vire2biocrnpyler_369332 => dna_g_vire2biocrnpyler_369332 + complex_aTc_i_tetR_vire2biocrnpyler_369332; r4_vire2biocrnpyler_369332_k*complex_aTc_i_dna_g_tetR_vire2biocrnpyler_369332;
    r4_vire2biocrnpyler_369332_k = 100;
  r4_1_vire2biocrnpyler_369332: dna_g_vire2biocrnpyler_369332 + complex_aTc_i_tetR_vire2biocrnpyler_369332 => complex_aTc_i_dna_g_tetR_vire2biocrnpyler_369332; r4_1_vire2biocrnpyler_369332_k*dna_g_vire2biocrnpyler_369332*complex_aTc_i_tetR_vire2biocrnpyler_369332;
    r4_1_vire2biocrnpyler_369332_k = 10;
  r6_vire2biocrnpyler_369332: dna_g_vire2biocrnpyler_369332 => dna_g_vire2biocrnpyler_369332 + rna_g_vire2biocrnpyler_369332; r6_vire2biocrnpyler_369332_k*dna_g_vire2biocrnpyler_369332/(tetR_vire2biocrnpyler_369332^r6_vire2biocrnpyler_369332_n + r6_vire2biocrnpyler_369332_K);
    r6_vire2biocrnpyler_369332_k = 0.01875; r6_vire2biocrnpyler_369332_n = 1; r6_vire2biocrnpyler_369332_K = 20;
  r7_vire2biocrnpyler_369332: dna_g_vire2biocrnpyler_369332 => dna_g_vire2biocrnpyler_369332 + rna_g_vire2biocrnpyler_369332; r7_vire2biocrnpyler_369332_k*dna_g_vire2biocrnpyler_369332;
    r7_vire2biocrnpyler_369332_k = 0.001;
  r8_vire2biocrnpyler_369332: rna_g_vire2biocrnpyler_369332 + ATP_vire2biocrnpyler_369332_1_combined => rna_g_vire2biocrnpyler_369332 + ADP_vire2biocrnpyler_369332_1_combined + VirE2_f_vire2biocrnpyler_369332 + P_vire2biocrnpyler_369332_1_combined; r8_vire2biocrnpyler_369332_k*rna_g_vire2biocrnpyler_369332*ATP_vire2biocrnpyler_369332_1_combined^r8_vire2biocrnpyler_369332_n/(ATP_vire2biocrnpyler_369332_1_combined^r8_vire2biocrnpyler_369332_n + r8_vire2biocrnpyler_369332_K);
    r8_vire2biocrnpyler_369332_k = 0.6; r8_vire2biocrnpyler_369332_n = 1; r8_vire2biocrnpyler_369332_K = 1;
  r9_vire2biocrnpyler_369332: VirE2_f_vire2biocrnpyler_369332 => VirE2_b_vire2biocrnpyler_369332; r9_vire2biocrnpyler_369332_k*VirE2_f_vire2biocrnpyler_369332;
    r9_vire2biocrnpyler_369332_k = 1;
  r10_vire2biocrnpyler_369332: rna_g_vire2biocrnpyler_369332 => ; r10_vire2biocrnpyler_369332_k*rna_g_vire2biocrnpyler_369332;
    r10_vire2biocrnpyler_369332_k = 0.001;
  r11_vire2biocrnpyler_369332: VirE2_f_vire2biocrnpyler_369332 => ; r11_vire2biocrnpyler_369332_k*VirE2_f_vire2biocrnpyler_369332;
    r11_vire2biocrnpyler_369332_k = 1e-5;
  r0_rheostatbiocrnpyler_334638: enzyme_hex_rheostatbiocrnpyler_334638 + ATP_vire2biocrnpyler_369332_1_combined + molecule_glucose_rheostatbiocrnpyler_334638 => complex_enzyme_hex_metabolite_atp_molecule_glucose_rheostatbiocrnpyler_334638; r0_rheostatbiocrnpyler_334638_k*enzyme_hex_rheostatbiocrnpyler_334638*ATP_vire2biocrnpyler_369332_1_combined*molecule_glucose_rheostatbiocrnpyler_334638;
    r0_rheostatbiocrnpyler_334638_k = 54000;
  r0_1_rheostatbiocrnpyler_334638: complex_enzyme_hex_metabolite_atp_molecule_glucose_rheostatbiocrnpyler_334638 => enzyme_hex_rheostatbiocrnpyler_334638 + ATP_vire2biocrnpyler_369332_1_combined + molecule_glucose_rheostatbiocrnpyler_334638; r0_1_rheostatbiocrnpyler_334638_k*complex_enzyme_hex_metabolite_atp_molecule_glucose_rheostatbiocrnpyler_334638;
    r0_1_rheostatbiocrnpyler_334638_k = 5400;
  r2_rheostatbiocrnpyler_334638: complex_enzyme_hex_metabolite_atp_molecule_glucose_rheostatbiocrnpyler_334638 => complex_enzyme_hex_metabolite_adp_molecule_g6p_rheostatbiocrnpyler_334638; r2_rheostatbiocrnpyler_334638_k*complex_enzyme_hex_metabolite_atp_molecule_glucose_rheostatbiocrnpyler_334638;
    r2_rheostatbiocrnpyler_334638_k = 36000;
  r3_rheostatbiocrnpyler_334638: complex_enzyme_hex_metabolite_adp_molecule_g6p_rheostatbiocrnpyler_334638 => enzyme_hex_rheostatbiocrnpyler_334638 + molecule_g6p_rheostatbiocrnpyler_334638 + ADP_vire2biocrnpyler_369332_1_combined; r3_rheostatbiocrnpyler_334638_k*complex_enzyme_hex_metabolite_adp_molecule_g6p_rheostatbiocrnpyler_334638;
    r3_rheostatbiocrnpyler_334638_k = 54000;
  r3_1_rheostatbiocrnpyler_334638: enzyme_hex_rheostatbiocrnpyler_334638 + molecule_g6p_rheostatbiocrnpyler_334638 + ADP_vire2biocrnpyler_369332_1_combined => complex_enzyme_hex_metabolite_adp_molecule_g6p_rheostatbiocrnpyler_334638; r3_1_rheostatbiocrnpyler_334638_k*enzyme_hex_rheostatbiocrnpyler_334638*molecule_g6p_rheostatbiocrnpyler_334638*ADP_vire2biocrnpyler_369332_1_combined;
    r3_1_rheostatbiocrnpyler_334638_k = 5400;
  r5_rheostatbiocrnpyler_334638: enzyme_pgi_rheostatbiocrnpyler_334638 + molecule_g6p_rheostatbiocrnpyler_334638 => complex_enzyme_pgi_molecule_g6p_rheostatbiocrnpyler_334638; r5_rheostatbiocrnpyler_334638_k*enzyme_pgi_rheostatbiocrnpyler_334638*molecule_g6p_rheostatbiocrnpyler_334638;
    r5_rheostatbiocrnpyler_334638_k = 54000;
  r5_1_rheostatbiocrnpyler_334638: complex_enzyme_pgi_molecule_g6p_rheostatbiocrnpyler_334638 => enzyme_pgi_rheostatbiocrnpyler_334638 + molecule_g6p_rheostatbiocrnpyler_334638; r5_1_rheostatbiocrnpyler_334638_k*complex_enzyme_pgi_molecule_g6p_rheostatbiocrnpyler_334638;
    r5_1_rheostatbiocrnpyler_334638_k = 5400;
  r7_rheostatbiocrnpyler_334638: complex_enzyme_pgi_molecule_g6p_rheostatbiocrnpyler_334638 => complex_enzyme_pgi_molecule_f6p_rheostatbiocrnpyler_334638; r7_rheostatbiocrnpyler_334638_k*complex_enzyme_pgi_molecule_g6p_rheostatbiocrnpyler_334638;
    r7_rheostatbiocrnpyler_334638_k = 36000;
  r8_rheostatbiocrnpyler_334638: complex_enzyme_pgi_molecule_f6p_rheostatbiocrnpyler_334638 => enzyme_pgi_rheostatbiocrnpyler_334638 + molecule_f6p_rheostatbiocrnpyler_334638; r8_rheostatbiocrnpyler_334638_k*complex_enzyme_pgi_molecule_f6p_rheostatbiocrnpyler_334638;
    r8_rheostatbiocrnpyler_334638_k = 54000;
  r8_1_rheostatbiocrnpyler_334638: enzyme_pgi_rheostatbiocrnpyler_334638 + molecule_f6p_rheostatbiocrnpyler_334638 => complex_enzyme_pgi_molecule_f6p_rheostatbiocrnpyler_334638; r8_1_rheostatbiocrnpyler_334638_k*enzyme_pgi_rheostatbiocrnpyler_334638*molecule_f6p_rheostatbiocrnpyler_334638;
    r8_1_rheostatbiocrnpyler_334638_k = 5400;
  r10_rheostatbiocrnpyler_334638: enzyme_pfk_rheostatbiocrnpyler_334638 + ATP_vire2biocrnpyler_369332_1_combined + molecule_f6p_rheostatbiocrnpyler_334638 => complex_enzyme_pfk_metabolite_atp_molecule_f6p_rheostatbiocrnpyler_334638; r10_rheostatbiocrnpyler_334638_k*enzyme_pfk_rheostatbiocrnpyler_334638*ATP_vire2biocrnpyler_369332_1_combined*molecule_f6p_rheostatbiocrnpyler_334638;
    r10_rheostatbiocrnpyler_334638_k = 54000;
  r10_1_rheostatbiocrnpyler_334638: complex_enzyme_pfk_metabolite_atp_molecule_f6p_rheostatbiocrnpyler_334638 => enzyme_pfk_rheostatbiocrnpyler_334638 + ATP_vire2biocrnpyler_369332_1_combined + molecule_f6p_rheostatbiocrnpyler_334638; r10_1_rheostatbiocrnpyler_334638_k*complex_enzyme_pfk_metabolite_atp_molecule_f6p_rheostatbiocrnpyler_334638;
    r10_1_rheostatbiocrnpyler_334638_k = 5400;
  r12_rheostatbiocrnpyler_334638: complex_enzyme_pfk_metabolite_atp_molecule_f6p_rheostatbiocrnpyler_334638 => complex_enzyme_pfk_metabolite_adp_molecule_f16p_rheostatbiocrnpyler_334638; r12_rheostatbiocrnpyler_334638_k*complex_enzyme_pfk_metabolite_atp_molecule_f6p_rheostatbiocrnpyler_334638;
    r12_rheostatbiocrnpyler_334638_k = 36000;
  r13_rheostatbiocrnpyler_334638: complex_enzyme_pfk_metabolite_adp_molecule_f16p_rheostatbiocrnpyler_334638 => enzyme_pfk_rheostatbiocrnpyler_334638 + molecule_f16p_rheostatbiocrnpyler_334638 + ADP_vire2biocrnpyler_369332_1_combined; r13_rheostatbiocrnpyler_334638_k*complex_enzyme_pfk_metabolite_adp_molecule_f16p_rheostatbiocrnpyler_334638;
    r13_rheostatbiocrnpyler_334638_k = 54000;
  r13_1_rheostatbiocrnpyler_334638: enzyme_pfk_rheostatbiocrnpyler_334638 + molecule_f16p_rheostatbiocrnpyler_334638 + ADP_vire2biocrnpyler_369332_1_combined => complex_enzyme_pfk_metabolite_adp_molecule_f16p_rheostatbiocrnpyler_334638; r13_1_rheostatbiocrnpyler_334638_k*enzyme_pfk_rheostatbiocrnpyler_334638*molecule_f16p_rheostatbiocrnpyler_334638*ADP_vire2biocrnpyler_369332_1_combined;
    r13_1_rheostatbiocrnpyler_334638_k = 5400;
  r15_rheostatbiocrnpyler_334638: enzyme_ald_tpi_rheostatbiocrnpyler_334638 + molecule_f16p_rheostatbiocrnpyler_334638 => complex_enzyme_ald_tpi_molecule_f16p_rheostatbiocrnpyler_334638; r15_rheostatbiocrnpyler_334638_k*enzyme_ald_tpi_rheostatbiocrnpyler_334638*molecule_f16p_rheostatbiocrnpyler_334638;
    r15_rheostatbiocrnpyler_334638_k = 54000;
  r15_1_rheostatbiocrnpyler_334638: complex_enzyme_ald_tpi_molecule_f16p_rheostatbiocrnpyler_334638 => enzyme_ald_tpi_rheostatbiocrnpyler_334638 + molecule_f16p_rheostatbiocrnpyler_334638; r15_1_rheostatbiocrnpyler_334638_k*complex_enzyme_ald_tpi_molecule_f16p_rheostatbiocrnpyler_334638;
    r15_1_rheostatbiocrnpyler_334638_k = 5400;
  r17_rheostatbiocrnpyler_334638: complex_enzyme_ald_tpi_molecule_f16p_rheostatbiocrnpyler_334638 => complex_enzyme_ald_tpi_2x_molecule_g3p_rheostatbiocrnpyler_334638; r17_rheostatbiocrnpyler_334638_k*complex_enzyme_ald_tpi_molecule_f16p_rheostatbiocrnpyler_334638;
    r17_rheostatbiocrnpyler_334638_k = 36000;
  r18_rheostatbiocrnpyler_334638: complex_enzyme_ald_tpi_2x_molecule_g3p_rheostatbiocrnpyler_334638 => enzyme_ald_tpi_rheostatbiocrnpyler_334638 + 2 molecule_g3p_rheostatbiocrnpyler_334638; r18_rheostatbiocrnpyler_334638_k*complex_enzyme_ald_tpi_2x_molecule_g3p_rheostatbiocrnpyler_334638;
    r18_rheostatbiocrnpyler_334638_k = 54000;
  r18_1_rheostatbiocrnpyler_334638: enzyme_ald_tpi_rheostatbiocrnpyler_334638 + 2 molecule_g3p_rheostatbiocrnpyler_334638 => complex_enzyme_ald_tpi_2x_molecule_g3p_rheostatbiocrnpyler_334638; r18_1_rheostatbiocrnpyler_334638_k*enzyme_ald_tpi_rheostatbiocrnpyler_334638*molecule_g3p_rheostatbiocrnpyler_334638^2;
    r18_1_rheostatbiocrnpyler_334638_k = 5400;
  r20_rheostatbiocrnpyler_334638: enzyme_gapN_rheostatbiocrnpyler_334638 + 2 metabolite_nadp_rheostatbiocrnpyler_334638 + 2 molecule_g3p_rheostatbiocrnpyler_334638 => complex_enzyme_gapN_2x_metabolite_nadp_2x_molecule_g3p_rheostatbiocrnpyler_334638; r20_rheostatbiocrnpyler_334638_k*enzyme_gapN_rheostatbiocrnpyler_334638*metabolite_nadp_rheostatbiocrnpyler_334638^2*molecule_g3p_rheostatbiocrnpyler_334638^2;
    r20_rheostatbiocrnpyler_334638_k = 54000;
  r20_1_rheostatbiocrnpyler_334638: complex_enzyme_gapN_2x_metabolite_nadp_2x_molecule_g3p_rheostatbiocrnpyler_334638 => enzyme_gapN_rheostatbiocrnpyler_334638 + 2 metabolite_nadp_rheostatbiocrnpyler_334638 + 2 molecule_g3p_rheostatbiocrnpyler_334638; r20_1_rheostatbiocrnpyler_334638_k*complex_enzyme_gapN_2x_metabolite_nadp_2x_molecule_g3p_rheostatbiocrnpyler_334638;
    r20_1_rheostatbiocrnpyler_334638_k = 5400;
  r22_rheostatbiocrnpyler_334638: complex_enzyme_gapN_2x_metabolite_nadp_2x_molecule_g3p_rheostatbiocrnpyler_334638 => complex_enzyme_gapN_2x_metabolite_nadph_2x_molecule_3pg_rheostatbiocrnpyler_334638; r22_rheostatbiocrnpyler_334638_k*complex_enzyme_gapN_2x_metabolite_nadp_2x_molecule_g3p_rheostatbiocrnpyler_334638;
    r22_rheostatbiocrnpyler_334638_k = 36000;
  r23_rheostatbiocrnpyler_334638: complex_enzyme_gapN_2x_metabolite_nadph_2x_molecule_3pg_rheostatbiocrnpyler_334638 => enzyme_gapN_rheostatbiocrnpyler_334638 + 2 molecule_3pg_rheostatbiocrnpyler_334638 + 2 metabolite_nadph_rheostatbiocrnpyler_334638; r23_rheostatbiocrnpyler_334638_k*complex_enzyme_gapN_2x_metabolite_nadph_2x_molecule_3pg_rheostatbiocrnpyler_334638;
    r23_rheostatbiocrnpyler_334638_k = 54000;
  r23_1_rheostatbiocrnpyler_334638: enzyme_gapN_rheostatbiocrnpyler_334638 + 2 molecule_3pg_rheostatbiocrnpyler_334638 + 2 metabolite_nadph_rheostatbiocrnpyler_334638 => complex_enzyme_gapN_2x_metabolite_nadph_2x_molecule_3pg_rheostatbiocrnpyler_334638; r23_1_rheostatbiocrnpyler_334638_k*enzyme_gapN_rheostatbiocrnpyler_334638*molecule_3pg_rheostatbiocrnpyler_334638^2*metabolite_nadph_rheostatbiocrnpyler_334638^2;
    r23_1_rheostatbiocrnpyler_334638_k = 5400;
  r25_rheostatbiocrnpyler_334638: enzyme_mGapDH_rheostatbiocrnpyler_334638 + P_vire2biocrnpyler_369332_1_combined + 2 metabolite_nadp_rheostatbiocrnpyler_334638 + 2 molecule_g3p_rheostatbiocrnpyler_334638 => complex_enzyme_mGapDH_2x_metabolite_nadp_metabolite_pi_2x_molecule_g3p_rheostatbiocrnpyler_334638; r25_rheostatbiocrnpyler_334638_k*enzyme_mGapDH_rheostatbiocrnpyler_334638*P_vire2biocrnpyler_369332_1_combined*metabolite_nadp_rheostatbiocrnpyler_334638^2*molecule_g3p_rheostatbiocrnpyler_334638^2;
    r25_rheostatbiocrnpyler_334638_k = 54000;
  r25_1_rheostatbiocrnpyler_334638: complex_enzyme_mGapDH_2x_metabolite_nadp_metabolite_pi_2x_molecule_g3p_rheostatbiocrnpyler_334638 => enzyme_mGapDH_rheostatbiocrnpyler_334638 + P_vire2biocrnpyler_369332_1_combined + 2 metabolite_nadp_rheostatbiocrnpyler_334638 + 2 molecule_g3p_rheostatbiocrnpyler_334638; r25_1_rheostatbiocrnpyler_334638_k*complex_enzyme_mGapDH_2x_metabolite_nadp_metabolite_pi_2x_molecule_g3p_rheostatbiocrnpyler_334638;
    r25_1_rheostatbiocrnpyler_334638_k = 5400;
  r27_rheostatbiocrnpyler_334638: complex_enzyme_mGapDH_2x_metabolite_nadp_metabolite_pi_2x_molecule_g3p_rheostatbiocrnpyler_334638 => complex_enzyme_mGapDH_2x_metabolite_nadph_molecule_13bpg_rheostatbiocrnpyler_334638; r27_rheostatbiocrnpyler_334638_k*complex_enzyme_mGapDH_2x_metabolite_nadp_metabolite_pi_2x_molecule_g3p_rheostatbiocrnpyler_334638;
    r27_rheostatbiocrnpyler_334638_k = 36000;
  r28_rheostatbiocrnpyler_334638: complex_enzyme_mGapDH_2x_metabolite_nadph_molecule_13bpg_rheostatbiocrnpyler_334638 => enzyme_mGapDH_rheostatbiocrnpyler_334638 + molecule_13bpg_rheostatbiocrnpyler_334638 + 2 metabolite_nadph_rheostatbiocrnpyler_334638; r28_rheostatbiocrnpyler_334638_k*complex_enzyme_mGapDH_2x_metabolite_nadph_molecule_13bpg_rheostatbiocrnpyler_334638;
    r28_rheostatbiocrnpyler_334638_k = 54000;
  r28_1_rheostatbiocrnpyler_334638: enzyme_mGapDH_rheostatbiocrnpyler_334638 + molecule_13bpg_rheostatbiocrnpyler_334638 + 2 metabolite_nadph_rheostatbiocrnpyler_334638 => complex_enzyme_mGapDH_2x_metabolite_nadph_molecule_13bpg_rheostatbiocrnpyler_334638; r28_1_rheostatbiocrnpyler_334638_k*enzyme_mGapDH_rheostatbiocrnpyler_334638*molecule_13bpg_rheostatbiocrnpyler_334638*metabolite_nadph_rheostatbiocrnpyler_334638^2;
    r28_1_rheostatbiocrnpyler_334638_k = 5400;
  r30_rheostatbiocrnpyler_334638: enzyme_pgk_rheostatbiocrnpyler_334638 + ADP_vire2biocrnpyler_369332_1_combined + molecule_13bpg_rheostatbiocrnpyler_334638 => complex_enzyme_pgk_metabolite_adp_molecule_13bpg_rheostatbiocrnpyler_334638; r30_rheostatbiocrnpyler_334638_k*enzyme_pgk_rheostatbiocrnpyler_334638*ADP_vire2biocrnpyler_369332_1_combined*molecule_13bpg_rheostatbiocrnpyler_334638;
    r30_rheostatbiocrnpyler_334638_k = 54000;
  r30_1_rheostatbiocrnpyler_334638: complex_enzyme_pgk_metabolite_adp_molecule_13bpg_rheostatbiocrnpyler_334638 => enzyme_pgk_rheostatbiocrnpyler_334638 + ADP_vire2biocrnpyler_369332_1_combined + molecule_13bpg_rheostatbiocrnpyler_334638; r30_1_rheostatbiocrnpyler_334638_k*complex_enzyme_pgk_metabolite_adp_molecule_13bpg_rheostatbiocrnpyler_334638;
    r30_1_rheostatbiocrnpyler_334638_k = 5400;
  r32_rheostatbiocrnpyler_334638: complex_enzyme_pgk_metabolite_adp_molecule_13bpg_rheostatbiocrnpyler_334638 => complex_enzyme_pgk_metabolite_atp_2x_molecule_3pg_rheostatbiocrnpyler_334638; r32_rheostatbiocrnpyler_334638_k*complex_enzyme_pgk_metabolite_adp_molecule_13bpg_rheostatbiocrnpyler_334638;
    r32_rheostatbiocrnpyler_334638_k = 36000;
  r33_rheostatbiocrnpyler_334638: complex_enzyme_pgk_metabolite_atp_2x_molecule_3pg_rheostatbiocrnpyler_334638 => enzyme_pgk_rheostatbiocrnpyler_334638 + 2 molecule_3pg_rheostatbiocrnpyler_334638 + ATP_vire2biocrnpyler_369332_1_combined; r33_rheostatbiocrnpyler_334638_k*complex_enzyme_pgk_metabolite_atp_2x_molecule_3pg_rheostatbiocrnpyler_334638;
    r33_rheostatbiocrnpyler_334638_k = 54000;
  r33_1_rheostatbiocrnpyler_334638: enzyme_pgk_rheostatbiocrnpyler_334638 + 2 molecule_3pg_rheostatbiocrnpyler_334638 + ATP_vire2biocrnpyler_369332_1_combined => complex_enzyme_pgk_metabolite_atp_2x_molecule_3pg_rheostatbiocrnpyler_334638; r33_1_rheostatbiocrnpyler_334638_k*enzyme_pgk_rheostatbiocrnpyler_334638*molecule_3pg_rheostatbiocrnpyler_334638^2*ATP_vire2biocrnpyler_369332_1_combined;
    r33_1_rheostatbiocrnpyler_334638_k = 5400;
  r35_rheostatbiocrnpyler_334638: enzyme_pgm_rheostatbiocrnpyler_334638 + 2 molecule_3pg_rheostatbiocrnpyler_334638 => complex_enzyme_pgm_2x_molecule_3pg_rheostatbiocrnpyler_334638; r35_rheostatbiocrnpyler_334638_k*enzyme_pgm_rheostatbiocrnpyler_334638*molecule_3pg_rheostatbiocrnpyler_334638^2;
    r35_rheostatbiocrnpyler_334638_k = 54000;
  r35_1_rheostatbiocrnpyler_334638: complex_enzyme_pgm_2x_molecule_3pg_rheostatbiocrnpyler_334638 => enzyme_pgm_rheostatbiocrnpyler_334638 + 2 molecule_3pg_rheostatbiocrnpyler_334638; r35_1_rheostatbiocrnpyler_334638_k*complex_enzyme_pgm_2x_molecule_3pg_rheostatbiocrnpyler_334638;
    r35_1_rheostatbiocrnpyler_334638_k = 5400;
  r37_rheostatbiocrnpyler_334638: complex_enzyme_pgm_2x_molecule_3pg_rheostatbiocrnpyler_334638 => complex_enzyme_pgm_2x_molecule_2pg_rheostatbiocrnpyler_334638; r37_rheostatbiocrnpyler_334638_k*complex_enzyme_pgm_2x_molecule_3pg_rheostatbiocrnpyler_334638;
    r37_rheostatbiocrnpyler_334638_k = 36000;
  r38_rheostatbiocrnpyler_334638: complex_enzyme_pgm_2x_molecule_2pg_rheostatbiocrnpyler_334638 => enzyme_pgm_rheostatbiocrnpyler_334638 + 2 molecule_2pg_rheostatbiocrnpyler_334638; r38_rheostatbiocrnpyler_334638_k*complex_enzyme_pgm_2x_molecule_2pg_rheostatbiocrnpyler_334638;
    r38_rheostatbiocrnpyler_334638_k = 54000;
  r38_1_rheostatbiocrnpyler_334638: enzyme_pgm_rheostatbiocrnpyler_334638 + 2 molecule_2pg_rheostatbiocrnpyler_334638 => complex_enzyme_pgm_2x_molecule_2pg_rheostatbiocrnpyler_334638; r38_1_rheostatbiocrnpyler_334638_k*enzyme_pgm_rheostatbiocrnpyler_334638*molecule_2pg_rheostatbiocrnpyler_334638^2;
    r38_1_rheostatbiocrnpyler_334638_k = 5400;
  r40_rheostatbiocrnpyler_334638: enzyme_eno_rheostatbiocrnpyler_334638 + 2 molecule_2pg_rheostatbiocrnpyler_334638 => complex_enzyme_eno_2x_molecule_2pg_rheostatbiocrnpyler_334638; r40_rheostatbiocrnpyler_334638_k*enzyme_eno_rheostatbiocrnpyler_334638*molecule_2pg_rheostatbiocrnpyler_334638^2;
    r40_rheostatbiocrnpyler_334638_k = 54000;
  r40_1_rheostatbiocrnpyler_334638: complex_enzyme_eno_2x_molecule_2pg_rheostatbiocrnpyler_334638 => enzyme_eno_rheostatbiocrnpyler_334638 + 2 molecule_2pg_rheostatbiocrnpyler_334638; r40_1_rheostatbiocrnpyler_334638_k*complex_enzyme_eno_2x_molecule_2pg_rheostatbiocrnpyler_334638;
    r40_1_rheostatbiocrnpyler_334638_k = 5400;
  r42_rheostatbiocrnpyler_334638: complex_enzyme_eno_2x_molecule_2pg_rheostatbiocrnpyler_334638 => complex_enzyme_eno_2x_molecule_pep_rheostatbiocrnpyler_334638; r42_rheostatbiocrnpyler_334638_k*complex_enzyme_eno_2x_molecule_2pg_rheostatbiocrnpyler_334638;
    r42_rheostatbiocrnpyler_334638_k = 36000;
  r43_rheostatbiocrnpyler_334638: complex_enzyme_eno_2x_molecule_pep_rheostatbiocrnpyler_334638 => enzyme_eno_rheostatbiocrnpyler_334638 + 2 molecule_pep_rheostatbiocrnpyler_334638; r43_rheostatbiocrnpyler_334638_k*complex_enzyme_eno_2x_molecule_pep_rheostatbiocrnpyler_334638;
    r43_rheostatbiocrnpyler_334638_k = 54000;
  r43_1_rheostatbiocrnpyler_334638: enzyme_eno_rheostatbiocrnpyler_334638 + 2 molecule_pep_rheostatbiocrnpyler_334638 => complex_enzyme_eno_2x_molecule_pep_rheostatbiocrnpyler_334638; r43_1_rheostatbiocrnpyler_334638_k*enzyme_eno_rheostatbiocrnpyler_334638*molecule_pep_rheostatbiocrnpyler_334638^2;
    r43_1_rheostatbiocrnpyler_334638_k = 5400;
  r45_rheostatbiocrnpyler_334638: enzyme_pyk_rheostatbiocrnpyler_334638 + 2 ADP_vire2biocrnpyler_369332_1_combined + 2 molecule_pep_rheostatbiocrnpyler_334638 => complex_enzyme_pyk_2x_metabolite_adp_2x_molecule_pep_rheostatbiocrnpyler_334638; r45_rheostatbiocrnpyler_334638_k*enzyme_pyk_rheostatbiocrnpyler_334638*ADP_vire2biocrnpyler_369332_1_combined^2*molecule_pep_rheostatbiocrnpyler_334638^2;
    r45_rheostatbiocrnpyler_334638_k = 54000;
  r45_1_rheostatbiocrnpyler_334638: complex_enzyme_pyk_2x_metabolite_adp_2x_molecule_pep_rheostatbiocrnpyler_334638 => enzyme_pyk_rheostatbiocrnpyler_334638 + 2 ADP_vire2biocrnpyler_369332_1_combined + 2 molecule_pep_rheostatbiocrnpyler_334638; r45_1_rheostatbiocrnpyler_334638_k*complex_enzyme_pyk_2x_metabolite_adp_2x_molecule_pep_rheostatbiocrnpyler_334638;
    r45_1_rheostatbiocrnpyler_334638_k = 5400;
  r47_rheostatbiocrnpyler_334638: complex_enzyme_pyk_2x_metabolite_adp_2x_molecule_pep_rheostatbiocrnpyler_334638 => complex_enzyme_pyk_2x_metabolite_atp_2x_molecule_pyruvate_rheostatbiocrnpyler_334638; r47_rheostatbiocrnpyler_334638_k*complex_enzyme_pyk_2x_metabolite_adp_2x_molecule_pep_rheostatbiocrnpyler_334638;
    r47_rheostatbiocrnpyler_334638_k = 36000;
  r48_rheostatbiocrnpyler_334638: complex_enzyme_pyk_2x_metabolite_atp_2x_molecule_pyruvate_rheostatbiocrnpyler_334638 => enzyme_pyk_rheostatbiocrnpyler_334638 + 2 molecule_pyruvate_rheostatbiocrnpyler_334638 + 2 ATP_vire2biocrnpyler_369332_1_combined; r48_rheostatbiocrnpyler_334638_k*complex_enzyme_pyk_2x_metabolite_atp_2x_molecule_pyruvate_rheostatbiocrnpyler_334638;
    r48_rheostatbiocrnpyler_334638_k = 54000;
  r48_1_rheostatbiocrnpyler_334638: enzyme_pyk_rheostatbiocrnpyler_334638 + 2 molecule_pyruvate_rheostatbiocrnpyler_334638 + 2 ATP_vire2biocrnpyler_369332_1_combined => complex_enzyme_pyk_2x_metabolite_atp_2x_molecule_pyruvate_rheostatbiocrnpyler_334638; r48_1_rheostatbiocrnpyler_334638_k*enzyme_pyk_rheostatbiocrnpyler_334638*molecule_pyruvate_rheostatbiocrnpyler_334638^2*ATP_vire2biocrnpyler_369332_1_combined^2;
    r48_1_rheostatbiocrnpyler_334638_k = 5400;
  r50_rheostatbiocrnpyler_334638: enzyme_alsS_rheostatbiocrnpyler_334638 + 2 molecule_pyruvate_rheostatbiocrnpyler_334638 => complex_enzyme_alsS_2x_molecule_pyruvate_rheostatbiocrnpyler_334638; r50_rheostatbiocrnpyler_334638_k*enzyme_alsS_rheostatbiocrnpyler_334638*molecule_pyruvate_rheostatbiocrnpyler_334638^2;
    r50_rheostatbiocrnpyler_334638_k = 54000;
  r50_1_rheostatbiocrnpyler_334638: complex_enzyme_alsS_2x_molecule_pyruvate_rheostatbiocrnpyler_334638 => enzyme_alsS_rheostatbiocrnpyler_334638 + 2 molecule_pyruvate_rheostatbiocrnpyler_334638; r50_1_rheostatbiocrnpyler_334638_k*complex_enzyme_alsS_2x_molecule_pyruvate_rheostatbiocrnpyler_334638;
    r50_1_rheostatbiocrnpyler_334638_k = 5400;
  r52_rheostatbiocrnpyler_334638: complex_enzyme_alsS_2x_molecule_pyruvate_rheostatbiocrnpyler_334638 => complex_enzyme_alsS_molecule_acetolac_rheostatbiocrnpyler_334638; r52_rheostatbiocrnpyler_334638_k*complex_enzyme_alsS_2x_molecule_pyruvate_rheostatbiocrnpyler_334638;
    r52_rheostatbiocrnpyler_334638_k = 36000;
  r53_rheostatbiocrnpyler_334638: complex_enzyme_alsS_molecule_acetolac_rheostatbiocrnpyler_334638 => enzyme_alsS_rheostatbiocrnpyler_334638 + molecule_acetolac_rheostatbiocrnpyler_334638; r53_rheostatbiocrnpyler_334638_k*complex_enzyme_alsS_molecule_acetolac_rheostatbiocrnpyler_334638;
    r53_rheostatbiocrnpyler_334638_k = 54000;
  r53_1_rheostatbiocrnpyler_334638: enzyme_alsS_rheostatbiocrnpyler_334638 + molecule_acetolac_rheostatbiocrnpyler_334638 => complex_enzyme_alsS_molecule_acetolac_rheostatbiocrnpyler_334638; r53_1_rheostatbiocrnpyler_334638_k*enzyme_alsS_rheostatbiocrnpyler_334638*molecule_acetolac_rheostatbiocrnpyler_334638;
    r53_1_rheostatbiocrnpyler_334638_k = 5400;
  r55_rheostatbiocrnpyler_334638: enzyme_IlvC_rheostatbiocrnpyler_334638 + metabolite_nadph_rheostatbiocrnpyler_334638 + molecule_acetolac_rheostatbiocrnpyler_334638 => complex_enzyme_IlvC_metabolite_nadph_molecule_acetolac_rheostatbiocrnpyler_334638; r55_rheostatbiocrnpyler_334638_k*enzyme_IlvC_rheostatbiocrnpyler_334638*metabolite_nadph_rheostatbiocrnpyler_334638*molecule_acetolac_rheostatbiocrnpyler_334638;
    r55_rheostatbiocrnpyler_334638_k = 54000;
  r55_1_rheostatbiocrnpyler_334638: complex_enzyme_IlvC_metabolite_nadph_molecule_acetolac_rheostatbiocrnpyler_334638 => enzyme_IlvC_rheostatbiocrnpyler_334638 + metabolite_nadph_rheostatbiocrnpyler_334638 + molecule_acetolac_rheostatbiocrnpyler_334638; r55_1_rheostatbiocrnpyler_334638_k*complex_enzyme_IlvC_metabolite_nadph_molecule_acetolac_rheostatbiocrnpyler_334638;
    r55_1_rheostatbiocrnpyler_334638_k = 5400;
  r57_rheostatbiocrnpyler_334638: complex_enzyme_IlvC_metabolite_nadph_molecule_acetolac_rheostatbiocrnpyler_334638 => complex_enzyme_IlvC_metabolite_nadp_molecule_23dih3mebut_rheostatbiocrnpyler_334638; r57_rheostatbiocrnpyler_334638_k*complex_enzyme_IlvC_metabolite_nadph_molecule_acetolac_rheostatbiocrnpyler_334638;
    r57_rheostatbiocrnpyler_334638_k = 36000;
  r58_rheostatbiocrnpyler_334638: complex_enzyme_IlvC_metabolite_nadp_molecule_23dih3mebut_rheostatbiocrnpyler_334638 => enzyme_IlvC_rheostatbiocrnpyler_334638 + molecule_23dih3mebut_rheostatbiocrnpyler_334638 + metabolite_nadp_rheostatbiocrnpyler_334638; r58_rheostatbiocrnpyler_334638_k*complex_enzyme_IlvC_metabolite_nadp_molecule_23dih3mebut_rheostatbiocrnpyler_334638;
    r58_rheostatbiocrnpyler_334638_k = 54000;
  r58_1_rheostatbiocrnpyler_334638: enzyme_IlvC_rheostatbiocrnpyler_334638 + molecule_23dih3mebut_rheostatbiocrnpyler_334638 + metabolite_nadp_rheostatbiocrnpyler_334638 => complex_enzyme_IlvC_metabolite_nadp_molecule_23dih3mebut_rheostatbiocrnpyler_334638; r58_1_rheostatbiocrnpyler_334638_k*enzyme_IlvC_rheostatbiocrnpyler_334638*molecule_23dih3mebut_rheostatbiocrnpyler_334638*metabolite_nadp_rheostatbiocrnpyler_334638;
    r58_1_rheostatbiocrnpyler_334638_k = 5400;
  r60_rheostatbiocrnpyler_334638: enzyme_IlvD_rheostatbiocrnpyler_334638 + molecule_23dih3mebut_rheostatbiocrnpyler_334638 => complex_enzyme_IlvD_molecule_23dih3mebut_rheostatbiocrnpyler_334638; r60_rheostatbiocrnpyler_334638_k*enzyme_IlvD_rheostatbiocrnpyler_334638*molecule_23dih3mebut_rheostatbiocrnpyler_334638;
    r60_rheostatbiocrnpyler_334638_k = 54000;
  r60_1_rheostatbiocrnpyler_334638: complex_enzyme_IlvD_molecule_23dih3mebut_rheostatbiocrnpyler_334638 => enzyme_IlvD_rheostatbiocrnpyler_334638 + molecule_23dih3mebut_rheostatbiocrnpyler_334638; r60_1_rheostatbiocrnpyler_334638_k*complex_enzyme_IlvD_molecule_23dih3mebut_rheostatbiocrnpyler_334638;
    r60_1_rheostatbiocrnpyler_334638_k = 5400;
  r62_rheostatbiocrnpyler_334638: complex_enzyme_IlvD_molecule_23dih3mebut_rheostatbiocrnpyler_334638 => complex_enzyme_IlvD_molecule_3me2oxo_rheostatbiocrnpyler_334638; r62_rheostatbiocrnpyler_334638_k*complex_enzyme_IlvD_molecule_23dih3mebut_rheostatbiocrnpyler_334638;
    r62_rheostatbiocrnpyler_334638_k = 36000;
  r63_rheostatbiocrnpyler_334638: complex_enzyme_IlvD_molecule_3me2oxo_rheostatbiocrnpyler_334638 => enzyme_IlvD_rheostatbiocrnpyler_334638 + molecule_3me2oxo_rheostatbiocrnpyler_334638; r63_rheostatbiocrnpyler_334638_k*complex_enzyme_IlvD_molecule_3me2oxo_rheostatbiocrnpyler_334638;
    r63_rheostatbiocrnpyler_334638_k = 54000;
  r63_1_rheostatbiocrnpyler_334638: enzyme_IlvD_rheostatbiocrnpyler_334638 + molecule_3me2oxo_rheostatbiocrnpyler_334638 => complex_enzyme_IlvD_molecule_3me2oxo_rheostatbiocrnpyler_334638; r63_1_rheostatbiocrnpyler_334638_k*enzyme_IlvD_rheostatbiocrnpyler_334638*molecule_3me2oxo_rheostatbiocrnpyler_334638;
    r63_1_rheostatbiocrnpyler_334638_k = 5400;
  r65_rheostatbiocrnpyler_334638: enzyme_kivD_rheostatbiocrnpyler_334638 + molecule_3me2oxo_rheostatbiocrnpyler_334638 => complex_enzyme_kivD_molecule_3me2oxo_rheostatbiocrnpyler_334638; r65_rheostatbiocrnpyler_334638_k*enzyme_kivD_rheostatbiocrnpyler_334638*molecule_3me2oxo_rheostatbiocrnpyler_334638;
    r65_rheostatbiocrnpyler_334638_k = 54000;
  r65_1_rheostatbiocrnpyler_334638: complex_enzyme_kivD_molecule_3me2oxo_rheostatbiocrnpyler_334638 => enzyme_kivD_rheostatbiocrnpyler_334638 + molecule_3me2oxo_rheostatbiocrnpyler_334638; r65_1_rheostatbiocrnpyler_334638_k*complex_enzyme_kivD_molecule_3me2oxo_rheostatbiocrnpyler_334638;
    r65_1_rheostatbiocrnpyler_334638_k = 5400;
  r67_rheostatbiocrnpyler_334638: complex_enzyme_kivD_molecule_3me2oxo_rheostatbiocrnpyler_334638 => complex_enzyme_kivD_molecule_isobutanal_rheostatbiocrnpyler_334638; r67_rheostatbiocrnpyler_334638_k*complex_enzyme_kivD_molecule_3me2oxo_rheostatbiocrnpyler_334638;
    r67_rheostatbiocrnpyler_334638_k = 36000;
  r68_rheostatbiocrnpyler_334638: complex_enzyme_kivD_molecule_isobutanal_rheostatbiocrnpyler_334638 => enzyme_kivD_rheostatbiocrnpyler_334638 + molecule_isobutanal_rheostatbiocrnpyler_334638; r68_rheostatbiocrnpyler_334638_k*complex_enzyme_kivD_molecule_isobutanal_rheostatbiocrnpyler_334638;
    r68_rheostatbiocrnpyler_334638_k = 54000;
  r68_1_rheostatbiocrnpyler_334638: enzyme_kivD_rheostatbiocrnpyler_334638 + molecule_isobutanal_rheostatbiocrnpyler_334638 => complex_enzyme_kivD_molecule_isobutanal_rheostatbiocrnpyler_334638; r68_1_rheostatbiocrnpyler_334638_k*enzyme_kivD_rheostatbiocrnpyler_334638*molecule_isobutanal_rheostatbiocrnpyler_334638;
    r68_1_rheostatbiocrnpyler_334638_k = 5400;
  r70_rheostatbiocrnpyler_334638: enzyme_yahk_rheostatbiocrnpyler_334638 + metabolite_nadph_rheostatbiocrnpyler_334638 + molecule_isobutanal_rheostatbiocrnpyler_334638 => complex_enzyme_yahk_metabolite_nadph_molecule_isobutanal_rheostatbiocrnpyler_334638; r70_rheostatbiocrnpyler_334638_k*enzyme_yahk_rheostatbiocrnpyler_334638*metabolite_nadph_rheostatbiocrnpyler_334638*molecule_isobutanal_rheostatbiocrnpyler_334638;
    r70_rheostatbiocrnpyler_334638_k = 54000;
  r70_1_rheostatbiocrnpyler_334638: complex_enzyme_yahk_metabolite_nadph_molecule_isobutanal_rheostatbiocrnpyler_334638 => enzyme_yahk_rheostatbiocrnpyler_334638 + metabolite_nadph_rheostatbiocrnpyler_334638 + molecule_isobutanal_rheostatbiocrnpyler_334638; r70_1_rheostatbiocrnpyler_334638_k*complex_enzyme_yahk_metabolite_nadph_molecule_isobutanal_rheostatbiocrnpyler_334638;
    r70_1_rheostatbiocrnpyler_334638_k = 5400;
  r72_rheostatbiocrnpyler_334638: complex_enzyme_yahk_metabolite_nadph_molecule_isobutanal_rheostatbiocrnpyler_334638 => complex_enzyme_yahk_metabolite_nadp_molecule_isobutanol_rheostatbiocrnpyler_334638; r72_rheostatbiocrnpyler_334638_k*complex_enzyme_yahk_metabolite_nadph_molecule_isobutanal_rheostatbiocrnpyler_334638;
    r72_rheostatbiocrnpyler_334638_k = 36000;
  r73_rheostatbiocrnpyler_334638: complex_enzyme_yahk_metabolite_nadp_molecule_isobutanol_rheostatbiocrnpyler_334638 => enzyme_yahk_rheostatbiocrnpyler_334638 + molecule_isobutanol_rheostatbiocrnpyler_334638 + metabolite_nadp_rheostatbiocrnpyler_334638; r73_rheostatbiocrnpyler_334638_k*complex_enzyme_yahk_metabolite_nadp_molecule_isobutanol_rheostatbiocrnpyler_334638;
    r73_rheostatbiocrnpyler_334638_k = 54000;
  r73_1_rheostatbiocrnpyler_334638: enzyme_yahk_rheostatbiocrnpyler_334638 + molecule_isobutanol_rheostatbiocrnpyler_334638 + metabolite_nadp_rheostatbiocrnpyler_334638 => complex_enzyme_yahk_metabolite_nadp_molecule_isobutanol_rheostatbiocrnpyler_334638; r73_1_rheostatbiocrnpyler_334638_k*enzyme_yahk_rheostatbiocrnpyler_334638*molecule_isobutanol_rheostatbiocrnpyler_334638*metabolite_nadp_rheostatbiocrnpyler_334638;
    r73_1_rheostatbiocrnpyler_334638_k = 5400;
  r75_rheostatbiocrnpyler_334638: enzyme_atp_use_rheostatbiocrnpyler_334638 + ATP_vire2biocrnpyler_369332_1_combined => complex_enzyme_atp_use_metabolite_atp_rheostatbiocrnpyler_334638; r75_rheostatbiocrnpyler_334638_k*enzyme_atp_use_rheostatbiocrnpyler_334638*ATP_vire2biocrnpyler_369332_1_combined;
    r75_rheostatbiocrnpyler_334638_k = 54000;
  r75_1_rheostatbiocrnpyler_334638: complex_enzyme_atp_use_metabolite_atp_rheostatbiocrnpyler_334638 => enzyme_atp_use_rheostatbiocrnpyler_334638 + ATP_vire2biocrnpyler_369332_1_combined; r75_1_rheostatbiocrnpyler_334638_k*complex_enzyme_atp_use_metabolite_atp_rheostatbiocrnpyler_334638;
    r75_1_rheostatbiocrnpyler_334638_k = 5400;
  r77_rheostatbiocrnpyler_334638: complex_enzyme_atp_use_metabolite_atp_rheostatbiocrnpyler_334638 => complex_enzyme_atp_use_metabolite_adp_metabolite_pi_rheostatbiocrnpyler_334638; r77_rheostatbiocrnpyler_334638_k*complex_enzyme_atp_use_metabolite_atp_rheostatbiocrnpyler_334638;
    r77_rheostatbiocrnpyler_334638_k = 2;
  r78_rheostatbiocrnpyler_334638: complex_enzyme_atp_use_metabolite_adp_metabolite_pi_rheostatbiocrnpyler_334638 => enzyme_atp_use_rheostatbiocrnpyler_334638 + ADP_vire2biocrnpyler_369332_1_combined + P_vire2biocrnpyler_369332_1_combined; r78_rheostatbiocrnpyler_334638_k*complex_enzyme_atp_use_metabolite_adp_metabolite_pi_rheostatbiocrnpyler_334638;
    r78_rheostatbiocrnpyler_334638_k = 54000;
  r78_1_rheostatbiocrnpyler_334638: enzyme_atp_use_rheostatbiocrnpyler_334638 + ADP_vire2biocrnpyler_369332_1_combined + P_vire2biocrnpyler_369332_1_combined => complex_enzyme_atp_use_metabolite_adp_metabolite_pi_rheostatbiocrnpyler_334638; r78_1_rheostatbiocrnpyler_334638_k*enzyme_atp_use_rheostatbiocrnpyler_334638*ADP_vire2biocrnpyler_369332_1_combined*P_vire2biocrnpyler_369332_1_combined;
    r78_1_rheostatbiocrnpyler_334638_k = 5400;

  // Unit definitions:
  unit square_metre = metre^2;
end
