// SBML level 3 version 2

model biocrnpyler_860900()
  // model units - substance: mole, time: second, volume: litre, area: square_metre, length: metre, extent: mole

  // Compartments:
  compartment default = 1e-6;

  // Species:
  species enzyme_glk in default = 0;
  species metabolite_atp in default = 0;
  species molecule_glucose in default = 0;
  species molecule_g6p in default = 0;
  species metabolite_adp in default = 0;
  species complex_enzyme_glk_metabolite_atp_molecule_glucose in default = 0;
  species complex_enzyme_glk_metabolite_adp_molecule_g6p in default = 0;
  species enzyme_zwf in default = 0;
  species metabolite_nadp in default = 0;
  species molecule_6pdglu15lac in default = 0;
  species metabolite_nadph in default = 0;
  species complex_enzyme_zwf_metabolite_nadp_molecule_g6p in default = 0;
  species complex_enzyme_zwf_metabolite_nadph_molecule_6pdglu15lac in default = 0;
  species enzyme_noxe in default = 0;
  species molecule_nadph in default = 0;
  species molecule_nadp in default = 0;
  species complex_enzyme_noxe_molecule_nadph in default = 0;
  species complex_enzyme_noxe_molecule_nadp in default = 0;
  species enzyme_pgi in default = 0;
  species molecule_6pdgluc in default = 0;
  species complex_enzyme_pgi_molecule_6pdglu15lac in default = 0;
  species complex_enzyme_pgi_molecule_6pdgluc in default = 0;
  species enzyme_gnd in default = 0;
  species molecule_rib5p in default = 0;
  species metabolite_co2 in default = 0;
  species complex_enzyme_gnd_metabolite_nadp_molecule_6pdgluc in default = 0;
  species complex_enzyme_gnd_metabolite_co2_metabolite_nadph_molecule_rib5p in default = 0;
  species enzyme_rpi in default = 0;
  species molecule_rib5p2 in default = 0;
  species complex_enzyme_rpi_molecule_rib5p in default = 0;
  species complex_enzyme_rpi_molecule_rib5p2 in default = 0;
  species enzyme_rpe in default = 0;
  species molecule_xyl5p in default = 0;
  species complex_enzyme_rpe_molecule_rib5p in default = 0;
  species complex_enzyme_rpe_molecule_xyl5p in default = 0;
  species enzyme_xfp in default = 0;
  species metabolite_pi in default = 0;
  species molecule_acetylp in default = 0;
  species complex_enzyme_xfp_metabolite_pi_molecule_xyl5p in default = 0;
  species complex_enzyme_xfp_molecule_acetylp in default = 0;
  species enzyme_pta in default = 0;
  species metabolite_coa in default = 0;
  species molecule_acetylcoa in default = 0;
  species complex_enzyme_pta_metabolite_coa_molecule_acetylp in default = 0;
  species complex_enzyme_pta_molecule_acetylcoa in default = 0;
  species enzyme_phaa in default = 0;
  species molecule_acetoacetylcoa in default = 0;
  species complex_enzyme_phaa_molecule_acetylcoa in default = 0;
  species complex_enzyme_phaa_metabolite_coa_molecule_acetoacetylcoa in default = 0;
  species enzyme_phab in default = 0;
  species molecule_3hydroxycoa in default = 0;
  species complex_enzyme_phab_metabolite_nadph_molecule_acetoacetylcoa in default = 0;
  species complex_enzyme_phab_metabolite_nadp_molecule_3hydroxycoa in default = 0;
  species enzyme_phac in default = 0;
  species molecule_phb in default = 0;
  species complex_enzyme_phac_molecule_3hydroxycoa in default = 0;
  species complex_enzyme_phac_metabolite_coa_molecule_phb in default = 0;
  species molecule_g3p in default = 0;
  species complex_enzyme_xfp_molecule_xyl5p in default = 0;
  species complex_enzyme_xfp_molecule_g3p in default = 0;
  species enzyme_fba in default = 0;
  species molecule_f16bp in default = 0;
  species complex_enzyme_fba_molecule_g3p in default = 0;
  species complex_enzyme_fba_molecule_f16bp in default = 0;
  species molecule_dhap in default = 0;
  species complex_enzyme_fba_molecule_dhap in default = 0;
  species enzyme_tpi in default = 0;
  species complex_enzyme_tpi_molecule_dhap in default = 0;
  species complex_enzyme_tpi_molecule_g3p in default = 0;
  species enzyme_pfkb in default = 0;
  species molecule_f6p in default = 0;
  species complex_enzyme_pfkb_metabolite_adp_molecule_f16bp in default = 0;
  species complex_enzyme_pfkb_metabolite_atp_molecule_f6p in default = 0;
  species complex_enzyme_pgi_molecule_f6p in default = 0;
  species complex_enzyme_pgi_molecule_g6p in default = 0;
  species molecule_er4p in default = 0;
  species complex_enzyme_xfp_molecule_f6p in default = 0;
  species complex_enzyme_xfp_molecule_er4p in default = 0;
  species complex_enzyme_xfp_metabolite_pi_molecule_f6p in default = 0;
  species enzyme_tktatalb in default = 0;
  species complex_enzyme_tktatalb_molecule_er4p in default = 0;
  species complex_enzyme_tktatalb_molecule_f6p in default = 0;
  species complex_enzyme_tktatalb_molecule_g3p in default = 0;
  species complex_enzyme_tktatalb_molecule_rib5p2 in default = 0;
  species complex_enzyme_tktatalb_molecule_xyl5p in default = 0;
  species enzyme_nadphase in default = 0;
  species complex_enzyme_nadphase_metabolite_nadph in default = 0;
  species complex_enzyme_nadphase_metabolite_nadp in default = 0;

  // Reactions:
  r0: enzyme_glk + metabolite_atp + molecule_glucose => complex_enzyme_glk_metabolite_atp_molecule_glucose; r0_k*enzyme_glk*metabolite_atp*molecule_glucose;
    r0_k = 20;
  r0_1: complex_enzyme_glk_metabolite_atp_molecule_glucose => enzyme_glk + metabolite_atp + molecule_glucose; r0_1_k*complex_enzyme_glk_metabolite_atp_molecule_glucose;
    r0_1_k = 0.0002;
  r2: complex_enzyme_glk_metabolite_atp_molecule_glucose => complex_enzyme_glk_metabolite_adp_molecule_g6p; r2_k*complex_enzyme_glk_metabolite_atp_molecule_glucose;
    r2_k = 36000;
  r3: complex_enzyme_glk_metabolite_adp_molecule_g6p => enzyme_glk + molecule_g6p + metabolite_adp; r3_k*complex_enzyme_glk_metabolite_adp_molecule_g6p;
    r3_k = 20;
  r3_1: enzyme_glk + molecule_g6p + metabolite_adp => complex_enzyme_glk_metabolite_adp_molecule_g6p; r3_1_k*enzyme_glk*molecule_g6p*metabolite_adp;
    r3_1_k = 0.0002;
  r5: enzyme_zwf + metabolite_nadp + molecule_g6p => complex_enzyme_zwf_metabolite_nadp_molecule_g6p; r5_k*enzyme_zwf*metabolite_nadp*molecule_g6p;
    r5_k = 20;
  r5_1: complex_enzyme_zwf_metabolite_nadp_molecule_g6p => enzyme_zwf + metabolite_nadp + molecule_g6p; r5_1_k*complex_enzyme_zwf_metabolite_nadp_molecule_g6p;
    r5_1_k = 0.0002;
  r7: complex_enzyme_zwf_metabolite_nadp_molecule_g6p => complex_enzyme_zwf_metabolite_nadph_molecule_6pdglu15lac; r7_k*complex_enzyme_zwf_metabolite_nadp_molecule_g6p;
    r7_k = 36000;
  r8: complex_enzyme_zwf_metabolite_nadph_molecule_6pdglu15lac => enzyme_zwf + molecule_6pdglu15lac + metabolite_nadph; r8_k*complex_enzyme_zwf_metabolite_nadph_molecule_6pdglu15lac;
    r8_k = 20;
  r8_1: enzyme_zwf + molecule_6pdglu15lac + metabolite_nadph => complex_enzyme_zwf_metabolite_nadph_molecule_6pdglu15lac; r8_1_k*enzyme_zwf*molecule_6pdglu15lac*metabolite_nadph;
    r8_1_k = 0.0002;
  r10: enzyme_noxe + molecule_nadph => complex_enzyme_noxe_molecule_nadph; r10_k*enzyme_noxe*molecule_nadph;
    r10_k = 20;
  r10_1: complex_enzyme_noxe_molecule_nadph => enzyme_noxe + molecule_nadph; r10_1_k*complex_enzyme_noxe_molecule_nadph;
    r10_1_k = 0.0002;
  r12: complex_enzyme_noxe_molecule_nadph => complex_enzyme_noxe_molecule_nadp; r12_k*complex_enzyme_noxe_molecule_nadph;
    r12_k = 36000;
  r13: complex_enzyme_noxe_molecule_nadp => enzyme_noxe + molecule_nadp; r13_k*complex_enzyme_noxe_molecule_nadp;
    r13_k = 20;
  r13_1: enzyme_noxe + molecule_nadp => complex_enzyme_noxe_molecule_nadp; r13_1_k*enzyme_noxe*molecule_nadp;
    r13_1_k = 0.0002;
  r15: enzyme_pgi + molecule_6pdglu15lac => complex_enzyme_pgi_molecule_6pdglu15lac; r15_k*enzyme_pgi*molecule_6pdglu15lac;
    r15_k = 20;
  r15_1: complex_enzyme_pgi_molecule_6pdglu15lac => enzyme_pgi + molecule_6pdglu15lac; r15_1_k*complex_enzyme_pgi_molecule_6pdglu15lac;
    r15_1_k = 0.0002;
  r17: complex_enzyme_pgi_molecule_6pdglu15lac => complex_enzyme_pgi_molecule_6pdgluc; r17_k*complex_enzyme_pgi_molecule_6pdglu15lac;
    r17_k = 36000;
  r18: complex_enzyme_pgi_molecule_6pdgluc => enzyme_pgi + molecule_6pdgluc; r18_k*complex_enzyme_pgi_molecule_6pdgluc;
    r18_k = 20;
  r18_1: enzyme_pgi + molecule_6pdgluc => complex_enzyme_pgi_molecule_6pdgluc; r18_1_k*enzyme_pgi*molecule_6pdgluc;
    r18_1_k = 0.0002;
  r20: enzyme_gnd + metabolite_nadp + molecule_6pdgluc => complex_enzyme_gnd_metabolite_nadp_molecule_6pdgluc; r20_k*enzyme_gnd*metabolite_nadp*molecule_6pdgluc;
    r20_k = 20;
  r20_1: complex_enzyme_gnd_metabolite_nadp_molecule_6pdgluc => enzyme_gnd + metabolite_nadp + molecule_6pdgluc; r20_1_k*complex_enzyme_gnd_metabolite_nadp_molecule_6pdgluc;
    r20_1_k = 0.0002;
  r22: complex_enzyme_gnd_metabolite_nadp_molecule_6pdgluc => complex_enzyme_gnd_metabolite_co2_metabolite_nadph_molecule_rib5p; r22_k*complex_enzyme_gnd_metabolite_nadp_molecule_6pdgluc;
    r22_k = 36000;
  r23: complex_enzyme_gnd_metabolite_co2_metabolite_nadph_molecule_rib5p => enzyme_gnd + molecule_rib5p + metabolite_nadph + metabolite_co2; r23_k*complex_enzyme_gnd_metabolite_co2_metabolite_nadph_molecule_rib5p;
    r23_k = 20;
  r23_1: enzyme_gnd + molecule_rib5p + metabolite_nadph + metabolite_co2 => complex_enzyme_gnd_metabolite_co2_metabolite_nadph_molecule_rib5p; r23_1_k*enzyme_gnd*molecule_rib5p*metabolite_nadph*metabolite_co2;
    r23_1_k = 0.0002;
  r25: enzyme_rpi + molecule_rib5p => complex_enzyme_rpi_molecule_rib5p; r25_k*enzyme_rpi*molecule_rib5p;
    r25_k = 20;
  r25_1: complex_enzyme_rpi_molecule_rib5p => enzyme_rpi + molecule_rib5p; r25_1_k*complex_enzyme_rpi_molecule_rib5p;
    r25_1_k = 20;
  r27: complex_enzyme_rpi_molecule_rib5p => complex_enzyme_rpi_molecule_rib5p2; r27_k*complex_enzyme_rpi_molecule_rib5p;
    r27_k = 36000;
  r28: complex_enzyme_rpi_molecule_rib5p2 => enzyme_rpi + molecule_rib5p2; r28_k*complex_enzyme_rpi_molecule_rib5p2;
    r28_k = 20;
  r28_1: enzyme_rpi + molecule_rib5p2 => complex_enzyme_rpi_molecule_rib5p2; r28_1_k*enzyme_rpi*molecule_rib5p2;
    r28_1_k = 20;
  r30: enzyme_rpe + molecule_rib5p => complex_enzyme_rpe_molecule_rib5p; r30_k*enzyme_rpe*molecule_rib5p;
    r30_k = 20;
  r30_1: complex_enzyme_rpe_molecule_rib5p => enzyme_rpe + molecule_rib5p; r30_1_k*complex_enzyme_rpe_molecule_rib5p;
    r30_1_k = 0.0002;
  r32: complex_enzyme_rpe_molecule_rib5p => complex_enzyme_rpe_molecule_xyl5p; r32_k*complex_enzyme_rpe_molecule_rib5p;
    r32_k = 36000;
  r33: complex_enzyme_rpe_molecule_xyl5p => enzyme_rpe + molecule_xyl5p; r33_k*complex_enzyme_rpe_molecule_xyl5p;
    r33_k = 20;
  r33_1: enzyme_rpe + molecule_xyl5p => complex_enzyme_rpe_molecule_xyl5p; r33_1_k*enzyme_rpe*molecule_xyl5p;
    r33_1_k = 0.0002;
  r35: enzyme_xfp + metabolite_pi + molecule_xyl5p => complex_enzyme_xfp_metabolite_pi_molecule_xyl5p; r35_k*enzyme_xfp*metabolite_pi*molecule_xyl5p;
    r35_k = 20;
  r35_1: complex_enzyme_xfp_metabolite_pi_molecule_xyl5p => enzyme_xfp + metabolite_pi + molecule_xyl5p; r35_1_k*complex_enzyme_xfp_metabolite_pi_molecule_xyl5p;
    r35_1_k = 0.0002;
  r37: complex_enzyme_xfp_metabolite_pi_molecule_xyl5p => complex_enzyme_xfp_molecule_acetylp; r37_k*complex_enzyme_xfp_metabolite_pi_molecule_xyl5p;
    r37_k = 36000;
  r38: complex_enzyme_xfp_molecule_acetylp => enzyme_xfp + molecule_acetylp; r38_k*complex_enzyme_xfp_molecule_acetylp;
    r38_k = 20;
  r38_1: enzyme_xfp + molecule_acetylp => complex_enzyme_xfp_molecule_acetylp; r38_1_k*enzyme_xfp*molecule_acetylp;
    r38_1_k = 0.0002;
  r40: enzyme_pta + metabolite_coa + molecule_acetylp => complex_enzyme_pta_metabolite_coa_molecule_acetylp; r40_k*enzyme_pta*metabolite_coa*molecule_acetylp;
    r40_k = 20;
  r40_1: complex_enzyme_pta_metabolite_coa_molecule_acetylp => enzyme_pta + metabolite_coa + molecule_acetylp; r40_1_k*complex_enzyme_pta_metabolite_coa_molecule_acetylp;
    r40_1_k = 0.0002;
  r42: complex_enzyme_pta_metabolite_coa_molecule_acetylp => complex_enzyme_pta_molecule_acetylcoa; r42_k*complex_enzyme_pta_metabolite_coa_molecule_acetylp;
    r42_k = 36000;
  r43: complex_enzyme_pta_molecule_acetylcoa => enzyme_pta + molecule_acetylcoa; r43_k*complex_enzyme_pta_molecule_acetylcoa;
    r43_k = 20;
  r43_1: enzyme_pta + molecule_acetylcoa => complex_enzyme_pta_molecule_acetylcoa; r43_1_k*enzyme_pta*molecule_acetylcoa;
    r43_1_k = 0.0002;
  r45: enzyme_phaa + molecule_acetylcoa => complex_enzyme_phaa_molecule_acetylcoa; r45_k*enzyme_phaa*molecule_acetylcoa;
    r45_k = 20;
  r45_1: complex_enzyme_phaa_molecule_acetylcoa => enzyme_phaa + molecule_acetylcoa; r45_1_k*complex_enzyme_phaa_molecule_acetylcoa;
    r45_1_k = 0.0002;
  r47: complex_enzyme_phaa_molecule_acetylcoa => complex_enzyme_phaa_metabolite_coa_molecule_acetoacetylcoa; r47_k*complex_enzyme_phaa_molecule_acetylcoa;
    r47_k = 36000;
  r48: complex_enzyme_phaa_metabolite_coa_molecule_acetoacetylcoa => enzyme_phaa + molecule_acetoacetylcoa + metabolite_coa; r48_k*complex_enzyme_phaa_metabolite_coa_molecule_acetoacetylcoa;
    r48_k = 20;
  r48_1: enzyme_phaa + molecule_acetoacetylcoa + metabolite_coa => complex_enzyme_phaa_metabolite_coa_molecule_acetoacetylcoa; r48_1_k*enzyme_phaa*molecule_acetoacetylcoa*metabolite_coa;
    r48_1_k = 0.0002;
  r50: enzyme_phab + metabolite_nadph + molecule_acetoacetylcoa => complex_enzyme_phab_metabolite_nadph_molecule_acetoacetylcoa; r50_k*enzyme_phab*metabolite_nadph*molecule_acetoacetylcoa;
    r50_k = 20;
  r50_1: complex_enzyme_phab_metabolite_nadph_molecule_acetoacetylcoa => enzyme_phab + metabolite_nadph + molecule_acetoacetylcoa; r50_1_k*complex_enzyme_phab_metabolite_nadph_molecule_acetoacetylcoa;
    r50_1_k = 0.0002;
  r52: complex_enzyme_phab_metabolite_nadph_molecule_acetoacetylcoa => complex_enzyme_phab_metabolite_nadp_molecule_3hydroxycoa; r52_k*complex_enzyme_phab_metabolite_nadph_molecule_acetoacetylcoa;
    r52_k = 36000;
  r53: complex_enzyme_phab_metabolite_nadp_molecule_3hydroxycoa => enzyme_phab + molecule_3hydroxycoa + metabolite_nadp; r53_k*complex_enzyme_phab_metabolite_nadp_molecule_3hydroxycoa;
    r53_k = 20;
  r53_1: enzyme_phab + molecule_3hydroxycoa + metabolite_nadp => complex_enzyme_phab_metabolite_nadp_molecule_3hydroxycoa; r53_1_k*enzyme_phab*molecule_3hydroxycoa*metabolite_nadp;
    r53_1_k = 0.0002;
  r55: enzyme_phac + molecule_3hydroxycoa => complex_enzyme_phac_molecule_3hydroxycoa; r55_k*enzyme_phac*molecule_3hydroxycoa;
    r55_k = 20;
  r55_1: complex_enzyme_phac_molecule_3hydroxycoa => enzyme_phac + molecule_3hydroxycoa; r55_1_k*complex_enzyme_phac_molecule_3hydroxycoa;
    r55_1_k = 0.0002;
  r57: complex_enzyme_phac_molecule_3hydroxycoa => complex_enzyme_phac_metabolite_coa_molecule_phb; r57_k*complex_enzyme_phac_molecule_3hydroxycoa;
    r57_k = 36000;
  r58: complex_enzyme_phac_metabolite_coa_molecule_phb => enzyme_phac + molecule_phb + metabolite_coa; r58_k*complex_enzyme_phac_metabolite_coa_molecule_phb;
    r58_k = 20;
  r58_1: enzyme_phac + molecule_phb + metabolite_coa => complex_enzyme_phac_metabolite_coa_molecule_phb; r58_1_k*enzyme_phac*molecule_phb*metabolite_coa;
    r58_1_k = 0.0002;
  r60: enzyme_xfp + molecule_xyl5p => complex_enzyme_xfp_molecule_xyl5p; r60_k*enzyme_xfp*molecule_xyl5p;
    r60_k = 20;
  r60_1: complex_enzyme_xfp_molecule_xyl5p => enzyme_xfp + molecule_xyl5p; r60_1_k*complex_enzyme_xfp_molecule_xyl5p;
    r60_1_k = 0.0002;
  r62: complex_enzyme_xfp_molecule_xyl5p => complex_enzyme_xfp_molecule_g3p; r62_k*complex_enzyme_xfp_molecule_xyl5p;
    r62_k = 36000;
  r63: complex_enzyme_xfp_molecule_g3p => enzyme_xfp + molecule_g3p; r63_k*complex_enzyme_xfp_molecule_g3p;
    r63_k = 20;
  r63_1: enzyme_xfp + molecule_g3p => complex_enzyme_xfp_molecule_g3p; r63_1_k*enzyme_xfp*molecule_g3p;
    r63_1_k = 0.0002;
  r65: enzyme_fba + molecule_g3p => complex_enzyme_fba_molecule_g3p; r65_k*enzyme_fba*molecule_g3p;
    r65_k = 20;
  r65_1: complex_enzyme_fba_molecule_g3p => enzyme_fba + molecule_g3p; r65_1_k*complex_enzyme_fba_molecule_g3p;
    r65_1_k = 0.0002;
  r67: complex_enzyme_fba_molecule_g3p => complex_enzyme_fba_molecule_f16bp; r67_k*complex_enzyme_fba_molecule_g3p;
    r67_k = 36000;
  r68: complex_enzyme_fba_molecule_f16bp => enzyme_fba + molecule_f16bp; r68_k*complex_enzyme_fba_molecule_f16bp;
    r68_k = 20;
  r68_1: enzyme_fba + molecule_f16bp => complex_enzyme_fba_molecule_f16bp; r68_1_k*enzyme_fba*molecule_f16bp;
    r68_1_k = 0.0002;
  r70: enzyme_fba + molecule_f16bp => complex_enzyme_fba_molecule_f16bp; r70_k*enzyme_fba*molecule_f16bp;
    r70_k = 20;
  r70_1: complex_enzyme_fba_molecule_f16bp => enzyme_fba + molecule_f16bp; r70_1_k*complex_enzyme_fba_molecule_f16bp;
    r70_1_k = 0.0002;
  r72: complex_enzyme_fba_molecule_f16bp => complex_enzyme_fba_molecule_dhap; r72_k*complex_enzyme_fba_molecule_f16bp;
    r72_k = 36000;
  r73: complex_enzyme_fba_molecule_dhap => enzyme_fba + molecule_dhap; r73_k*complex_enzyme_fba_molecule_dhap;
    r73_k = 20;
  r73_1: enzyme_fba + molecule_dhap => complex_enzyme_fba_molecule_dhap; r73_1_k*enzyme_fba*molecule_dhap;
    r73_1_k = 0.0002;
  r75: enzyme_tpi + molecule_dhap => complex_enzyme_tpi_molecule_dhap; r75_k*enzyme_tpi*molecule_dhap;
    r75_k = 20;
  r75_1: complex_enzyme_tpi_molecule_dhap => enzyme_tpi + molecule_dhap; r75_1_k*complex_enzyme_tpi_molecule_dhap;
    r75_1_k = 0.0002;
  r77: complex_enzyme_tpi_molecule_dhap => complex_enzyme_tpi_molecule_g3p; r77_k*complex_enzyme_tpi_molecule_dhap;
    r77_k = 36000;
  r78: complex_enzyme_tpi_molecule_g3p => enzyme_tpi + molecule_g3p; r78_k*complex_enzyme_tpi_molecule_g3p;
    r78_k = 20;
  r78_1: enzyme_tpi + molecule_g3p => complex_enzyme_tpi_molecule_g3p; r78_1_k*enzyme_tpi*molecule_g3p;
    r78_1_k = 0.0002;
  r80: enzyme_pfkb + metabolite_adp + molecule_f16bp => complex_enzyme_pfkb_metabolite_adp_molecule_f16bp; r80_k*enzyme_pfkb*metabolite_adp*molecule_f16bp;
    r80_k = 20;
  r80_1: complex_enzyme_pfkb_metabolite_adp_molecule_f16bp => enzyme_pfkb + metabolite_adp + molecule_f16bp; r80_1_k*complex_enzyme_pfkb_metabolite_adp_molecule_f16bp;
    r80_1_k = 0.0002;
  r82: complex_enzyme_pfkb_metabolite_adp_molecule_f16bp => complex_enzyme_pfkb_metabolite_atp_molecule_f6p; r82_k*complex_enzyme_pfkb_metabolite_adp_molecule_f16bp;
    r82_k = 36000;
  r83: complex_enzyme_pfkb_metabolite_atp_molecule_f6p => enzyme_pfkb + molecule_f6p + metabolite_atp; r83_k*complex_enzyme_pfkb_metabolite_atp_molecule_f6p;
    r83_k = 20;
  r83_1: enzyme_pfkb + molecule_f6p + metabolite_atp => complex_enzyme_pfkb_metabolite_atp_molecule_f6p; r83_1_k*enzyme_pfkb*molecule_f6p*metabolite_atp;
    r83_1_k = 0.0002;
  r85: enzyme_pgi + molecule_f6p => complex_enzyme_pgi_molecule_f6p; r85_k*enzyme_pgi*molecule_f6p;
    r85_k = 20;
  r85_1: complex_enzyme_pgi_molecule_f6p => enzyme_pgi + molecule_f6p; r85_1_k*complex_enzyme_pgi_molecule_f6p;
    r85_1_k = 0.0002;
  r87: complex_enzyme_pgi_molecule_f6p => complex_enzyme_pgi_molecule_g6p; r87_k*complex_enzyme_pgi_molecule_f6p;
    r87_k = 36000;
  r88: complex_enzyme_pgi_molecule_g6p => enzyme_pgi + molecule_g6p; r88_k*complex_enzyme_pgi_molecule_g6p;
    r88_k = 20;
  r88_1: enzyme_pgi + molecule_g6p => complex_enzyme_pgi_molecule_g6p; r88_1_k*enzyme_pgi*molecule_g6p;
    r88_1_k = 0.0002;
  r90: enzyme_xfp + molecule_f6p => complex_enzyme_xfp_molecule_f6p; r90_k*enzyme_xfp*molecule_f6p;
    r90_k = 20;
  r90_1: complex_enzyme_xfp_molecule_f6p => enzyme_xfp + molecule_f6p; r90_1_k*complex_enzyme_xfp_molecule_f6p;
    r90_1_k = 0.0002;
  r92: complex_enzyme_xfp_molecule_f6p => complex_enzyme_xfp_molecule_er4p; r92_k*complex_enzyme_xfp_molecule_f6p;
    r92_k = 36000;
  r93: complex_enzyme_xfp_molecule_er4p => enzyme_xfp + molecule_er4p; r93_k*complex_enzyme_xfp_molecule_er4p;
    r93_k = 20;
  r93_1: enzyme_xfp + molecule_er4p => complex_enzyme_xfp_molecule_er4p; r93_1_k*enzyme_xfp*molecule_er4p;
    r93_1_k = 0.0002;
  r95: enzyme_xfp + metabolite_pi + molecule_f6p => complex_enzyme_xfp_metabolite_pi_molecule_f6p; r95_k*enzyme_xfp*metabolite_pi*molecule_f6p;
    r95_k = 20;
  r95_1: complex_enzyme_xfp_metabolite_pi_molecule_f6p => enzyme_xfp + metabolite_pi + molecule_f6p; r95_1_k*complex_enzyme_xfp_metabolite_pi_molecule_f6p;
    r95_1_k = 0.0002;
  r97: complex_enzyme_xfp_metabolite_pi_molecule_f6p => complex_enzyme_xfp_molecule_acetylp; r97_k*complex_enzyme_xfp_metabolite_pi_molecule_f6p;
    r97_k = 36000;
  r98: complex_enzyme_xfp_molecule_acetylp => enzyme_xfp + molecule_acetylp; r98_k*complex_enzyme_xfp_molecule_acetylp;
    r98_k = 20;
  r98_1: enzyme_xfp + molecule_acetylp => complex_enzyme_xfp_molecule_acetylp; r98_1_k*enzyme_xfp*molecule_acetylp;
    r98_1_k = 0.0002;
  r100: enzyme_tktatalb + molecule_er4p => complex_enzyme_tktatalb_molecule_er4p; r100_k*enzyme_tktatalb*molecule_er4p;
    r100_k = 20;
  r100_1: complex_enzyme_tktatalb_molecule_er4p => enzyme_tktatalb + molecule_er4p; r100_1_k*complex_enzyme_tktatalb_molecule_er4p;
    r100_1_k = 0.0002;
  r102: complex_enzyme_tktatalb_molecule_er4p => complex_enzyme_tktatalb_molecule_f6p; r102_k*complex_enzyme_tktatalb_molecule_er4p;
    r102_k = 36000;
  r103: complex_enzyme_tktatalb_molecule_f6p => enzyme_tktatalb + molecule_f6p; r103_k*complex_enzyme_tktatalb_molecule_f6p;
    r103_k = 20;
  r103_1: enzyme_tktatalb + molecule_f6p => complex_enzyme_tktatalb_molecule_f6p; r103_1_k*enzyme_tktatalb*molecule_f6p;
    r103_1_k = 0.0002;
  r105: enzyme_tktatalb + molecule_er4p => complex_enzyme_tktatalb_molecule_er4p; r105_k*enzyme_tktatalb*molecule_er4p;
    r105_k = 20;
  r105_1: complex_enzyme_tktatalb_molecule_er4p => enzyme_tktatalb + molecule_er4p; r105_1_k*complex_enzyme_tktatalb_molecule_er4p;
    r105_1_k = 0.0002;
  r107: complex_enzyme_tktatalb_molecule_er4p => complex_enzyme_tktatalb_molecule_g3p; r107_k*complex_enzyme_tktatalb_molecule_er4p;
    r107_k = 36000;
  r108: complex_enzyme_tktatalb_molecule_g3p => enzyme_tktatalb + molecule_g3p; r108_k*complex_enzyme_tktatalb_molecule_g3p;
    r108_k = 20;
  r108_1: enzyme_tktatalb + molecule_g3p => complex_enzyme_tktatalb_molecule_g3p; r108_1_k*enzyme_tktatalb*molecule_g3p;
    r108_1_k = 0.0002;
  r110: enzyme_tktatalb + molecule_rib5p2 => complex_enzyme_tktatalb_molecule_rib5p2; r110_k*enzyme_tktatalb*molecule_rib5p2;
    r110_k = 20;
  r110_1: complex_enzyme_tktatalb_molecule_rib5p2 => enzyme_tktatalb + molecule_rib5p2; r110_1_k*complex_enzyme_tktatalb_molecule_rib5p2;
    r110_1_k = 0.0002;
  r112: complex_enzyme_tktatalb_molecule_rib5p2 => complex_enzyme_tktatalb_molecule_f6p; r112_k*complex_enzyme_tktatalb_molecule_rib5p2;
    r112_k = 36000;
  r113: complex_enzyme_tktatalb_molecule_f6p => enzyme_tktatalb + molecule_f6p; r113_k*complex_enzyme_tktatalb_molecule_f6p;
    r113_k = 20;
  r113_1: enzyme_tktatalb + molecule_f6p => complex_enzyme_tktatalb_molecule_f6p; r113_1_k*enzyme_tktatalb*molecule_f6p;
    r113_1_k = 0.0002;
  r115: enzyme_tktatalb + molecule_rib5p2 => complex_enzyme_tktatalb_molecule_rib5p2; r115_k*enzyme_tktatalb*molecule_rib5p2;
    r115_k = 20;
  r115_1: complex_enzyme_tktatalb_molecule_rib5p2 => enzyme_tktatalb + molecule_rib5p2; r115_1_k*complex_enzyme_tktatalb_molecule_rib5p2;
    r115_1_k = 0.0002;
  r117: complex_enzyme_tktatalb_molecule_rib5p2 => complex_enzyme_tktatalb_molecule_g3p; r117_k*complex_enzyme_tktatalb_molecule_rib5p2;
    r117_k = 36000;
  r118: complex_enzyme_tktatalb_molecule_g3p => enzyme_tktatalb + molecule_g3p; r118_k*complex_enzyme_tktatalb_molecule_g3p;
    r118_k = 20;
  r118_1: enzyme_tktatalb + molecule_g3p => complex_enzyme_tktatalb_molecule_g3p; r118_1_k*enzyme_tktatalb*molecule_g3p;
    r118_1_k = 0.0002;
  r120: enzyme_tktatalb + molecule_xyl5p => complex_enzyme_tktatalb_molecule_xyl5p; r120_k*enzyme_tktatalb*molecule_xyl5p;
    r120_k = 20;
  r120_1: complex_enzyme_tktatalb_molecule_xyl5p => enzyme_tktatalb + molecule_xyl5p; r120_1_k*complex_enzyme_tktatalb_molecule_xyl5p;
    r120_1_k = 0.0002;
  r122: complex_enzyme_tktatalb_molecule_xyl5p => complex_enzyme_tktatalb_molecule_f6p; r122_k*complex_enzyme_tktatalb_molecule_xyl5p;
    r122_k = 36000;
  r123: complex_enzyme_tktatalb_molecule_f6p => enzyme_tktatalb + molecule_f6p; r123_k*complex_enzyme_tktatalb_molecule_f6p;
    r123_k = 20;
  r123_1: enzyme_tktatalb + molecule_f6p => complex_enzyme_tktatalb_molecule_f6p; r123_1_k*enzyme_tktatalb*molecule_f6p;
    r123_1_k = 0.0002;
  r125: enzyme_tktatalb + molecule_xyl5p => complex_enzyme_tktatalb_molecule_xyl5p; r125_k*enzyme_tktatalb*molecule_xyl5p;
    r125_k = 20;
  r125_1: complex_enzyme_tktatalb_molecule_xyl5p => enzyme_tktatalb + molecule_xyl5p; r125_1_k*complex_enzyme_tktatalb_molecule_xyl5p;
    r125_1_k = 0.0002;
  r127: complex_enzyme_tktatalb_molecule_xyl5p => complex_enzyme_tktatalb_molecule_g3p; r127_k*complex_enzyme_tktatalb_molecule_xyl5p;
    r127_k = 36000;
  r128: complex_enzyme_tktatalb_molecule_g3p => enzyme_tktatalb + molecule_g3p; r128_k*complex_enzyme_tktatalb_molecule_g3p;
    r128_k = 20;
  r128_1: enzyme_tktatalb + molecule_g3p => complex_enzyme_tktatalb_molecule_g3p; r128_1_k*enzyme_tktatalb*molecule_g3p;
    r128_1_k = 0.0002;
  r130: enzyme_nadphase + metabolite_nadph => complex_enzyme_nadphase_metabolite_nadph; r130_k*enzyme_nadphase*metabolite_nadph;
    r130_k = 20;
  r130_1: complex_enzyme_nadphase_metabolite_nadph => enzyme_nadphase + metabolite_nadph; r130_1_k*complex_enzyme_nadphase_metabolite_nadph;
    r130_1_k = 0.0002;
  r132: complex_enzyme_nadphase_metabolite_nadph => complex_enzyme_nadphase_metabolite_nadp; r132_k*complex_enzyme_nadphase_metabolite_nadph;
    r132_k = 36000;
  r133: complex_enzyme_nadphase_metabolite_nadp => enzyme_nadphase + metabolite_nadp; r133_k*complex_enzyme_nadphase_metabolite_nadp;
    r133_k = 20;
  r133_1: enzyme_nadphase + metabolite_nadp => complex_enzyme_nadphase_metabolite_nadp; r133_1_k*enzyme_nadphase*metabolite_nadp;
    r133_1_k = 0.0002;

  // Unit definitions:
  unit square_metre = metre^2;
end
