// SBML level 3 version 2

model biocrnpyler_392710()
  // model units - substance: mole, time: second, volume: litre, area: square_metre, length: metre, extent: mole

  // Compartments:
  compartment default = 1e-6;

  // Species:
  species dna_g in default = 0;
  species tetR in default = 0;
  species rna_g in default = 0;
  species VirE2_f in default = 0;
  species ATP in default = 0;
  species ADP in default = 0;
  species aTc_i in default = 0;
  species complex_aTc_i_tetR in default = 0;
  species VirE2_b in default = 0;
  species complex_dna_g_tetR in default = 0;
  species complex_aTc_i_dna_g_tetR in default = 0;
  species P in default = 0;

  // Reactions:
  r0: dna_g + tetR => complex_dna_g_tetR; r0_k*dna_g*tetR;
    r0_k = 1000;
  r1: complex_dna_g_tetR + aTc_i => complex_aTc_i_dna_g_tetR; r1_k*complex_dna_g_tetR*aTc_i;
    r1_k = 1000;
  r2: complex_aTc_i_dna_g_tetR => dna_g + complex_aTc_i_tetR; r2_k*complex_aTc_i_dna_g_tetR;
    r2_k = 10000;
  r2_1: dna_g + complex_aTc_i_tetR => complex_aTc_i_dna_g_tetR; r2_1_k*dna_g*complex_aTc_i_tetR;
    r2_1_k = 10;
  r4: dna_g => dna_g + rna_g; r4_k*dna_g/(tetR^r4_n + r4_K);
    r4_k = 0.0075; r4_n = 1; r4_K = 20;
  r5: dna_g => dna_g + rna_g; r5_k*dna_g;
    r5_k = 0.001;
  r6: rna_g + ATP => rna_g + ADP + VirE2_f + P; r6_k*rna_g*ATP^r6_n/(ATP^r6_n + r6_K);
    r6_k = 0.25; r6_n = 1; r6_K = 1;
  r7: VirE2_f => VirE2_b; r7_k*VirE2_f;
    r7_k = 0.1;
  r8: rna_g => ; r8_k*rna_g;
    r8_k = 0.01;
  r9: VirE2_f => ; r9_k*VirE2_f;
    r9_k = 0.0001;

  // Unit definitions:
  unit square_metre = metre^2;
end
