// SBML level 3 version 2

model combined_model_of__combined_model_of__reservoir_model_combined_model_of__combined_model_of__combined_model_of__biocrnpyler_27297_biocrnpyler_132071()
  // model units - substance: mole, time: second, volume: litre, area: square_metre, length: metre, extent: mole

  // Compartments:
  compartment cell_1_external = 1e-6 litre;
  compartment cell_1_internal = 0;

  // Species:
  species IPTG_reservoir_model in cell_1_external = 10000;
  species G_txbiocrnpyler_27297_combined_model_of__biocrnpyler_27297_biocrnpyler_132071 in cell_1_internal = 1/cell_1_internal;
  species S_txbiocrnpyler_27297_combined_model_of__biocrnpyler_27297_biocrnpyler_132071 in cell_1_internal = 10000/cell_1_internal; S_txbiocrnpyler_27297_combined_model_of__biocrnpyler_27297_biocrnpyler_132071 is "IPTG";
  species mRNA_T_txbiocrnpyler_27297_1_combined_combined_model_of__biocrnpyler_27297_biocrnpyler_132071 in cell_1_internal = 0;
  species X_tlbiocrnpyler_132071_combined_model_of__biocrnpyler_27297_biocrnpyler_132071 in cell_1_internal = 0;

  // Reactions:
  r0_txbiocrnpyler_27297_combined_model_of__biocrnpyler_27297_biocrnpyler_132071: G_txbiocrnpyler_27297_combined_model_of__biocrnpyler_27297_biocrnpyler_132071 => G_txbiocrnpyler_27297_combined_model_of__biocrnpyler_27297_biocrnpyler_132071 + mRNA_T_txbiocrnpyler_27297_1_combined_combined_model_of__biocrnpyler_27297_biocrnpyler_132071; r0_txbiocrnpyler_27297_combined_model_of__biocrnpyler_27297_biocrnpyler_132071_k*G_txbiocrnpyler_27297_combined_model_of__biocrnpyler_27297_biocrnpyler_132071*S_txbiocrnpyler_27297_combined_model_of__biocrnpyler_27297_biocrnpyler_132071^r0_txbiocrnpyler_27297_combined_model_of__biocrnpyler_27297_biocrnpyler_132071_n/(S_txbiocrnpyler_27297_combined_model_of__biocrnpyler_27297_biocrnpyler_132071^r0_txbiocrnpyler_27297_combined_model_of__biocrnpyler_27297_biocrnpyler_132071_n + r0_txbiocrnpyler_27297_combined_model_of__biocrnpyler_27297_biocrnpyler_132071_K);
    r0_txbiocrnpyler_27297_combined_model_of__biocrnpyler_27297_biocrnpyler_132071_k = 2; r0_txbiocrnpyler_27297_combined_model_of__biocrnpyler_27297_biocrnpyler_132071_n = 2; r0_txbiocrnpyler_27297_combined_model_of__biocrnpyler_27297_biocrnpyler_132071_K = 10;
  r1_txbiocrnpyler_27297_combined_model_of__biocrnpyler_27297_biocrnpyler_132071: mRNA_T_txbiocrnpyler_27297_1_combined_combined_model_of__biocrnpyler_27297_biocrnpyler_132071 => ; r1_txbiocrnpyler_27297_combined_model_of__biocrnpyler_27297_biocrnpyler_132071_k*mRNA_T_txbiocrnpyler_27297_1_combined_combined_model_of__biocrnpyler_27297_biocrnpyler_132071;
    r1_txbiocrnpyler_27297_combined_model_of__biocrnpyler_27297_biocrnpyler_132071_k = 0.1;
  r0_tlbiocrnpyler_132071_combined_model_of__biocrnpyler_27297_biocrnpyler_132071: mRNA_T_txbiocrnpyler_27297_1_combined_combined_model_of__biocrnpyler_27297_biocrnpyler_132071 => mRNA_T_txbiocrnpyler_27297_1_combined_combined_model_of__biocrnpyler_27297_biocrnpyler_132071 + X_tlbiocrnpyler_132071_combined_model_of__biocrnpyler_27297_biocrnpyler_132071; r0_tlbiocrnpyler_132071_combined_model_of__biocrnpyler_27297_biocrnpyler_132071_k*mRNA_T_txbiocrnpyler_27297_1_combined_combined_model_of__biocrnpyler_27297_biocrnpyler_132071^r0_tlbiocrnpyler_132071_combined_model_of__biocrnpyler_27297_biocrnpyler_132071_n/(mRNA_T_txbiocrnpyler_27297_1_combined_combined_model_of__biocrnpyler_27297_biocrnpyler_132071^r0_tlbiocrnpyler_132071_combined_model_of__biocrnpyler_27297_biocrnpyler_132071_n + r0_tlbiocrnpyler_132071_combined_model_of__biocrnpyler_27297_biocrnpyler_132071_K);
    r0_tlbiocrnpyler_132071_combined_model_of__biocrnpyler_27297_biocrnpyler_132071_k = 5; r0_tlbiocrnpyler_132071_combined_model_of__biocrnpyler_27297_biocrnpyler_132071_n = 1; r0_tlbiocrnpyler_132071_combined_model_of__biocrnpyler_27297_biocrnpyler_132071_K = 20;
  r1_tlbiocrnpyler_132071_combined_model_of__biocrnpyler_27297_biocrnpyler_132071: X_tlbiocrnpyler_132071_combined_model_of__biocrnpyler_27297_biocrnpyler_132071 => ; r1_tlbiocrnpyler_132071_combined_model_of__biocrnpyler_27297_biocrnpyler_132071_k*X_tlbiocrnpyler_132071_combined_model_of__biocrnpyler_27297_biocrnpyler_132071;
    r1_tlbiocrnpyler_132071_combined_model_of__biocrnpyler_27297_biocrnpyler_132071_k = 0.1;

  // Unit definitions:
  unit square_metre = metre^2;
  unit per_second = 1 / second;
  unit substance = dimensionless;
end
