// SBML level 3 version 2

model combined_model_of__combined_model_of__reservoir_model_combined_model_of__IPTG_membrane_combined_model_of__combined_model_of__biocrnpyler_27297_biocrnpyler_132071()
  // model units - substance: mole, time: second, volume: litre, area: square_metre, length: metre, extent: mole

  // Compartments:
  compartment cell_3_external_combined = 2e-6 litre;
  compartment cell_3_internal_combined = 1e-6 litre;

  // Species:
  species IPTG_reservoir_model_1_combined in cell_3_external_combined = 10000/cell_3_external_combined;
  species transport_protein in cell_3_internal_combined = 1;
  species IPTG_transport_protein in cell_3_internal_combined = 0;
  species G_txbiocrnpyler_27297_combined_model_of__biocrnpyler_27297_biocrnpyler_132071 in cell_3_internal_combined = 1/cell_3_internal_combined;
  species IPTG_1_1_combined in cell_3_internal_combined = 10/cell_3_internal_combined;
  species mRNA_T_txbiocrnpyler_27297_1_combined_combined_model_of__biocrnpyler_27297_biocrnpyler_132071 in cell_3_internal_combined = 0;
  species X_tlbiocrnpyler_132071_combined_model_of__biocrnpyler_27297_biocrnpyler_132071 in cell_3_internal_combined = 0;

  // Parameters:
  kb = 0.01 per_second;
  kd = 0.2 per_second;

  // Reactions:
  r1: IPTG_reservoir_model_1_combined + transport_protein -> IPTG_transport_protein; kb*IPTG_reservoir_model_1_combined*transport_protein - kd*IPTG_transport_protein;
  r2: IPTG_transport_protein -> IPTG_1_1_combined + transport_protein; kd*IPTG_transport_protein - kb*IPTG_1_1_combined*transport_protein;
  r0_txbiocrnpyler_27297_combined_model_of__biocrnpyler_27297_biocrnpyler_132071: G_txbiocrnpyler_27297_combined_model_of__biocrnpyler_27297_biocrnpyler_132071 => G_txbiocrnpyler_27297_combined_model_of__biocrnpyler_27297_biocrnpyler_132071 + mRNA_T_txbiocrnpyler_27297_1_combined_combined_model_of__biocrnpyler_27297_biocrnpyler_132071; r0_txbiocrnpyler_27297_combined_model_of__biocrnpyler_27297_biocrnpyler_132071_k*G_txbiocrnpyler_27297_combined_model_of__biocrnpyler_27297_biocrnpyler_132071*IPTG_1_1_combined^r0_txbiocrnpyler_27297_combined_model_of__biocrnpyler_27297_biocrnpyler_132071_n/(IPTG_1_1_combined^r0_txbiocrnpyler_27297_combined_model_of__biocrnpyler_27297_biocrnpyler_132071_n + r0_txbiocrnpyler_27297_combined_model_of__biocrnpyler_27297_biocrnpyler_132071_K);
    r0_txbiocrnpyler_27297_combined_model_of__biocrnpyler_27297_biocrnpyler_132071_k = 2; r0_txbiocrnpyler_27297_combined_model_of__biocrnpyler_27297_biocrnpyler_132071_n = 2; r0_txbiocrnpyler_27297_combined_model_of__biocrnpyler_27297_biocrnpyler_132071_K = 10;
  r1_txbiocrnpyler_27297_combined_model_of__biocrnpyler_27297_biocrnpyler_132071: mRNA_T_txbiocrnpyler_27297_1_combined_combined_model_of__biocrnpyler_27297_biocrnpyler_132071 => ; r1_txbiocrnpyler_27297_combined_model_of__biocrnpyler_27297_biocrnpyler_132071_k*mRNA_T_txbiocrnpyler_27297_1_combined_combined_model_of__biocrnpyler_27297_biocrnpyler_132071;
    r1_txbiocrnpyler_27297_combined_model_of__biocrnpyler_27297_biocrnpyler_132071_k = 0.1;
  r0_tlbiocrnpyler_132071_combined_model_of__biocrnpyler_27297_biocrnpyler_132071: mRNA_T_txbiocrnpyler_27297_1_combined_combined_model_of__biocrnpyler_27297_biocrnpyler_132071 => mRNA_T_txbiocrnpyler_27297_1_combined_combined_model_of__biocrnpyler_27297_biocrnpyler_132071 + X_tlbiocrnpyler_132071_combined_model_of__biocrnpyler_27297_biocrnpyler_132071; r0_tlbiocrnpyler_132071_combined_model_of__biocrnpyler_27297_biocrnpyler_132071_k*mRNA_T_txbiocrnpyler_27297_1_combined_combined_model_of__biocrnpyler_27297_biocrnpyler_132071^r0_tlbiocrnpyler_132071_combined_model_of__biocrnpyler_27297_biocrnpyler_132071_n/(mRNA_T_txbiocrnpyler_27297_1_combined_combined_model_of__biocrnpyler_27297_biocrnpyler_132071^r0_tlbiocrnpyler_132071_combined_model_of__biocrnpyler_27297_biocrnpyler_132071_n + r0_tlbiocrnpyler_132071_combined_model_of__biocrnpyler_27297_biocrnpyler_132071_K);
    r0_tlbiocrnpyler_132071_combined_model_of__biocrnpyler_27297_biocrnpyler_132071_k = 5; r0_tlbiocrnpyler_132071_combined_model_of__biocrnpyler_27297_biocrnpyler_132071_n = 1; r0_tlbiocrnpyler_132071_combined_model_of__biocrnpyler_27297_biocrnpyler_132071_K = 20;
  r1_tlbiocrnpyler_132071_combined_model_of__biocrnpyler_27297_biocrnpyler_132071: X_tlbiocrnpyler_132071_combined_model_of__biocrnpyler_27297_biocrnpyler_132071 => ; r1_tlbiocrnpyler_132071_combined_model_of__biocrnpyler_27297_biocrnpyler_132071_k*X_tlbiocrnpyler_132071_combined_model_of__biocrnpyler_27297_biocrnpyler_132071;
    r1_tlbiocrnpyler_132071_combined_model_of__biocrnpyler_27297_biocrnpyler_132071_k = 0.1;

  // Unit definitions:
  unit square_metre = metre^2;
  unit per_second = 1 / second;
  unit substance = dimensionless;
end
