// SBML level 3 version 2

model combined_model_of__biocrnpyler_565040_biocrnpyler_132071_biocrnpyler_27836()
  // model units - substance: mole, time: second, volume: litre, area: square_metre, length: metre, extent: mole

  // Compartments:
  compartment default_txbiocrnpyler_565040_combined = 3e-6;
  compartment default_txbiocrnpyler_565040_combined_1 = 1e-6;

  // Species:
  species G_txbiocrnpyler_565040 in default_txbiocrnpyler_565040_combined_1 = 1/default_txbiocrnpyler_565040_combined_1;
  species mRNA_T_txbiocrnpyler_565040_1_combined in default_txbiocrnpyler_565040_combined = 0;
  species X_tlbiocrnpyler_132071 in default_txbiocrnpyler_565040_combined = 0;
  species I_s1biocrnpyler_27836 in default_txbiocrnpyler_565040_combined_1 = 2/default_txbiocrnpyler_565040_combined_1;
  species S_txbiocrnpyler_565040_1_combined in default_txbiocrnpyler_565040_combined_1 = 0;

  // Reactions:
  r0_txbiocrnpyler_565040: G_txbiocrnpyler_565040 => G_txbiocrnpyler_565040 + mRNA_T_txbiocrnpyler_565040_1_combined; r0_txbiocrnpyler_565040_k*G_txbiocrnpyler_565040*S_txbiocrnpyler_565040_1_combined^r0_txbiocrnpyler_565040_n/(S_txbiocrnpyler_565040_1_combined^r0_txbiocrnpyler_565040_n + r0_txbiocrnpyler_565040_K);
    r0_txbiocrnpyler_565040_k = 2; r0_txbiocrnpyler_565040_n = 2; r0_txbiocrnpyler_565040_K = 10;
  r1_txbiocrnpyler_565040: mRNA_T_txbiocrnpyler_565040_1_combined => ; r1_txbiocrnpyler_565040_k*mRNA_T_txbiocrnpyler_565040_1_combined;
    r1_txbiocrnpyler_565040_k = 0.1;
  r0_tlbiocrnpyler_132071: mRNA_T_txbiocrnpyler_565040_1_combined => mRNA_T_txbiocrnpyler_565040_1_combined + X_tlbiocrnpyler_132071; r0_tlbiocrnpyler_132071_k*mRNA_T_txbiocrnpyler_565040_1_combined^r0_tlbiocrnpyler_132071_n/(mRNA_T_txbiocrnpyler_565040_1_combined^r0_tlbiocrnpyler_132071_n + r0_tlbiocrnpyler_132071_K);
    r0_tlbiocrnpyler_132071_k = 5; r0_tlbiocrnpyler_132071_n = 1; r0_tlbiocrnpyler_132071_K = 20;
  r1_tlbiocrnpyler_132071: X_tlbiocrnpyler_132071 => ; r1_tlbiocrnpyler_132071_k*X_tlbiocrnpyler_132071;
    r1_tlbiocrnpyler_132071_k = 0.1;
  r0_s1biocrnpyler_27836: => S_txbiocrnpyler_565040_1_combined; r0_s1biocrnpyler_27836_k*I_s1biocrnpyler_27836^r0_s1biocrnpyler_27836_n/(I_s1biocrnpyler_27836^r0_s1biocrnpyler_27836_n + r0_s1biocrnpyler_27836_K);
    r0_s1biocrnpyler_27836_k = 20; r0_s1biocrnpyler_27836_n = 2; r0_s1biocrnpyler_27836_K = 25;

  // Unit definitions:
  unit square_metre = metre^2;
end
