// SBML level 3 version 2

model biocrnpyler_704916()
  // model units - substance: mole, time: second, volume: litre, area: square_metre, length: metre, extent: mole

  // Compartments:
  compartment default = 1e-6;

  // Species:
  species A in default = 0;
  species B in default = 0;
  species complex_A_B_ in default = 0;

  // Reactions:
  r0: 2 A => B; r0_k_forward*A^2;
    r0_k_forward = 1;
  r1: A + B => complex_A_B_; r1_k_forward*A*B;
    r1_k_forward = 10;
  r1rev: complex_A_B_ => A + B; k_reverse*complex_A_B_;
    k_reverse = 2;

  // Unit definitions:
  unit square_metre = metre^2;
end
