// SBML level 3 version 2

model combined_model_of__bioscrape_generated_model_280673_bioscrape_generated_model_972412()
  // model units - substance: mole, time: second, volume: litre, area: square_metre, length: metre, extent: mole

  // Compartments:
  compartment default_bioscrape_generated_model_280673_combined = 2e-6;

  // Species:
  species G_bioscrape_generated_model_280673 in default_bioscrape_generated_model_280673_combined = 1;
  species S_bioscrape_generated_model_280673 in default_bioscrape_generated_model_280673_combined = 0;
  species mRNA_T_bioscrape_generated_model_280673_1_combined in default_bioscrape_generated_model_280673_combined = 0;
  species X_bioscrape_generated_model_972412 in default_bioscrape_generated_model_280673_combined = 0;

  // Parameters:
  KI_bioscrape_generated_model_280673 = 10;
  KX_bioscrape_generated_model_280673 = 2;
  DummyVar_PositiveHillPropensity_n_0_bioscrape_generated_model_972412 = 1;
  KR_bioscrape_generated_model_972412 = 20;
  KTR_bioscrape_generated_model_972412 = 5;
  delta_combined = 0.1;
  n_combined = 2;

  // Reactions:
  r0_bioscrape_generated_model_280673: G_bioscrape_generated_model_280673 => G_bioscrape_generated_model_280673 + mRNA_T_bioscrape_generated_model_280673_1_combined; G_bioscrape_generated_model_280673*KX_bioscrape_generated_model_280673*S_bioscrape_generated_model_280673^n_combined/(KI_bioscrape_generated_model_280673 + S_bioscrape_generated_model_280673^n_combined);  // modifiers: S_bioscrape_generated_model_280673
  r1_bioscrape_generated_model_280673: mRNA_T_bioscrape_generated_model_280673_1_combined => ; delta_combined*mRNA_T_bioscrape_generated_model_280673_1_combined;
  r0_bioscrape_generated_model_972412: mRNA_T_bioscrape_generated_model_280673_1_combined => mRNA_T_bioscrape_generated_model_280673_1_combined + X_bioscrape_generated_model_972412; KTR_bioscrape_generated_model_972412*mRNA_T_bioscrape_generated_model_280673_1_combined^n_combined/(KR_bioscrape_generated_model_972412 + mRNA_T_bioscrape_generated_model_280673_1_combined^DummyVar_PositiveHillPropensity_n_0_bioscrape_generated_model_972412);
  r1_bioscrape_generated_model_972412: X_bioscrape_generated_model_972412 => ; X_bioscrape_generated_model_972412*delta_combined;

  // Unit definitions:
  unit square_metre = metre^2;
end
