// SBML level 3 version 2

model biocrnpyler_824706()
  // model units - substance: mole, time: second, volume: litre, area: square_metre, length: metre, extent: mole

  // Compartments:
  compartment default = 1e-6;

  // Species:
  species enzyme_atp_synthase in default = 0;
  species metabolite_atp in default = 0;
  species metabolite_adp in default = 0;
  species metabolite_pi in default = 0;
  species complex_enzyme_atp_synthase_metabolite_atp in default = 0;
  species complex_enzyme_atp_synthase_metabolite_adp_metabolite_pi in default = 0;

  // Reactions:
  r0: enzyme_atp_synthase + metabolite_atp => complex_enzyme_atp_synthase_metabolite_atp; r0_k*enzyme_atp_synthase*metabolite_atp;
    r0_k = 20;
  r0_1: complex_enzyme_atp_synthase_metabolite_atp => enzyme_atp_synthase + metabolite_atp; r0_1_k*complex_enzyme_atp_synthase_metabolite_atp;
    r0_1_k = 2;
  r2: complex_enzyme_atp_synthase_metabolite_atp => complex_enzyme_atp_synthase_metabolite_adp_metabolite_pi; r2_k*complex_enzyme_atp_synthase_metabolite_atp;
    r2_k = 10;
  r3: complex_enzyme_atp_synthase_metabolite_adp_metabolite_pi => enzyme_atp_synthase + metabolite_adp + metabolite_pi; r3_k*complex_enzyme_atp_synthase_metabolite_adp_metabolite_pi;
    r3_k = 20;
  r3_1: enzyme_atp_synthase + metabolite_adp + metabolite_pi => complex_enzyme_atp_synthase_metabolite_adp_metabolite_pi; r3_1_k*enzyme_atp_synthase*metabolite_adp*metabolite_pi;
    r3_1_k = 2;

  // Unit definitions:
  unit square_metre = metre^2;
end
