// SBML level 3 version 1

model main()
  // model units - substance: mole, time: second, volume: litre, area: square_metre, length: metre, extent: mole

  // Compartments:
  compartment default = 1e-6;

  // Species:
  species atp in default = 200;
  species glucose in default = 100;
  species e1 in default = 200;
  species x_2atp_glucose_e1 in default = 0; x_2atp_glucose_e1 is "2atp:glucose:e1";
  species x_2adp2pi_f16p_e1 in default = 0; x_2adp2pi_f16p_e1 is "2adp2pi:f16p:e1";
  species adp in default = 0;
  species pi in default = 0;
  species f16p in default = 0;
  species e2 in default = 200;
  species x_2adp2pi_f16p_e2 in default = 0; x_2adp2pi_f16p_e2 is "2adp2pi:f16p:e2";
  species x_2atp_isobutanol_e2 in default = 0; x_2atp_isobutanol_e2 is "2atp:isobutanol:e2";
  species x_2adp2pi_f16p_e3 in default = 0; x_2adp2pi_f16p_e3 is "2adp2pi:f16p:e3";
  species e3 in default = 0;
  species x_2atp_glucose_e3 in default = 0; x_2atp_glucose_e3 is "2atp:glucose:e3";
  species e4 in default = 200;
  species x_2atp2piadp_f16p_e4 in default = 0; x_2atp2piadp_f16p_e4 is "2atp2piadp:f16p:e4";
  species x_3atp_isobutanol_e4 in default = 0; x_3atp_isobutanol_e4 is "3atp:isobutanol:e4";
  species isobutanol in default = 0;

  // Parameters:
  kf = 10;
  kr = 0.01;
  K_hill = 10;
  n = 1;
  kf_1 = 100;
  delta = 0.1;

  // Reactions:
  r0: e1 + glucose + atp => x_2atp_glucose_e1; kf*e1*glucose*atp^2;
  r1: 2 x_2atp_glucose_e1 => e1 + glucose + atp; kr*x_2atp_glucose_e1;
  r2: x_2atp_glucose_e1 => x_2adp2pi_f16p_e1; kf*x_2atp_glucose_e1;
  r3: x_2adp2pi_f16p_e1 => e1 + pi + adp + f16p; kf*x_2adp2pi_f16p_e1;
  r4: e1 + 2 pi + 2 adp + f16p => x_2adp2pi_f16p_e1; kr*e1*pi^2*adp^2*f16p;
  r5: 2 pi + e2 + 2 adp + f16p => x_2adp2pi_f16p_e2; kf*pi^2*e2*adp^2*f16p;
  r6: x_2adp2pi_f16p_e2 => pi + e2 + adp + f16p; kr*x_2adp2pi_f16p_e2;
  r7: x_2adp2pi_f16p_e2 => e2 + atp + isobutanol; kf*x_2adp2pi_f16p_e2;
  r8: x_2atp_isobutanol_e2 => e2 + atp + isobutanol; kf*x_2atp_isobutanol_e2^n/(x_2atp_isobutanol_e2^n + K_hill);
  r9: e2 + 2 atp + isobutanol => x_2atp_isobutanol_e2; kr*f16p^n/(f16p^n + K_hill);
  r10: f16p + 2 pi + adp + e4 + atp => x_2atp2piadp_f16p_e4; kf*f16p*pi^2*adp*e4*atp^2;
  r11: 2 x_2atp2piadp_f16p_e4 => f16p + pi + adp + e4 + atp; kr*x_2atp2piadp_f16p_e4;
  r12: x_2atp2piadp_f16p_e4 => x_3atp_isobutanol_e4; kf*x_2atp2piadp_f16p_e4;
  r13: x_3atp_isobutanol_e4 => e4 + atp + isobutanol; kf_1*x_3atp_isobutanol_e4;
  r14: e4 + 3 atp + isobutanol => x_3atp_isobutanol_e4; kr*e4*atp^3*isobutanol;

  // Unit definitions:
  unit square_metre = metre^2;
end
