// SBML level 3 version 1

model main()
  // model units - substance: mole, time: second, volume: litre, area: square_metre, length: metre, extent: mole

  // Compartments:
  compartment default = 1e-6;

  // Species:
  species glucose in default = 100;
  species e1 in default = 200;
  species atp in default = 200;
  species glucose_e1 in default = 0; glucose_e1 is "glucose:e1";
  species x_2atp_glucose_e1 in default = 0; x_2atp_glucose_e1 is "2atp:glucose:e1";
  species x_2adp2pi_f16p_e1 in default = 0; x_2adp2pi_f16p_e1 is "2adp2pi:f16p:e1";
  species adp in default = 0;
  species pi in default = 0;
  species f16p_e1 in default = 0; f16p_e1 is "f16p:e1";
  species f16p in default = 0;
  species e2 in default = 200;
  species f16p_e2 in default = 0; f16p_e2 is "f16p:e2";
  species x_2adp2pi_f16p_e2 in default = 0; x_2adp2pi_f16p_e2 is "2adp2pi:f16p:e2";
  species x_2atp_isobutanol_e2 in default = 0; x_2atp_isobutanol_e2 is "2atp:isobutanol:e2";
  species isobutanol_e2 in default = 0; isobutanol_e2 is "isobutanol:e2";
  species e3 in default = 200;
  species f16p_e3 in default = 0; f16p_e3 is "f16p:e3";
  species x_2atp2piadp_f16p_e3 in default = 0; x_2atp2piadp_f16p_e3 is "2atp2piadp:f16p:e3";
  species x_3atp_isobutanol_e2 in default = 0; x_3atp_isobutanol_e2 is "3atp:isobutanol:e2";
  species isobutanol_e3 in default = 0; isobutanol_e3 is "isobutanol:e3";
  species isobutanol in default = 0;
  species x_2adpi2pi_f16p_e2 in default = 0; x_2adpi2pi_f16p_e2 is "2adpi2pi:f16p:e2";
  species x_3atp_isobutanol_e3 in default = 0; x_3atp_isobutanol_e3 is "3atp:isobutanol:e3";

  // Parameters:
  k_f = 10;
  k_r = 0.001;
  delta = 0.1;

  // Reactions:
  r0: glucose + e1 => glucose_e1; k_f*glucose*e1;
  r1: glucose_e1 => glucose + e1; k_r*glucose_e1;
  r2: 2 atp + glucose_e1 => x_2atp_glucose_e1; k_f*atp^2*glucose_e1;
  r3: x_2atp_glucose_e1 => atp + glucose_e1; k_r*x_2atp_glucose_e1;
  r4: x_2atp_glucose_e1 => x_2adp2pi_f16p_e1; k_f*x_2atp_glucose_e1;
  r5: x_2adp2pi_f16p_e1 => pi + adp + f16p_e1; k_f*x_2adp2pi_f16p_e1;
  r6: 2 pi + 2 adp + f16p_e1 => x_2adp2pi_f16p_e1; k_r*pi^2*adp^2*f16p_e1;
  r7: f16p_e1 => f16p + e2; k_f*f16p_e1;
  r8: f16p + e2 => f16p_e2; k_f*f16p*e2;
  r9: f16p_e2 => f16p + e2; k_r*f16p_e2;
  r10: f16p_e2 + 2 pi + adp => x_2adpi2pi_f16p_e2; k_f*f16p_e2*pi^2*adp^2;
  r11: 2 x_2adpi2pi_f16p_e2 => f16p_e2 + pi + adp; k_r*x_2adpi2pi_f16p_e2;
  r12: x_2adp2pi_f16p_e2 => x_2atp_isobutanol_e2; k_f*x_2adp2pi_f16p_e2;
  r13: x_2atp_isobutanol_e2 => atp + isobutanol_e2; k_f*x_2atp_isobutanol_e2;
  r14: 2 atp + isobutanol_e2 => x_2atp_isobutanol_e2; k_r*atp^2*isobutanol_e2;
  r15: isobutanol_e2 => e2 + isobutanol; k_f*isobutanol_e2;
  r16: e2 + isobutanol => isobutanol_e2; k_r*e2*isobutanol;
  r17: f16p + e3 => f16p_e3; k_f*f16p*e3;
  r18: f16p_e3 => f16p + e3; k_r*f16p_e3;
  r19: 2 pi + 2 atp + adp + f16p_e3 => x_2atp2piadp_f16p_e3; k_f*pi^2*atp^2*adp*f16p_e3;
  r20: x_2atp2piadp_f16p_e3 => pi + atp + adp + f16p_e3; k_r*x_2atp2piadp_f16p_e3;
  r21: x_2atp2piadp_f16p_e3 => x_3atp_isobutanol_e3; k_f*x_2atp2piadp_f16p_e3;
  r22: 3 x_3atp_isobutanol_e3 => isobutanol_e3 + atp; k_f*x_3atp_isobutanol_e3;
  r23: isobutanol_e3 + atp => x_3atp_isobutanol_e3; k_r*isobutanol_e3*atp^3;
  r24: isobutanol_e3 => e3 + isobutanol; k_f*isobutanol_e3;
  r25: e3 + isobutanol => isobutanol_e3; k_r*e3*isobutanol;

  // Unit definitions:
  unit square_metre = metre^2;
end
