// SBML level 3 version 2

model main()
  // model units - substance: mole, time: second, volume: litre, area: square_metre, length: metre, extent: mole

  // Compartments:
  compartment default = 1e-6;

  // Species:
  species S in default = 0;
  species F0 in default = 0;
  species complex_F0_2x_S in default = 0;
  species G0 in default = 0;
  species complex_G0_F0_2x_S in default = 0;
  species P in default = 0;
  species complex_P_G0_F0_2x_S in default = 0;
  species T in default = 0;
  species R in default = 0;
  species complex_R_T in default = 0;
  species X in default = 0;

  // Reactions:
  r0: 2 S + F0 => complex_F0_2x_S; r0_k*S^2*F0;
    r0_k = 100;
  r0_1: complex_F0_2x_S => 2 S + F0; r0_1_k*complex_F0_2x_S;
    r0_1_k = 10;
  r2: complex_F0_2x_S + G0 => complex_G0_F0_2x_S; r2_k*complex_F0_2x_S*G0;
    r2_k = 100;
  r2_1: complex_G0_F0_2x_S => complex_F0_2x_S + G0; r2_1_k*complex_G0_F0_2x_S;
    r2_1_k = 10;
  r4: complex_G0_F0_2x_S + P => complex_P_G0_F0_2x_S; r4_k*complex_G0_F0_2x_S*P;
    r4_k = 100;
  r4_1: complex_P_G0_F0_2x_S => complex_G0_F0_2x_S + P; r4_1_k*complex_P_G0_F0_2x_S;
    r4_1_k = 10;
  r6: T + R => complex_R_T; r6_k*T*R;
    r6_k = 100;
  r6_1: complex_R_T => T + R; r6_1_k*complex_R_T;
    r6_1_k = 10;
  r8: complex_P_G0_F0_2x_S => complex_G0_F0_2x_S + P + T; r8_k*complex_P_G0_F0_2x_S;
    r8_k = 0.9;
  r9: complex_R_T => T + R + X; r9_k*complex_R_T;
    r9_k = 0.9;
  r10: T => ; r10_k*T;
    r10_k = 0.1;
  r11: => R; r11_k;
    r11_k = 10;
  r12: => P; r12_k;
    r12_k = 2;
  r13: => F0; r13_k;
    r13_k = 1.5;

  // Unit definitions:
  unit square_metre = metre^2;
end
