// SBML level 3 version 2

model main()
  // model units - substance: mole, time: second, volume: litre, area: square_metre, length: metre, extent: mole

  // Compartments:
  compartment default = 1e-6;

  // Species:
  species tetR in default = 0;
  species rna_lacI_tetR in default = 0;
  species lacI in default = 0;
  species dna_lacI_tetR in default = 0;
  species rna_tetR_lacI in default = 0;
  species dna_tetR_lacI in default = 0;

  // Reactions:
  r0: dna_lacI_tetR => dna_lacI_tetR + rna_lacI_tetR; r0_k*dna_lacI_tetR/(lacI^r0_n + r0_K);
    r0_k = 0.01875; r0_n = 2; r0_K = 20;
  r1: dna_lacI_tetR => dna_lacI_tetR + rna_lacI_tetR; r1_k*dna_lacI_tetR;
    r1_k = 1e-5;
  r2: rna_lacI_tetR => rna_lacI_tetR + tetR; r2_k*rna_lacI_tetR;
    r2_k = 0.5;
  r3: dna_tetR_lacI => dna_tetR_lacI + rna_tetR_lacI; r3_k*dna_tetR_lacI/(tetR^r3_n + r3_K);
    r3_k = 0.01875; r3_n = 2; r3_K = 20;
  r4: dna_tetR_lacI => dna_tetR_lacI + rna_tetR_lacI; r4_k*dna_tetR_lacI;
    r4_k = 1e-5;
  r5: rna_tetR_lacI => rna_tetR_lacI + lacI; r5_k*rna_tetR_lacI;
    r5_k = 0.5;
  r6: tetR => ; r6_k*tetR;
    r6_k = 0.001;
  r7: rna_lacI_tetR => ; r7_k*rna_lacI_tetR;
    r7_k = 0.001;
  r8: lacI => ; r8_k*lacI;
    r8_k = 0.001;
  r9: rna_tetR_lacI => ; r9_k*rna_tetR_lacI;
    r9_k = 0.001;
  r10: tetR => ; r10_k*tetR;
    r10_k = 0.001;
  r11: lacI => ; r11_k*lacI;
    r11_k = 0.001;
  r12: rna_lacI_tetR => ; r12_k*rna_lacI_tetR;
    r12_k = 0.001;
  r13: rna_tetR_lacI => ; r13_k*rna_tetR_lacI;
    r13_k = 0.001;

  // Unit definitions:
  unit square_metre = metre^2;
end
