// SBML level 3 version 2

model combined_model_of__biocrnpyler_821798_biocrnpyler_610739()
  // model units - substance: mole, time: second, volume: litre, area: square_metre, length: metre, extent: mole

  // Compartments:
  compartment default_biocrnpyler_821798_combined = 2e-6;

  // Species:
  species G_biocrnpyler_821798 in default_biocrnpyler_821798_combined = 0;
  species S_biocrnpyler_821798 in default_biocrnpyler_821798_combined = 0;
  species T_biocrnpyler_821798_1_combined in default_biocrnpyler_821798_combined = 0;
  species X_biocrnpyler_610739 in default_biocrnpyler_821798_combined = 0;

  // Reactions:
  r0_biocrnpyler_821798: G_biocrnpyler_821798 => G_biocrnpyler_821798 + T_biocrnpyler_821798_1_combined; r0_biocrnpyler_821798_k*G_biocrnpyler_821798*(S_biocrnpyler_821798/r0_biocrnpyler_821798_K)^r0_biocrnpyler_821798_n/(1 + (S_biocrnpyler_821798/r0_biocrnpyler_821798_K)^r0_biocrnpyler_821798_n);  // modifiers: S_biocrnpyler_821798
    r0_biocrnpyler_821798_k = 2; r0_biocrnpyler_821798_K = 10; r0_biocrnpyler_821798_n = 2;
  r1_biocrnpyler_821798: T_biocrnpyler_821798_1_combined => ; r1_biocrnpyler_821798_k_forward*T_biocrnpyler_821798_1_combined;
    r1_biocrnpyler_821798_k_forward = 0.1;
  r0_biocrnpyler_610739: T_biocrnpyler_821798_1_combined => T_biocrnpyler_821798_1_combined + X_biocrnpyler_610739; r0_biocrnpyler_610739_k*(T_biocrnpyler_821798_1_combined/r0_biocrnpyler_610739_K)^r0_biocrnpyler_610739_n/(1 + (T_biocrnpyler_821798_1_combined/r0_biocrnpyler_610739_K)^r0_biocrnpyler_610739_n);
    r0_biocrnpyler_610739_k = 5; r0_biocrnpyler_610739_K = 20; r0_biocrnpyler_610739_n = 1;
  r1_biocrnpyler_610739: X_biocrnpyler_610739 => ; r1_biocrnpyler_610739_k_forward*X_biocrnpyler_610739;
    r1_biocrnpyler_610739_k_forward = 0.1;

  // Unit definitions:
  unit square_metre = metre^2;
end
