// SBML level 3 version 2

model biocrnpyler_850275()
  // model units - substance: mole, time: second, volume: litre, area: square_metre, length: metre, extent: mole

  // Compartments:
  compartment default = 1e-6;

  // Species:
  species protein_E1 in default = 0;
  species A in default = 0;
  species B in default = 0;
  species protein_E2 in default = 0;
  species C in default = 0;
  species D in default = 0;
  species protein_E3 in default = 0;
  species F in default = 0;

  // Parameters:
  kcat__ = 1;

  // Reactions:
  r0: protein_E1 + A => protein_E1 + B; kcat__*protein_E1*A;
  r1: protein_E2 + C => protein_E2 + D; kcat__*protein_E2*C;
  r2: protein_E3 + B + D => protein_E3 + F; kcat__*protein_E3*B*D;

  // Unit definitions:
  unit square_metre = metre^2;
end
