// SBML level 3 version 2

model main()
  // model units - substance: mole, time: second, volume: litre, area: square_metre, length: metre, extent: mole

  // Compartments:
  compartment default = 1e-6;

  // Species:
  species enzyme_enzyme1 in default = 0;
  species metabolite_atp in default = 0;
  species molecule_glucose in default = 0;
  species molecule_f16p in default = 0;
  species metabolite_adp in default = 0;
  species complex_enzyme_enzyme1_2x_metabolite_atp_molecule_glucose in default = 0;
  species complex_enzyme_enzyme1_2x_metabolite_adp_molecule_f16p in default = 0;

  // Reactions:
  r0: enzyme_enzyme1 + 2 metabolite_atp + molecule_glucose => complex_enzyme_enzyme1_2x_metabolite_atp_molecule_glucose; r0_k*enzyme_enzyme1*metabolite_atp^2*molecule_glucose;
    r0_k = 22.68;
  r0_1: complex_enzyme_enzyme1_2x_metabolite_atp_molecule_glucose => enzyme_enzyme1 + 2 metabolite_atp + molecule_glucose; r0_1_k*complex_enzyme_enzyme1_2x_metabolite_atp_molecule_glucose;
    r0_1_k = 2.268;
  r2: complex_enzyme_enzyme1_2x_metabolite_atp_molecule_glucose => complex_enzyme_enzyme1_2x_metabolite_adp_molecule_f16p; r2_k*complex_enzyme_enzyme1_2x_metabolite_atp_molecule_glucose;
    r2_k = 10;
  r3: complex_enzyme_enzyme1_2x_metabolite_adp_molecule_f16p => enzyme_enzyme1 + molecule_f16p + 2 metabolite_adp; r3_k*complex_enzyme_enzyme1_2x_metabolite_adp_molecule_f16p;
    r3_k = 24;
  r3_1: enzyme_enzyme1 + molecule_f16p + 2 metabolite_adp => complex_enzyme_enzyme1_2x_metabolite_adp_molecule_f16p; r3_1_k*enzyme_enzyme1*molecule_f16p*metabolite_adp^2;
    r3_1_k = 2.4;

  // Unit definitions:
  unit square_metre = metre^2;
end
