// SBML level 3 version 2

model biocrnpyler_232763()
  // model units - substance: mole, time: second, volume: litre, area: square_metre, length: metre, extent: mole

  // Compartments:
  compartment default = 1e-6;

  // Species:
  species protein_RNAase in default = 0;
  species complex_dna_GFP_protein_RNAP in default = 0;
  species protein_Ribo in default = 0;
  species protein_GFP in default = 0;
  species dna_GFP in default = 0;
  species rna_GFP in default = 0;
  species complex_protein_RNAase_rna_GFP in default = 0;
  species protein_RNAP in default = 0;
  species complex_protein_Ribo_rna_GFP in default = 0;

  // Reactions:
  r0: dna_GFP + protein_RNAP => complex_dna_GFP_protein_RNAP; r0_k*dna_GFP*protein_RNAP;
    r0_k = 100;
  r0_1: complex_dna_GFP_protein_RNAP => dna_GFP + protein_RNAP; r0_1_k*complex_dna_GFP_protein_RNAP;
    r0_1_k = 10;
  r2: complex_dna_GFP_protein_RNAP => dna_GFP + rna_GFP + protein_RNAP; r2_k*complex_dna_GFP_protein_RNAP;
    r2_k = 0.05;
  r3: rna_GFP + protein_Ribo => complex_protein_Ribo_rna_GFP; r3_k*rna_GFP*protein_Ribo;
    r3_k = 100;
  r3_1: complex_protein_Ribo_rna_GFP => rna_GFP + protein_Ribo; r3_1_k*complex_protein_Ribo_rna_GFP;
    r3_1_k = 10;
  r5: complex_protein_Ribo_rna_GFP => rna_GFP + protein_GFP + protein_Ribo; r5_k*complex_protein_Ribo_rna_GFP;
    r5_k = 0.05;
  r6: rna_GFP + protein_RNAase => complex_protein_RNAase_rna_GFP; r6_k*rna_GFP*protein_RNAase;
    r6_k = 100;
  r6_1: complex_protein_RNAase_rna_GFP => rna_GFP + protein_RNAase; r6_1_k*complex_protein_RNAase_rna_GFP;
    r6_1_k = 10;
  r8: complex_protein_RNAase_rna_GFP => protein_RNAase; r8_k*complex_protein_RNAase_rna_GFP;
    r8_k = 0.000555556;

  // Unit definitions:
  unit square_metre = metre^2;
end
