// SBML level 3 version 1

model main()
  // model units - substance: mole, time: second, volume: litre, area: square_metre, length: metre, extent: mole

  // Compartments:
  compartment default = 1e-6;

  // Species:
  species protein_LacI in default = 0;
  species dna_lacI_rfp in default = 0;
  species protein_RFP in default = 0;
  species rna_lacI_rfp in default = 0;
  species dna_pConst in default = 0;
  species rna_pConst in default = 0;

  // Reactions:
  r0: dna_lacI_rfp => dna_lacI_rfp + rna_lacI_rfp; r0_k*dna_lacI_rfp/(protein_LacI^n + K);
    r0_k = 0.01875; n = 2; K = 10;
  r1: dna_lacI_rfp => dna_lacI_rfp + rna_lacI_rfp; r1_k*dna_lacI_rfp;
    r1_k = 1e-6;
  r2: rna_lacI_rfp => rna_lacI_rfp + protein_RFP; r2_k*rna_lacI_rfp;
    r2_k = 0.15;
  r3: dna_pConst => dna_pConst + rna_pConst; r3_k*dna_pConst;
    r3_k = 0.1875;
  r4: rna_pConst => rna_pConst + protein_LacI; r4_k*rna_pConst;
    r4_k = 0.15;
  r5: protein_LacI => ; r5_k*protein_LacI;
    r5_k = 0.001;
  r6: protein_RFP => ; r6_k*protein_RFP;
    r6_k = 0.001;
  r7: rna_lacI_rfp => ; r7_k*rna_lacI_rfp;
    r7_k = 0.001;
  r8: rna_pConst => ; r8_k*rna_pConst;
    r8_k = 0.001;
  r9: rna_lacI_rfp => ; r9_k*rna_lacI_rfp;
    r9_k = 0.002;
  r10: rna_pConst => ; r10_k*rna_pConst;
    r10_k = 0.002;

  // Unit definitions:
  unit square_metre = metre^2;
end
