// SBML level 3 version 2

model combined_model_of__combined_model_of__reservoir_model_combined_model_of__IPTG_membrane_combined_model_of__combined_model_of__bioscrape_generated_model_775989_bioscrape_generated_model_267584()
  // model units - substance: mole, time: second, volume: litre, area: square_metre, length: metre, extent: mole

  // Compartments:
  compartment cell_3_external_combined = 2e-6 litre;
  compartment cell_3_internal_combined = 1e-6 litre;

  // Species:
  species IPTG_reservoir_model_1_combined in cell_3_external_combined = 10000/cell_3_external_combined;
  species transport_protein in cell_3_internal_combined = 1;
  species IPTG_transport_protein in cell_3_internal_combined = 0;
  species G_bioscrape_generated_model_775989_combined_model_of__bioscrape_generated_model_775989_bioscrape_generated_model_267584 in cell_3_internal_combined = 1;
  species IPTG_1_1_combined in cell_3_internal_combined = 0;
  species mRNA_T_bioscrape_generated_model_775989_1_combined_combined_model_of__bioscrape_generated_model_775989_bioscrape_generated_model_267584 in cell_3_internal_combined = 0;
  species X_bioscrape_generated_model_267584_combined_model_of__bioscrape_generated_model_775989_bioscrape_generated_model_267584 in cell_3_internal_combined = 0;

  // Parameters:
  kb = 0.01 per_second;
  kd = 0.2 per_second;
  KI_bioscrape_generated_model_775989_combined_model_of__bioscrape_generated_model_775989_bioscrape_generated_model_267584 = 10;
  KX_bioscrape_generated_model_775989_combined_model_of__bioscrape_generated_model_775989_bioscrape_generated_model_267584 = 2;
  DummyVar_PositiveHillPropensity_n_0_bioscrape_generated_model_267584_combined_model_of__bioscrape_generated_model_775989_bioscrape_generated_model_267584 = 1;
  KR_bioscrape_generated_model_267584_combined_model_of__bioscrape_generated_model_775989_bioscrape_generated_model_267584 = 20;
  KTR_bioscrape_generated_model_267584_combined_model_of__bioscrape_generated_model_775989_bioscrape_generated_model_267584 = 5;
  delta_combined_combined_model_of__bioscrape_generated_model_775989_bioscrape_generated_model_267584 = 0.1;
  n_combined_combined_model_of__bioscrape_generated_model_775989_bioscrape_generated_model_267584 = 2;

  // Reactions:
  r1: IPTG_reservoir_model_1_combined + transport_protein -> IPTG_transport_protein; kb*IPTG_reservoir_model_1_combined*transport_protein - kd*IPTG_transport_protein;
  r2: IPTG_transport_protein -> IPTG_1_1_combined + transport_protein; kd*IPTG_transport_protein - kb*IPTG_1_1_combined*transport_protein;
  r0_bioscrape_generated_model_775989_combined_model_of__bioscrape_generated_model_775989_bioscrape_generated_model_267584: G_bioscrape_generated_model_775989_combined_model_of__bioscrape_generated_model_775989_bioscrape_generated_model_267584 => mRNA_T_bioscrape_generated_model_775989_1_combined_combined_model_of__bioscrape_generated_model_775989_bioscrape_generated_model_267584 + G_bioscrape_generated_model_775989_combined_model_of__bioscrape_generated_model_775989_bioscrape_generated_model_267584; G_bioscrape_generated_model_775989_combined_model_of__bioscrape_generated_model_775989_bioscrape_generated_model_267584*KX_bioscrape_generated_model_775989_combined_model_of__bioscrape_generated_model_775989_bioscrape_generated_model_267584*IPTG_1_1_combined^n_combined_combined_model_of__bioscrape_generated_model_775989_bioscrape_generated_model_267584/(KI_bioscrape_generated_model_775989_combined_model_of__bioscrape_generated_model_775989_bioscrape_generated_model_267584 + IPTG_1_1_combined^n_combined_combined_model_of__bioscrape_generated_model_775989_bioscrape_generated_model_267584);  // modifiers: IPTG_1_1_combined
  r1_bioscrape_generated_model_775989_combined_model_of__bioscrape_generated_model_775989_bioscrape_generated_model_267584: mRNA_T_bioscrape_generated_model_775989_1_combined_combined_model_of__bioscrape_generated_model_775989_bioscrape_generated_model_267584 => ; delta_combined_combined_model_of__bioscrape_generated_model_775989_bioscrape_generated_model_267584*mRNA_T_bioscrape_generated_model_775989_1_combined_combined_model_of__bioscrape_generated_model_775989_bioscrape_generated_model_267584;
  r0_bioscrape_generated_model_267584_combined_model_of__bioscrape_generated_model_775989_bioscrape_generated_model_267584: mRNA_T_bioscrape_generated_model_775989_1_combined_combined_model_of__bioscrape_generated_model_775989_bioscrape_generated_model_267584 => mRNA_T_bioscrape_generated_model_775989_1_combined_combined_model_of__bioscrape_generated_model_775989_bioscrape_generated_model_267584 + X_bioscrape_generated_model_267584_combined_model_of__bioscrape_generated_model_775989_bioscrape_generated_model_267584; KTR_bioscrape_generated_model_267584_combined_model_of__bioscrape_generated_model_775989_bioscrape_generated_model_267584*mRNA_T_bioscrape_generated_model_775989_1_combined_combined_model_of__bioscrape_generated_model_775989_bioscrape_generated_model_267584^n_combined_combined_model_of__bioscrape_generated_model_775989_bioscrape_generated_model_267584/(KR_bioscrape_generated_model_267584_combined_model_of__bioscrape_generated_model_775989_bioscrape_generated_model_267584 + mRNA_T_bioscrape_generated_model_775989_1_combined_combined_model_of__bioscrape_generated_model_775989_bioscrape_generated_model_267584^DummyVar_PositiveHillPropensity_n_0_bioscrape_generated_model_267584_combined_model_of__bioscrape_generated_model_775989_bioscrape_generated_model_267584);
  r1_bioscrape_generated_model_267584_combined_model_of__bioscrape_generated_model_775989_bioscrape_generated_model_267584: X_bioscrape_generated_model_267584_combined_model_of__bioscrape_generated_model_775989_bioscrape_generated_model_267584 => ; X_bioscrape_generated_model_267584_combined_model_of__bioscrape_generated_model_775989_bioscrape_generated_model_267584*delta_combined_combined_model_of__bioscrape_generated_model_775989_bioscrape_generated_model_267584;

  // Unit definitions:
  unit square_metre = metre^2;
  unit per_second = 1 / second;
  unit substance = dimensionless;
end
