// SBML level 3 version 2

model biocrnpyler_737222()
  // model units - substance: mole, time: second, volume: litre, area: square_metre, length: metre, extent: mole

  // Compartments:
  compartment default = 1e-6;

  // Species:
  species rna_atpsyn in default = 0;
  species dna_atpsyn in default = 0;
  species protein_atpsyn in default = 0;
  species protein_RNAP_machinery in default = 0;
  species protein_Ribo_machinery in default = 0;
  species protein_RNAse_machinery in default = 0;
  species complex_dna_atpsyn_protein_RNAP_machinery_ in default = 0;
  species complex_protein_Ribo_machinery_rna_atpsyn_ in default = 0;
  species complex_protein_RNAse_machinery_rna_atpsyn_ in default = 0;

  // Reactions:
  r0: dna_atpsyn + protein_RNAP_machinery => complex_dna_atpsyn_protein_RNAP_machinery_; r0_k_forward*dna_atpsyn*protein_RNAP_machinery;
    r0_k_forward = 50;
  r1: complex_dna_atpsyn_protein_RNAP_machinery_ => rna_atpsyn + protein_RNAP_machinery; r1_k_forward*complex_dna_atpsyn_protein_RNAP_machinery_;
    r1_k_forward = 0.05;
  r2: rna_atpsyn + protein_Ribo_machinery => complex_protein_Ribo_machinery_rna_atpsyn_; r2_k_forward*rna_atpsyn*protein_Ribo_machinery;
    r2_k_forward = 50;
  r3: complex_protein_Ribo_machinery_rna_atpsyn_ => rna_atpsyn + protein_atpsyn + protein_Ribo_machinery; r3_k_forward*complex_protein_Ribo_machinery_rna_atpsyn_;
    r3_k_forward = 0.05;
  r4: rna_atpsyn + protein_RNAse_machinery => complex_protein_RNAse_machinery_rna_atpsyn_; r4_k_forward*rna_atpsyn*protein_RNAse_machinery;
    r4_k_forward = 50;
  r5: complex_protein_RNAse_machinery_rna_atpsyn_ => protein_RNAse_machinery; r5_k_forward*complex_protein_RNAse_machinery_rna_atpsyn_;
    r5_k_forward = 0.001;

  // Unit definitions:
  unit square_metre = metre^2;
end
