// SBML level 3 version 2

model combined_model_of__combined_model_of__combined_model_of__external_reservoir_model_combined_model_of__atc_membrane_combined_model_of__combined_model_of__biocrnpyler_702329_biocrnpyler_334638_combined_model_of__combined_model_of__external_reservoir_model_combined_model_of__atc_membrane_combined_model_of__combined_model_of__biocrnpyler_468481_biocrnpyler_334638()
  // model units - substance: mole, time: second, volume: litre, area: square_metre, length: metre, extent: mole

  // Compartments:
  compartment cellfusedexternal_combined = 4e-6 litre;
  compartment cellfusedinternal_combined = 1e-6 litre;

  // Species:
  species dna_f_exsAbiocrnpyler_702329_combined_model_of__biocrnpyler_702329_biocrnpyler_334638 in cellfusedinternal_combined = 1/cellfusedinternal_combined;
  species tetR_exsAbiocrnpyler_702329_combined_model_of__biocrnpyler_702329_biocrnpyler_334638 in cellfusedinternal_combined = 10/cellfusedinternal_combined;
  species rna_f_exsAbiocrnpyler_702329_combined_model_of__biocrnpyler_702329_biocrnpyler_334638 in cellfusedinternal_combined = 0;
  species atc_i_1_combined in cellfusedinternal_combined = 0;
  species complex_atc_i_tetR_exsAbiocrnpyler_702329_combined_model_of__biocrnpyler_702329_biocrnpyler_334638 in cellfusedinternal_combined = 0;
  species complex_dna_f_tetR_exsAbiocrnpyler_702329_combined_model_of__biocrnpyler_702329_biocrnpyler_334638 in cellfusedinternal_combined = 0;
  species complex_atc_i_dna_f_tetR_exsAbiocrnpyler_702329_combined_model_of__biocrnpyler_702329_biocrnpyler_334638 in cellfusedinternal_combined = 0;
  species atc_i in cellfusedinternal_combined = 0;
  species dna_h_gfpbiocrnpyler_468481_combined_model_of__biocrnpyler_468481_biocrnpyler_334638 in cellfusedinternal_combined = 1/cellfusedinternal_combined;
  species rna_h_gfpbiocrnpyler_468481_combined_model_of__biocrnpyler_468481_biocrnpyler_334638 in cellfusedinternal_combined = 0;
  species exsA_exsAbiocrnpyler_702329_combined_model_of__biocrnpyler_702329_biocrnpyler_334638_1_combined in cellfusedinternal_combined = 0;
  species complex_dna_h_exsA_gfpbiocrnpyler_468481_combined_model_of__biocrnpyler_468481_biocrnpyler_334638 in cellfusedinternal_combined = 0;
  species gfp_gfpbiocrnpyler_468481_combined_model_of__biocrnpyler_468481_biocrnpyler_334638 in cellfusedinternal_combined = 0;
  species enzyme_hex_ATP_rheostatbiocrnpyler_334638_combined_model_of__biocrnpyler_702329_biocrnpyler_334638_1_combined in cellfusedinternal_combined = 0.2/cellfusedinternal_combined;
  species ATP_exsAbiocrnpyler_702329_1_combined_combined_model_of__biocrnpyler_702329_biocrnpyler_334638_1_combined in cellfusedinternal_combined = 20/cellfusedinternal_combined;
  species molecule_glucose_ATP_rheostatbiocrnpyler_334638_combined_model_of__biocrnpyler_702329_biocrnpyler_334638_1_combined in cellfusedinternal_combined = 30/cellfusedinternal_combined;
  species molecule_g6p_ATP_rheostatbiocrnpyler_334638_combined_model_of__biocrnpyler_702329_biocrnpyler_334638_1_combined in cellfusedinternal_combined = 0;
  species ADP_exsAbiocrnpyler_702329_1_combined_combined_model_of__biocrnpyler_702329_biocrnpyler_334638_1_combined in cellfusedinternal_combined = 0;
  species complex_enzyme_hex_metabolite_atp_molecule_glucose_ATP_rheostatbiocrnpyler_334638_combined_model_of__biocrnpyler_702329_biocrnpyler_334638_1_combined in cellfusedinternal_combined = 0;
  species complex_enzyme_hex_metabolite_adp_molecule_g6p_ATP_rheostatbiocrnpyler_334638_combined_model_of__biocrnpyler_702329_biocrnpyler_334638_1_combined in cellfusedinternal_combined = 0;
  species enzyme_pgi_ATP_rheostatbiocrnpyler_334638_combined_model_of__biocrnpyler_702329_biocrnpyler_334638_1_combined in cellfusedinternal_combined = 0.2/cellfusedinternal_combined;
  species molecule_f6p_ATP_rheostatbiocrnpyler_334638_combined_model_of__biocrnpyler_702329_biocrnpyler_334638_1_combined in cellfusedinternal_combined = 0;
  species complex_enzyme_pgi_molecule_g6p_ATP_rheostatbiocrnpyler_334638_combined_model_of__biocrnpyler_702329_biocrnpyler_334638_1_combined in cellfusedinternal_combined = 0;
  species complex_enzyme_pgi_molecule_f6p_ATP_rheostatbiocrnpyler_334638_combined_model_of__biocrnpyler_702329_biocrnpyler_334638_1_combined in cellfusedinternal_combined = 0;
  species enzyme_pfk_ATP_rheostatbiocrnpyler_334638_combined_model_of__biocrnpyler_702329_biocrnpyler_334638_1_combined in cellfusedinternal_combined = 0.2/cellfusedinternal_combined;
  species molecule_f16p_ATP_rheostatbiocrnpyler_334638_combined_model_of__biocrnpyler_702329_biocrnpyler_334638_1_combined in cellfusedinternal_combined = 0;
  species complex_enzyme_pfk_metabolite_atp_molecule_f6p_ATP_rheostatbiocrnpyler_334638_combined_model_of__biocrnpyler_702329_biocrnpyler_334638_1_combined in cellfusedinternal_combined = 0;
  species complex_enzyme_pfk_metabolite_adp_molecule_f16p_ATP_rheostatbiocrnpyler_334638_combined_model_of__biocrnpyler_702329_biocrnpyler_334638_1_combined in cellfusedinternal_combined = 0;
  species enzyme_ald_tpi_ATP_rheostatbiocrnpyler_334638_combined_model_of__biocrnpyler_702329_biocrnpyler_334638_1_combined in cellfusedinternal_combined = 0.2/cellfusedinternal_combined;
  species molecule_g3p_ATP_rheostatbiocrnpyler_334638_combined_model_of__biocrnpyler_702329_biocrnpyler_334638_1_combined in cellfusedinternal_combined = 0;
  species complex_enzyme_ald_tpi_molecule_f16p_ATP_rheostatbiocrnpyler_334638_combined_model_of__biocrnpyler_702329_biocrnpyler_334638_1_combined in cellfusedinternal_combined = 0;
  species complex_enzyme_ald_tpi_2x_molecule_g3p_ATP_rheostatbiocrnpyler_334638_combined_model_of__biocrnpyler_702329_biocrnpyler_334638_1_combined in cellfusedinternal_combined = 0;
  species enzyme_gapN_ATP_rheostatbiocrnpyler_334638_combined_model_of__biocrnpyler_702329_biocrnpyler_334638_1_combined in cellfusedinternal_combined = 0.2/cellfusedinternal_combined;
  species metabolite_nadp_ATP_rheostatbiocrnpyler_334638_combined_model_of__biocrnpyler_702329_biocrnpyler_334638_1_combined in cellfusedinternal_combined = 30/cellfusedinternal_combined;
  species molecule_3pg_ATP_rheostatbiocrnpyler_334638_combined_model_of__biocrnpyler_702329_biocrnpyler_334638_1_combined in cellfusedinternal_combined = 0;
  species metabolite_nadph_ATP_rheostatbiocrnpyler_334638_combined_model_of__biocrnpyler_702329_biocrnpyler_334638_1_combined in cellfusedinternal_combined = 0;
  species complex_enzyme_gapN_2x_metabolite_nadp_2x_molecule_g3p_ATP_rheostatbiocrnpyler_334638_combined_model_of__biocrnpyler_702329_biocrnpyler_334638_1_combined in cellfusedinternal_combined = 0;
  species complex_enzyme_gapN_2x_metabolite_nadph_2x_molecule_3pg_ATP_rheostatbiocrnpyler_334638_combined_model_of__biocrnpyler_702329_biocrnpyler_334638_1_combined in cellfusedinternal_combined = 0;
  species enzyme_mGapDH_ATP_rheostatbiocrnpyler_334638_combined_model_of__biocrnpyler_702329_biocrnpyler_334638_1_combined in cellfusedinternal_combined = 0.2/cellfusedinternal_combined;
  species P_exsAbiocrnpyler_702329_1_combined_combined_model_of__biocrnpyler_702329_biocrnpyler_334638_1_combined in cellfusedinternal_combined = 30/cellfusedinternal_combined;
  species molecule_13bpg_ATP_rheostatbiocrnpyler_334638_combined_model_of__biocrnpyler_702329_biocrnpyler_334638_1_combined in cellfusedinternal_combined = 0;
  species complex_enzyme_mGapDH_2x_metabolite_nadp_metabolite_pi_2x_molecule_g3p_ATP_rheostatbiocrnpyler_334638_combined_model_of__biocrnpyler_702329_biocrnpyler_334638_1_combined in cellfusedinternal_combined = 0;
  species complex_enzyme_mGapDH_2x_metabolite_nadph_molecule_13bpg_ATP_rheostatbiocrnpyler_334638_combined_model_of__biocrnpyler_702329_biocrnpyler_334638_1_combined in cellfusedinternal_combined = 0;
  species enzyme_pgk_ATP_rheostatbiocrnpyler_334638_combined_model_of__biocrnpyler_702329_biocrnpyler_334638_1_combined in cellfusedinternal_combined = 0.2/cellfusedinternal_combined;
  species complex_enzyme_pgk_metabolite_adp_molecule_13bpg_ATP_rheostatbiocrnpyler_334638_combined_model_of__biocrnpyler_702329_biocrnpyler_334638_1_combined in cellfusedinternal_combined = 0;
  species complex_enzyme_pgk_metabolite_atp_2x_molecule_3pg_ATP_rheostatbiocrnpyler_334638_combined_model_of__biocrnpyler_702329_biocrnpyler_334638_1_combined in cellfusedinternal_combined = 0;
  species enzyme_pgm_ATP_rheostatbiocrnpyler_334638_combined_model_of__biocrnpyler_702329_biocrnpyler_334638_1_combined in cellfusedinternal_combined = 0.2/cellfusedinternal_combined;
  species molecule_2pg_ATP_rheostatbiocrnpyler_334638_combined_model_of__biocrnpyler_702329_biocrnpyler_334638_1_combined in cellfusedinternal_combined = 0;
  species complex_enzyme_pgm_2x_molecule_3pg_ATP_rheostatbiocrnpyler_334638_combined_model_of__biocrnpyler_702329_biocrnpyler_334638_1_combined in cellfusedinternal_combined = 0;
  species complex_enzyme_pgm_2x_molecule_2pg_ATP_rheostatbiocrnpyler_334638_combined_model_of__biocrnpyler_702329_biocrnpyler_334638_1_combined in cellfusedinternal_combined = 0;
  species enzyme_eno_ATP_rheostatbiocrnpyler_334638_combined_model_of__biocrnpyler_702329_biocrnpyler_334638_1_combined in cellfusedinternal_combined = 0.2/cellfusedinternal_combined;
  species molecule_pep_ATP_rheostatbiocrnpyler_334638_combined_model_of__biocrnpyler_702329_biocrnpyler_334638_1_combined in cellfusedinternal_combined = 0;
  species complex_enzyme_eno_2x_molecule_2pg_ATP_rheostatbiocrnpyler_334638_combined_model_of__biocrnpyler_702329_biocrnpyler_334638_1_combined in cellfusedinternal_combined = 0;
  species complex_enzyme_eno_2x_molecule_pep_ATP_rheostatbiocrnpyler_334638_combined_model_of__biocrnpyler_702329_biocrnpyler_334638_1_combined in cellfusedinternal_combined = 0;
  species enzyme_pyk_ATP_rheostatbiocrnpyler_334638_combined_model_of__biocrnpyler_702329_biocrnpyler_334638_1_combined in cellfusedinternal_combined = 0.2/cellfusedinternal_combined;
  species molecule_pyruvate_ATP_rheostatbiocrnpyler_334638_combined_model_of__biocrnpyler_702329_biocrnpyler_334638_1_combined in cellfusedinternal_combined = 0;
  species complex_enzyme_pyk_2x_metabolite_adp_2x_molecule_pep_ATP_rheostatbiocrnpyler_334638_combined_model_of__biocrnpyler_702329_biocrnpyler_334638_1_combined in cellfusedinternal_combined = 0;
  species complex_enzyme_pyk_2x_metabolite_atp_2x_molecule_pyruvate_ATP_rheostatbiocrnpyler_334638_combined_model_of__biocrnpyler_702329_biocrnpyler_334638_1_combined in cellfusedinternal_combined = 0;
  species enzyme_alsS_ATP_rheostatbiocrnpyler_334638_combined_model_of__biocrnpyler_702329_biocrnpyler_334638_1_combined in cellfusedinternal_combined = 0.2/cellfusedinternal_combined;
  species molecule_acetolac_ATP_rheostatbiocrnpyler_334638_combined_model_of__biocrnpyler_702329_biocrnpyler_334638_1_combined in cellfusedinternal_combined = 0;
  species complex_enzyme_alsS_2x_molecule_pyruvate_ATP_rheostatbiocrnpyler_334638_combined_model_of__biocrnpyler_702329_biocrnpyler_334638_1_combined in cellfusedinternal_combined = 0;
  species complex_enzyme_alsS_molecule_acetolac_ATP_rheostatbiocrnpyler_334638_combined_model_of__biocrnpyler_702329_biocrnpyler_334638_1_combined in cellfusedinternal_combined = 0;
  species enzyme_IlvC_ATP_rheostatbiocrnpyler_334638_combined_model_of__biocrnpyler_702329_biocrnpyler_334638_1_combined in cellfusedinternal_combined = 0.2/cellfusedinternal_combined;
  species molecule_23dih3mebut_ATP_rheostatbiocrnpyler_334638_combined_model_of__biocrnpyler_702329_biocrnpyler_334638_1_combined in cellfusedinternal_combined = 0;
  species complex_enzyme_IlvC_metabolite_nadph_molecule_acetolac_ATP_rheostatbiocrnpyler_334638_combined_model_of__biocrnpyler_702329_biocrnpyler_334638_1_combined in cellfusedinternal_combined = 0;
  species complex_enzyme_IlvC_metabolite_nadp_molecule_23dih3mebut_ATP_rheostatbiocrnpyler_334638_combined_model_of__biocrnpyler_702329_biocrnpyler_334638_1_combined in cellfusedinternal_combined = 0;
  species enzyme_IlvD_ATP_rheostatbiocrnpyler_334638_combined_model_of__biocrnpyler_702329_biocrnpyler_334638_1_combined in cellfusedinternal_combined = 0.2/cellfusedinternal_combined;
  species molecule_3me2oxo_ATP_rheostatbiocrnpyler_334638_combined_model_of__biocrnpyler_702329_biocrnpyler_334638_1_combined in cellfusedinternal_combined = 0;
  species complex_enzyme_IlvD_molecule_23dih3mebut_ATP_rheostatbiocrnpyler_334638_combined_model_of__biocrnpyler_702329_biocrnpyler_334638_1_combined in cellfusedinternal_combined = 0;
  species complex_enzyme_IlvD_molecule_3me2oxo_ATP_rheostatbiocrnpyler_334638_combined_model_of__biocrnpyler_702329_biocrnpyler_334638_1_combined in cellfusedinternal_combined = 0;
  species enzyme_kivD_ATP_rheostatbiocrnpyler_334638_combined_model_of__biocrnpyler_702329_biocrnpyler_334638_1_combined in cellfusedinternal_combined = 0.2/cellfusedinternal_combined;
  species molecule_isobutanal_ATP_rheostatbiocrnpyler_334638_combined_model_of__biocrnpyler_702329_biocrnpyler_334638_1_combined in cellfusedinternal_combined = 0;
  species complex_enzyme_kivD_molecule_3me2oxo_ATP_rheostatbiocrnpyler_334638_combined_model_of__biocrnpyler_702329_biocrnpyler_334638_1_combined in cellfusedinternal_combined = 0;
  species complex_enzyme_kivD_molecule_isobutanal_ATP_rheostatbiocrnpyler_334638_combined_model_of__biocrnpyler_702329_biocrnpyler_334638_1_combined in cellfusedinternal_combined = 0;
  species enzyme_yahk_ATP_rheostatbiocrnpyler_334638_combined_model_of__biocrnpyler_702329_biocrnpyler_334638_1_combined in cellfusedinternal_combined = 0.2/cellfusedinternal_combined;
  species molecule_isobutanol_ATP_rheostatbiocrnpyler_334638_combined_model_of__biocrnpyler_702329_biocrnpyler_334638_1_combined in cellfusedinternal_combined = 0;
  species complex_enzyme_yahk_metabolite_nadph_molecule_isobutanal_ATP_rheostatbiocrnpyler_334638_combined_model_of__biocrnpyler_702329_biocrnpyler_334638_1_combined in cellfusedinternal_combined = 0;
  species complex_enzyme_yahk_metabolite_nadp_molecule_isobutanol_ATP_rheostatbiocrnpyler_334638_combined_model_of__biocrnpyler_702329_biocrnpyler_334638_1_combined in cellfusedinternal_combined = 0;
  species enzyme_atp_use_ATP_rheostatbiocrnpyler_334638_combined_model_of__biocrnpyler_702329_biocrnpyler_334638_1_combined in cellfusedinternal_combined = 0;
  species complex_enzyme_atp_use_metabolite_atp_ATP_rheostatbiocrnpyler_334638_combined_model_of__biocrnpyler_702329_biocrnpyler_334638_1_combined in cellfusedinternal_combined = 0;
  species complex_enzyme_atp_use_metabolite_adp_metabolite_pi_ATP_rheostatbiocrnpyler_334638_combined_model_of__biocrnpyler_702329_biocrnpyler_334638_1_combined in cellfusedinternal_combined = 0;
  species atc_e_external_reservoir_model_1_combined_1_combined in cellfusedexternal = 10000/cellfusedexternal;

  // Parameters:
  kb_combined = 0.002 per_second;
  kd_combined = 1e-5 per_second;

  // Reactions:
  r0_exsAbiocrnpyler_702329_combined_model_of__biocrnpyler_702329_biocrnpyler_334638: atc_i_1_combined + tetR_exsAbiocrnpyler_702329_combined_model_of__biocrnpyler_702329_biocrnpyler_334638 => complex_atc_i_tetR_exsAbiocrnpyler_702329_combined_model_of__biocrnpyler_702329_biocrnpyler_334638; r0_exsAbiocrnpyler_702329_combined_model_of__biocrnpyler_702329_biocrnpyler_334638_k*atc_i_1_combined*tetR_exsAbiocrnpyler_702329_combined_model_of__biocrnpyler_702329_biocrnpyler_334638;
    r0_exsAbiocrnpyler_702329_combined_model_of__biocrnpyler_702329_biocrnpyler_334638_k = 2e-5;
  r0_1_exsAbiocrnpyler_702329_combined_model_of__biocrnpyler_702329_biocrnpyler_334638: complex_atc_i_tetR_exsAbiocrnpyler_702329_combined_model_of__biocrnpyler_702329_biocrnpyler_334638 => atc_i_1_combined + tetR_exsAbiocrnpyler_702329_combined_model_of__biocrnpyler_702329_biocrnpyler_334638; r0_1_exsAbiocrnpyler_702329_combined_model_of__biocrnpyler_702329_biocrnpyler_334638_k*complex_atc_i_tetR_exsAbiocrnpyler_702329_combined_model_of__biocrnpyler_702329_biocrnpyler_334638;
    r0_1_exsAbiocrnpyler_702329_combined_model_of__biocrnpyler_702329_biocrnpyler_334638_k = 2e-9;
  r2_exsAbiocrnpyler_702329_combined_model_of__biocrnpyler_702329_biocrnpyler_334638: dna_f_exsAbiocrnpyler_702329_combined_model_of__biocrnpyler_702329_biocrnpyler_334638 + tetR_exsAbiocrnpyler_702329_combined_model_of__biocrnpyler_702329_biocrnpyler_334638 => complex_dna_f_tetR_exsAbiocrnpyler_702329_combined_model_of__biocrnpyler_702329_biocrnpyler_334638; r2_exsAbiocrnpyler_702329_combined_model_of__biocrnpyler_702329_biocrnpyler_334638_k*dna_f_exsAbiocrnpyler_702329_combined_model_of__biocrnpyler_702329_biocrnpyler_334638*tetR_exsAbiocrnpyler_702329_combined_model_of__biocrnpyler_702329_biocrnpyler_334638;
    r2_exsAbiocrnpyler_702329_combined_model_of__biocrnpyler_702329_biocrnpyler_334638_k = 4e-7;
  r2_1_exsAbiocrnpyler_702329_combined_model_of__biocrnpyler_702329_biocrnpyler_334638: complex_dna_f_tetR_exsAbiocrnpyler_702329_combined_model_of__biocrnpyler_702329_biocrnpyler_334638 => dna_f_exsAbiocrnpyler_702329_combined_model_of__biocrnpyler_702329_biocrnpyler_334638 + tetR_exsAbiocrnpyler_702329_combined_model_of__biocrnpyler_702329_biocrnpyler_334638; r2_1_exsAbiocrnpyler_702329_combined_model_of__biocrnpyler_702329_biocrnpyler_334638_k*complex_dna_f_tetR_exsAbiocrnpyler_702329_combined_model_of__biocrnpyler_702329_biocrnpyler_334638;
    r2_1_exsAbiocrnpyler_702329_combined_model_of__biocrnpyler_702329_biocrnpyler_334638_k = 1e-12;
  r4_exsAbiocrnpyler_702329_combined_model_of__biocrnpyler_702329_biocrnpyler_334638: complex_dna_f_tetR_exsAbiocrnpyler_702329_combined_model_of__biocrnpyler_702329_biocrnpyler_334638 + atc_i_1_combined => complex_atc_i_dna_f_tetR_exsAbiocrnpyler_702329_combined_model_of__biocrnpyler_702329_biocrnpyler_334638; r4_exsAbiocrnpyler_702329_combined_model_of__biocrnpyler_702329_biocrnpyler_334638_k*complex_dna_f_tetR_exsAbiocrnpyler_702329_combined_model_of__biocrnpyler_702329_biocrnpyler_334638*atc_i_1_combined;
    r4_exsAbiocrnpyler_702329_combined_model_of__biocrnpyler_702329_biocrnpyler_334638_k = 6e-8;
  r4_1_exsAbiocrnpyler_702329_combined_model_of__biocrnpyler_702329_biocrnpyler_334638: complex_atc_i_dna_f_tetR_exsAbiocrnpyler_702329_combined_model_of__biocrnpyler_702329_biocrnpyler_334638 => complex_dna_f_tetR_exsAbiocrnpyler_702329_combined_model_of__biocrnpyler_702329_biocrnpyler_334638 + atc_i_1_combined; r4_1_exsAbiocrnpyler_702329_combined_model_of__biocrnpyler_702329_biocrnpyler_334638_k*complex_atc_i_dna_f_tetR_exsAbiocrnpyler_702329_combined_model_of__biocrnpyler_702329_biocrnpyler_334638;
    r4_1_exsAbiocrnpyler_702329_combined_model_of__biocrnpyler_702329_biocrnpyler_334638_k = 3e-9;
  r6_exsAbiocrnpyler_702329_combined_model_of__biocrnpyler_702329_biocrnpyler_334638: complex_atc_i_dna_f_tetR_exsAbiocrnpyler_702329_combined_model_of__biocrnpyler_702329_biocrnpyler_334638 => dna_f_exsAbiocrnpyler_702329_combined_model_of__biocrnpyler_702329_biocrnpyler_334638 + complex_atc_i_tetR_exsAbiocrnpyler_702329_combined_model_of__biocrnpyler_702329_biocrnpyler_334638; r6_exsAbiocrnpyler_702329_combined_model_of__biocrnpyler_702329_biocrnpyler_334638_k*complex_atc_i_dna_f_tetR_exsAbiocrnpyler_702329_combined_model_of__biocrnpyler_702329_biocrnpyler_334638;
    r6_exsAbiocrnpyler_702329_combined_model_of__biocrnpyler_702329_biocrnpyler_334638_k = 5e-5;
  r6_1_exsAbiocrnpyler_702329_combined_model_of__biocrnpyler_702329_biocrnpyler_334638: dna_f_exsAbiocrnpyler_702329_combined_model_of__biocrnpyler_702329_biocrnpyler_334638 + complex_atc_i_tetR_exsAbiocrnpyler_702329_combined_model_of__biocrnpyler_702329_biocrnpyler_334638 => complex_atc_i_dna_f_tetR_exsAbiocrnpyler_702329_combined_model_of__biocrnpyler_702329_biocrnpyler_334638; r6_1_exsAbiocrnpyler_702329_combined_model_of__biocrnpyler_702329_biocrnpyler_334638_k*dna_f_exsAbiocrnpyler_702329_combined_model_of__biocrnpyler_702329_biocrnpyler_334638*complex_atc_i_tetR_exsAbiocrnpyler_702329_combined_model_of__biocrnpyler_702329_biocrnpyler_334638;
    r6_1_exsAbiocrnpyler_702329_combined_model_of__biocrnpyler_702329_biocrnpyler_334638_k = 1e-10;
  r8_exsAbiocrnpyler_702329_combined_model_of__biocrnpyler_702329_biocrnpyler_334638: dna_f_exsAbiocrnpyler_702329_combined_model_of__biocrnpyler_702329_biocrnpyler_334638 => dna_f_exsAbiocrnpyler_702329_combined_model_of__biocrnpyler_702329_biocrnpyler_334638 + rna_f_exsAbiocrnpyler_702329_combined_model_of__biocrnpyler_702329_biocrnpyler_334638; r8_exsAbiocrnpyler_702329_combined_model_of__biocrnpyler_702329_biocrnpyler_334638_k*dna_f_exsAbiocrnpyler_702329_combined_model_of__biocrnpyler_702329_biocrnpyler_334638;
    r8_exsAbiocrnpyler_702329_combined_model_of__biocrnpyler_702329_biocrnpyler_334638_k = 0.001875;
  r9_exsAbiocrnpyler_702329_combined_model_of__biocrnpyler_702329_biocrnpyler_334638: rna_f_exsAbiocrnpyler_702329_combined_model_of__biocrnpyler_702329_biocrnpyler_334638 + ATP_exsAbiocrnpyler_702329_1_combined_combined_model_of__biocrnpyler_702329_biocrnpyler_334638_1_combined => rna_f_exsAbiocrnpyler_702329_combined_model_of__biocrnpyler_702329_biocrnpyler_334638 + ADP_exsAbiocrnpyler_702329_1_combined_combined_model_of__biocrnpyler_702329_biocrnpyler_334638_1_combined + exsA_exsAbiocrnpyler_702329_combined_model_of__biocrnpyler_702329_biocrnpyler_334638_1_combined + P_exsAbiocrnpyler_702329_1_combined_combined_model_of__biocrnpyler_702329_biocrnpyler_334638_1_combined; r9_exsAbiocrnpyler_702329_combined_model_of__biocrnpyler_702329_biocrnpyler_334638_k*rna_f_exsAbiocrnpyler_702329_combined_model_of__biocrnpyler_702329_biocrnpyler_334638*ATP_exsAbiocrnpyler_702329_1_combined_combined_model_of__biocrnpyler_702329_biocrnpyler_334638_1_combined^r9_exsAbiocrnpyler_702329_combined_model_of__biocrnpyler_702329_biocrnpyler_334638_n/(ATP_exsAbiocrnpyler_702329_1_combined_combined_model_of__biocrnpyler_702329_biocrnpyler_334638_1_combined^r9_exsAbiocrnpyler_702329_combined_model_of__biocrnpyler_702329_biocrnpyler_334638_n + r9_exsAbiocrnpyler_702329_combined_model_of__biocrnpyler_702329_biocrnpyler_334638_K);
    r9_exsAbiocrnpyler_702329_combined_model_of__biocrnpyler_702329_biocrnpyler_334638_k = 0.0007; r9_exsAbiocrnpyler_702329_combined_model_of__biocrnpyler_702329_biocrnpyler_334638_n = 1; r9_exsAbiocrnpyler_702329_combined_model_of__biocrnpyler_702329_biocrnpyler_334638_K = 1;
  r10_exsAbiocrnpyler_702329_combined_model_of__biocrnpyler_702329_biocrnpyler_334638: rna_f_exsAbiocrnpyler_702329_combined_model_of__biocrnpyler_702329_biocrnpyler_334638 => ; r10_exsAbiocrnpyler_702329_combined_model_of__biocrnpyler_702329_biocrnpyler_334638_k*rna_f_exsAbiocrnpyler_702329_combined_model_of__biocrnpyler_702329_biocrnpyler_334638;
    r10_exsAbiocrnpyler_702329_combined_model_of__biocrnpyler_702329_biocrnpyler_334638_k = 0.001;
  r0_ATP_rheostatbiocrnpyler_334638_combined_model_of__biocrnpyler_702329_biocrnpyler_334638_combined: enzyme_hex_ATP_rheostatbiocrnpyler_334638_combined_model_of__biocrnpyler_702329_biocrnpyler_334638_1_combined + ATP_exsAbiocrnpyler_702329_1_combined_combined_model_of__biocrnpyler_702329_biocrnpyler_334638_1_combined + molecule_glucose_ATP_rheostatbiocrnpyler_334638_combined_model_of__biocrnpyler_702329_biocrnpyler_334638_1_combined => complex_enzyme_hex_metabolite_atp_molecule_glucose_ATP_rheostatbiocrnpyler_334638_combined_model_of__biocrnpyler_702329_biocrnpyler_334638_1_combined; r0_ATP_rheostatbiocrnpyler_334638_combined_model_of__biocrnpyler_702329_biocrnpyler_334638_combined_k*enzyme_hex_ATP_rheostatbiocrnpyler_334638_combined_model_of__biocrnpyler_702329_biocrnpyler_334638_1_combined*ATP_exsAbiocrnpyler_702329_1_combined_combined_model_of__biocrnpyler_702329_biocrnpyler_334638_1_combined*molecule_glucose_ATP_rheostatbiocrnpyler_334638_combined_model_of__biocrnpyler_702329_biocrnpyler_334638_1_combined;
    r0_ATP_rheostatbiocrnpyler_334638_combined_model_of__biocrnpyler_702329_biocrnpyler_334638_combined_k = 54000;
  r0_1_ATP_rheostatbiocrnpyler_334638_combined_model_of__biocrnpyler_702329_biocrnpyler_334638_combined: complex_enzyme_hex_metabolite_atp_molecule_glucose_ATP_rheostatbiocrnpyler_334638_combined_model_of__biocrnpyler_702329_biocrnpyler_334638_1_combined => enzyme_hex_ATP_rheostatbiocrnpyler_334638_combined_model_of__biocrnpyler_702329_biocrnpyler_334638_1_combined + ATP_exsAbiocrnpyler_702329_1_combined_combined_model_of__biocrnpyler_702329_biocrnpyler_334638_1_combined + molecule_glucose_ATP_rheostatbiocrnpyler_334638_combined_model_of__biocrnpyler_702329_biocrnpyler_334638_1_combined; r0_1_ATP_rheostatbiocrnpyler_334638_combined_model_of__biocrnpyler_702329_biocrnpyler_334638_combined_k*complex_enzyme_hex_metabolite_atp_molecule_glucose_ATP_rheostatbiocrnpyler_334638_combined_model_of__biocrnpyler_702329_biocrnpyler_334638_1_combined;
    r0_1_ATP_rheostatbiocrnpyler_334638_combined_model_of__biocrnpyler_702329_biocrnpyler_334638_combined_k = 5400;
  r2_ATP_rheostatbiocrnpyler_334638_combined_model_of__biocrnpyler_702329_biocrnpyler_334638_combined: complex_enzyme_hex_metabolite_atp_molecule_glucose_ATP_rheostatbiocrnpyler_334638_combined_model_of__biocrnpyler_702329_biocrnpyler_334638_1_combined => complex_enzyme_hex_metabolite_adp_molecule_g6p_ATP_rheostatbiocrnpyler_334638_combined_model_of__biocrnpyler_702329_biocrnpyler_334638_1_combined; r2_ATP_rheostatbiocrnpyler_334638_combined_model_of__biocrnpyler_702329_biocrnpyler_334638_combined_k*complex_enzyme_hex_metabolite_atp_molecule_glucose_ATP_rheostatbiocrnpyler_334638_combined_model_of__biocrnpyler_702329_biocrnpyler_334638_1_combined;
    r2_ATP_rheostatbiocrnpyler_334638_combined_model_of__biocrnpyler_702329_biocrnpyler_334638_combined_k = 36000;
  r3_ATP_rheostatbiocrnpyler_334638_combined_model_of__biocrnpyler_702329_biocrnpyler_334638_combined: complex_enzyme_hex_metabolite_adp_molecule_g6p_ATP_rheostatbiocrnpyler_334638_combined_model_of__biocrnpyler_702329_biocrnpyler_334638_1_combined => enzyme_hex_ATP_rheostatbiocrnpyler_334638_combined_model_of__biocrnpyler_702329_biocrnpyler_334638_1_combined + molecule_g6p_ATP_rheostatbiocrnpyler_334638_combined_model_of__biocrnpyler_702329_biocrnpyler_334638_1_combined + ADP_exsAbiocrnpyler_702329_1_combined_combined_model_of__biocrnpyler_702329_biocrnpyler_334638_1_combined; r3_ATP_rheostatbiocrnpyler_334638_combined_model_of__biocrnpyler_702329_biocrnpyler_334638_combined_k*complex_enzyme_hex_metabolite_adp_molecule_g6p_ATP_rheostatbiocrnpyler_334638_combined_model_of__biocrnpyler_702329_biocrnpyler_334638_1_combined;
    r3_ATP_rheostatbiocrnpyler_334638_combined_model_of__biocrnpyler_702329_biocrnpyler_334638_combined_k = 54000;
  r3_1_ATP_rheostatbiocrnpyler_334638_combined_model_of__biocrnpyler_702329_biocrnpyler_334638_combined: enzyme_hex_ATP_rheostatbiocrnpyler_334638_combined_model_of__biocrnpyler_702329_biocrnpyler_334638_1_combined + molecule_g6p_ATP_rheostatbiocrnpyler_334638_combined_model_of__biocrnpyler_702329_biocrnpyler_334638_1_combined + ADP_exsAbiocrnpyler_702329_1_combined_combined_model_of__biocrnpyler_702329_biocrnpyler_334638_1_combined => complex_enzyme_hex_metabolite_adp_molecule_g6p_ATP_rheostatbiocrnpyler_334638_combined_model_of__biocrnpyler_702329_biocrnpyler_334638_1_combined; r3_1_ATP_rheostatbiocrnpyler_334638_combined_model_of__biocrnpyler_702329_biocrnpyler_334638_combined_k*enzyme_hex_ATP_rheostatbiocrnpyler_334638_combined_model_of__biocrnpyler_702329_biocrnpyler_334638_1_combined*molecule_g6p_ATP_rheostatbiocrnpyler_334638_combined_model_of__biocrnpyler_702329_biocrnpyler_334638_1_combined*ADP_exsAbiocrnpyler_702329_1_combined_combined_model_of__biocrnpyler_702329_biocrnpyler_334638_1_combined;
    r3_1_ATP_rheostatbiocrnpyler_334638_combined_model_of__biocrnpyler_702329_biocrnpyler_334638_combined_k = 5400;
  r5_ATP_rheostatbiocrnpyler_334638_combined_model_of__biocrnpyler_702329_biocrnpyler_334638_combined: enzyme_pgi_ATP_rheostatbiocrnpyler_334638_combined_model_of__biocrnpyler_702329_biocrnpyler_334638_1_combined + molecule_g6p_ATP_rheostatbiocrnpyler_334638_combined_model_of__biocrnpyler_702329_biocrnpyler_334638_1_combined => complex_enzyme_pgi_molecule_g6p_ATP_rheostatbiocrnpyler_334638_combined_model_of__biocrnpyler_702329_biocrnpyler_334638_1_combined; r5_ATP_rheostatbiocrnpyler_334638_combined_model_of__biocrnpyler_702329_biocrnpyler_334638_combined_k*enzyme_pgi_ATP_rheostatbiocrnpyler_334638_combined_model_of__biocrnpyler_702329_biocrnpyler_334638_1_combined*molecule_g6p_ATP_rheostatbiocrnpyler_334638_combined_model_of__biocrnpyler_702329_biocrnpyler_334638_1_combined;
    r5_ATP_rheostatbiocrnpyler_334638_combined_model_of__biocrnpyler_702329_biocrnpyler_334638_combined_k = 54000;
  r5_1_ATP_rheostatbiocrnpyler_334638_combined_model_of__biocrnpyler_702329_biocrnpyler_334638_combined: complex_enzyme_pgi_molecule_g6p_ATP_rheostatbiocrnpyler_334638_combined_model_of__biocrnpyler_702329_biocrnpyler_334638_1_combined => enzyme_pgi_ATP_rheostatbiocrnpyler_334638_combined_model_of__biocrnpyler_702329_biocrnpyler_334638_1_combined + molecule_g6p_ATP_rheostatbiocrnpyler_334638_combined_model_of__biocrnpyler_702329_biocrnpyler_334638_1_combined; r5_1_ATP_rheostatbiocrnpyler_334638_combined_model_of__biocrnpyler_702329_biocrnpyler_334638_combined_k*complex_enzyme_pgi_molecule_g6p_ATP_rheostatbiocrnpyler_334638_combined_model_of__biocrnpyler_702329_biocrnpyler_334638_1_combined;
    r5_1_ATP_rheostatbiocrnpyler_334638_combined_model_of__biocrnpyler_702329_biocrnpyler_334638_combined_k = 5400;
  r7_ATP_rheostatbiocrnpyler_334638_combined_model_of__biocrnpyler_702329_biocrnpyler_334638_combined: complex_enzyme_pgi_molecule_g6p_ATP_rheostatbiocrnpyler_334638_combined_model_of__biocrnpyler_702329_biocrnpyler_334638_1_combined => complex_enzyme_pgi_molecule_f6p_ATP_rheostatbiocrnpyler_334638_combined_model_of__biocrnpyler_702329_biocrnpyler_334638_1_combined; r7_ATP_rheostatbiocrnpyler_334638_combined_model_of__biocrnpyler_702329_biocrnpyler_334638_combined_k*complex_enzyme_pgi_molecule_g6p_ATP_rheostatbiocrnpyler_334638_combined_model_of__biocrnpyler_702329_biocrnpyler_334638_1_combined;
    r7_ATP_rheostatbiocrnpyler_334638_combined_model_of__biocrnpyler_702329_biocrnpyler_334638_combined_k = 36000;
  r8_ATP_rheostatbiocrnpyler_334638_combined_model_of__biocrnpyler_702329_biocrnpyler_334638_combined: complex_enzyme_pgi_molecule_f6p_ATP_rheostatbiocrnpyler_334638_combined_model_of__biocrnpyler_702329_biocrnpyler_334638_1_combined => enzyme_pgi_ATP_rheostatbiocrnpyler_334638_combined_model_of__biocrnpyler_702329_biocrnpyler_334638_1_combined + molecule_f6p_ATP_rheostatbiocrnpyler_334638_combined_model_of__biocrnpyler_702329_biocrnpyler_334638_1_combined; r8_ATP_rheostatbiocrnpyler_334638_combined_model_of__biocrnpyler_702329_biocrnpyler_334638_combined_k*complex_enzyme_pgi_molecule_f6p_ATP_rheostatbiocrnpyler_334638_combined_model_of__biocrnpyler_702329_biocrnpyler_334638_1_combined;
    r8_ATP_rheostatbiocrnpyler_334638_combined_model_of__biocrnpyler_702329_biocrnpyler_334638_combined_k = 54000;
  r8_1_ATP_rheostatbiocrnpyler_334638_combined_model_of__biocrnpyler_702329_biocrnpyler_334638_combined: enzyme_pgi_ATP_rheostatbiocrnpyler_334638_combined_model_of__biocrnpyler_702329_biocrnpyler_334638_1_combined + molecule_f6p_ATP_rheostatbiocrnpyler_334638_combined_model_of__biocrnpyler_702329_biocrnpyler_334638_1_combined => complex_enzyme_pgi_molecule_f6p_ATP_rheostatbiocrnpyler_334638_combined_model_of__biocrnpyler_702329_biocrnpyler_334638_1_combined; r8_1_ATP_rheostatbiocrnpyler_334638_combined_model_of__biocrnpyler_702329_biocrnpyler_334638_combined_k*enzyme_pgi_ATP_rheostatbiocrnpyler_334638_combined_model_of__biocrnpyler_702329_biocrnpyler_334638_1_combined*molecule_f6p_ATP_rheostatbiocrnpyler_334638_combined_model_of__biocrnpyler_702329_biocrnpyler_334638_1_combined;
    r8_1_ATP_rheostatbiocrnpyler_334638_combined_model_of__biocrnpyler_702329_biocrnpyler_334638_combined_k = 5400;
  r10_ATP_rheostatbiocrnpyler_334638_combined_model_of__biocrnpyler_702329_biocrnpyler_334638_combined: enzyme_pfk_ATP_rheostatbiocrnpyler_334638_combined_model_of__biocrnpyler_702329_biocrnpyler_334638_1_combined + ATP_exsAbiocrnpyler_702329_1_combined_combined_model_of__biocrnpyler_702329_biocrnpyler_334638_1_combined + molecule_f6p_ATP_rheostatbiocrnpyler_334638_combined_model_of__biocrnpyler_702329_biocrnpyler_334638_1_combined => complex_enzyme_pfk_metabolite_atp_molecule_f6p_ATP_rheostatbiocrnpyler_334638_combined_model_of__biocrnpyler_702329_biocrnpyler_334638_1_combined; r10_ATP_rheostatbiocrnpyler_334638_combined_model_of__biocrnpyler_702329_biocrnpyler_334638_combined_k*enzyme_pfk_ATP_rheostatbiocrnpyler_334638_combined_model_of__biocrnpyler_702329_biocrnpyler_334638_1_combined*ATP_exsAbiocrnpyler_702329_1_combined_combined_model_of__biocrnpyler_702329_biocrnpyler_334638_1_combined*molecule_f6p_ATP_rheostatbiocrnpyler_334638_combined_model_of__biocrnpyler_702329_biocrnpyler_334638_1_combined;
    r10_ATP_rheostatbiocrnpyler_334638_combined_model_of__biocrnpyler_702329_biocrnpyler_334638_combined_k = 54000;
  r10_1_ATP_rheostatbiocrnpyler_334638_combined_model_of__biocrnpyler_702329_biocrnpyler_334638_combined: complex_enzyme_pfk_metabolite_atp_molecule_f6p_ATP_rheostatbiocrnpyler_334638_combined_model_of__biocrnpyler_702329_biocrnpyler_334638_1_combined => enzyme_pfk_ATP_rheostatbiocrnpyler_334638_combined_model_of__biocrnpyler_702329_biocrnpyler_334638_1_combined + ATP_exsAbiocrnpyler_702329_1_combined_combined_model_of__biocrnpyler_702329_biocrnpyler_334638_1_combined + molecule_f6p_ATP_rheostatbiocrnpyler_334638_combined_model_of__biocrnpyler_702329_biocrnpyler_334638_1_combined; r10_1_ATP_rheostatbiocrnpyler_334638_combined_model_of__biocrnpyler_702329_biocrnpyler_334638_combined_k*complex_enzyme_pfk_metabolite_atp_molecule_f6p_ATP_rheostatbiocrnpyler_334638_combined_model_of__biocrnpyler_702329_biocrnpyler_334638_1_combined;
    r10_1_ATP_rheostatbiocrnpyler_334638_combined_model_of__biocrnpyler_702329_biocrnpyler_334638_combined_k = 5400;
  r12_ATP_rheostatbiocrnpyler_334638_combined_model_of__biocrnpyler_702329_biocrnpyler_334638_combined: complex_enzyme_pfk_metabolite_atp_molecule_f6p_ATP_rheostatbiocrnpyler_334638_combined_model_of__biocrnpyler_702329_biocrnpyler_334638_1_combined => complex_enzyme_pfk_metabolite_adp_molecule_f16p_ATP_rheostatbiocrnpyler_334638_combined_model_of__biocrnpyler_702329_biocrnpyler_334638_1_combined; r12_ATP_rheostatbiocrnpyler_334638_combined_model_of__biocrnpyler_702329_biocrnpyler_334638_combined_k*complex_enzyme_pfk_metabolite_atp_molecule_f6p_ATP_rheostatbiocrnpyler_334638_combined_model_of__biocrnpyler_702329_biocrnpyler_334638_1_combined;
    r12_ATP_rheostatbiocrnpyler_334638_combined_model_of__biocrnpyler_702329_biocrnpyler_334638_combined_k = 36000;
  r13_ATP_rheostatbiocrnpyler_334638_combined_model_of__biocrnpyler_702329_biocrnpyler_334638_combined: complex_enzyme_pfk_metabolite_adp_molecule_f16p_ATP_rheostatbiocrnpyler_334638_combined_model_of__biocrnpyler_702329_biocrnpyler_334638_1_combined => enzyme_pfk_ATP_rheostatbiocrnpyler_334638_combined_model_of__biocrnpyler_702329_biocrnpyler_334638_1_combined + molecule_f16p_ATP_rheostatbiocrnpyler_334638_combined_model_of__biocrnpyler_702329_biocrnpyler_334638_1_combined + ADP_exsAbiocrnpyler_702329_1_combined_combined_model_of__biocrnpyler_702329_biocrnpyler_334638_1_combined; r13_ATP_rheostatbiocrnpyler_334638_combined_model_of__biocrnpyler_702329_biocrnpyler_334638_combined_k*complex_enzyme_pfk_metabolite_adp_molecule_f16p_ATP_rheostatbiocrnpyler_334638_combined_model_of__biocrnpyler_702329_biocrnpyler_334638_1_combined;
    r13_ATP_rheostatbiocrnpyler_334638_combined_model_of__biocrnpyler_702329_biocrnpyler_334638_combined_k = 54000;
  r13_1_ATP_rheostatbiocrnpyler_334638_combined_model_of__biocrnpyler_702329_biocrnpyler_334638_combined: enzyme_pfk_ATP_rheostatbiocrnpyler_334638_combined_model_of__biocrnpyler_702329_biocrnpyler_334638_1_combined + molecule_f16p_ATP_rheostatbiocrnpyler_334638_combined_model_of__biocrnpyler_702329_biocrnpyler_334638_1_combined + ADP_exsAbiocrnpyler_702329_1_combined_combined_model_of__biocrnpyler_702329_biocrnpyler_334638_1_combined => complex_enzyme_pfk_metabolite_adp_molecule_f16p_ATP_rheostatbiocrnpyler_334638_combined_model_of__biocrnpyler_702329_biocrnpyler_334638_1_combined; r13_1_ATP_rheostatbiocrnpyler_334638_combined_model_of__biocrnpyler_702329_biocrnpyler_334638_combined_k*enzyme_pfk_ATP_rheostatbiocrnpyler_334638_combined_model_of__biocrnpyler_702329_biocrnpyler_334638_1_combined*molecule_f16p_ATP_rheostatbiocrnpyler_334638_combined_model_of__biocrnpyler_702329_biocrnpyler_334638_1_combined*ADP_exsAbiocrnpyler_702329_1_combined_combined_model_of__biocrnpyler_702329_biocrnpyler_334638_1_combined;
    r13_1_ATP_rheostatbiocrnpyler_334638_combined_model_of__biocrnpyler_702329_biocrnpyler_334638_combined_k = 5400;
  r15_ATP_rheostatbiocrnpyler_334638_combined_model_of__biocrnpyler_702329_biocrnpyler_334638_combined: enzyme_ald_tpi_ATP_rheostatbiocrnpyler_334638_combined_model_of__biocrnpyler_702329_biocrnpyler_334638_1_combined + molecule_f16p_ATP_rheostatbiocrnpyler_334638_combined_model_of__biocrnpyler_702329_biocrnpyler_334638_1_combined => complex_enzyme_ald_tpi_molecule_f16p_ATP_rheostatbiocrnpyler_334638_combined_model_of__biocrnpyler_702329_biocrnpyler_334638_1_combined; r15_ATP_rheostatbiocrnpyler_334638_combined_model_of__biocrnpyler_702329_biocrnpyler_334638_combined_k*enzyme_ald_tpi_ATP_rheostatbiocrnpyler_334638_combined_model_of__biocrnpyler_702329_biocrnpyler_334638_1_combined*molecule_f16p_ATP_rheostatbiocrnpyler_334638_combined_model_of__biocrnpyler_702329_biocrnpyler_334638_1_combined;
    r15_ATP_rheostatbiocrnpyler_334638_combined_model_of__biocrnpyler_702329_biocrnpyler_334638_combined_k = 54000;
  r15_1_ATP_rheostatbiocrnpyler_334638_combined_model_of__biocrnpyler_702329_biocrnpyler_334638_combined: complex_enzyme_ald_tpi_molecule_f16p_ATP_rheostatbiocrnpyler_334638_combined_model_of__biocrnpyler_702329_biocrnpyler_334638_1_combined => enzyme_ald_tpi_ATP_rheostatbiocrnpyler_334638_combined_model_of__biocrnpyler_702329_biocrnpyler_334638_1_combined + molecule_f16p_ATP_rheostatbiocrnpyler_334638_combined_model_of__biocrnpyler_702329_biocrnpyler_334638_1_combined; r15_1_ATP_rheostatbiocrnpyler_334638_combined_model_of__biocrnpyler_702329_biocrnpyler_334638_combined_k*complex_enzyme_ald_tpi_molecule_f16p_ATP_rheostatbiocrnpyler_334638_combined_model_of__biocrnpyler_702329_biocrnpyler_334638_1_combined;
    r15_1_ATP_rheostatbiocrnpyler_334638_combined_model_of__biocrnpyler_702329_biocrnpyler_334638_combined_k = 5400;
  r17_ATP_rheostatbiocrnpyler_334638_combined_model_of__biocrnpyler_702329_biocrnpyler_334638_combined: complex_enzyme_ald_tpi_molecule_f16p_ATP_rheostatbiocrnpyler_334638_combined_model_of__biocrnpyler_702329_biocrnpyler_334638_1_combined => complex_enzyme_ald_tpi_2x_molecule_g3p_ATP_rheostatbiocrnpyler_334638_combined_model_of__biocrnpyler_702329_biocrnpyler_334638_1_combined; r17_ATP_rheostatbiocrnpyler_334638_combined_model_of__biocrnpyler_702329_biocrnpyler_334638_combined_k*complex_enzyme_ald_tpi_molecule_f16p_ATP_rheostatbiocrnpyler_334638_combined_model_of__biocrnpyler_702329_biocrnpyler_334638_1_combined;
    r17_ATP_rheostatbiocrnpyler_334638_combined_model_of__biocrnpyler_702329_biocrnpyler_334638_combined_k = 36000;
  r18_ATP_rheostatbiocrnpyler_334638_combined_model_of__biocrnpyler_702329_biocrnpyler_334638_combined: complex_enzyme_ald_tpi_2x_molecule_g3p_ATP_rheostatbiocrnpyler_334638_combined_model_of__biocrnpyler_702329_biocrnpyler_334638_1_combined => enzyme_ald_tpi_ATP_rheostatbiocrnpyler_334638_combined_model_of__biocrnpyler_702329_biocrnpyler_334638_1_combined + 2 molecule_g3p_ATP_rheostatbiocrnpyler_334638_combined_model_of__biocrnpyler_702329_biocrnpyler_334638_1_combined; r18_ATP_rheostatbiocrnpyler_334638_combined_model_of__biocrnpyler_702329_biocrnpyler_334638_combined_k*complex_enzyme_ald_tpi_2x_molecule_g3p_ATP_rheostatbiocrnpyler_334638_combined_model_of__biocrnpyler_702329_biocrnpyler_334638_1_combined;
    r18_ATP_rheostatbiocrnpyler_334638_combined_model_of__biocrnpyler_702329_biocrnpyler_334638_combined_k = 54000;
  r18_1_ATP_rheostatbiocrnpyler_334638_combined_model_of__biocrnpyler_702329_biocrnpyler_334638_combined: enzyme_ald_tpi_ATP_rheostatbiocrnpyler_334638_combined_model_of__biocrnpyler_702329_biocrnpyler_334638_1_combined + 2 molecule_g3p_ATP_rheostatbiocrnpyler_334638_combined_model_of__biocrnpyler_702329_biocrnpyler_334638_1_combined => complex_enzyme_ald_tpi_2x_molecule_g3p_ATP_rheostatbiocrnpyler_334638_combined_model_of__biocrnpyler_702329_biocrnpyler_334638_1_combined; r18_1_ATP_rheostatbiocrnpyler_334638_combined_model_of__biocrnpyler_702329_biocrnpyler_334638_combined_k*enzyme_ald_tpi_ATP_rheostatbiocrnpyler_334638_combined_model_of__biocrnpyler_702329_biocrnpyler_334638_1_combined*molecule_g3p_ATP_rheostatbiocrnpyler_334638_combined_model_of__biocrnpyler_702329_biocrnpyler_334638_1_combined^2;
    r18_1_ATP_rheostatbiocrnpyler_334638_combined_model_of__biocrnpyler_702329_biocrnpyler_334638_combined_k = 5400;
  r20_ATP_rheostatbiocrnpyler_334638_combined_model_of__biocrnpyler_702329_biocrnpyler_334638_combined: enzyme_gapN_ATP_rheostatbiocrnpyler_334638_combined_model_of__biocrnpyler_702329_biocrnpyler_334638_1_combined + 2 metabolite_nadp_ATP_rheostatbiocrnpyler_334638_combined_model_of__biocrnpyler_702329_biocrnpyler_334638_1_combined + 2 molecule_g3p_ATP_rheostatbiocrnpyler_334638_combined_model_of__biocrnpyler_702329_biocrnpyler_334638_1_combined => complex_enzyme_gapN_2x_metabolite_nadp_2x_molecule_g3p_ATP_rheostatbiocrnpyler_334638_combined_model_of__biocrnpyler_702329_biocrnpyler_334638_1_combined; r20_ATP_rheostatbiocrnpyler_334638_combined_model_of__biocrnpyler_702329_biocrnpyler_334638_combined_k*enzyme_gapN_ATP_rheostatbiocrnpyler_334638_combined_model_of__biocrnpyler_702329_biocrnpyler_334638_1_combined*metabolite_nadp_ATP_rheostatbiocrnpyler_334638_combined_model_of__biocrnpyler_702329_biocrnpyler_334638_1_combined^2*molecule_g3p_ATP_rheostatbiocrnpyler_334638_combined_model_of__biocrnpyler_702329_biocrnpyler_334638_1_combined^2;
    r20_ATP_rheostatbiocrnpyler_334638_combined_model_of__biocrnpyler_702329_biocrnpyler_334638_combined_k = 54000;
  r20_1_ATP_rheostatbiocrnpyler_334638_combined_model_of__biocrnpyler_702329_biocrnpyler_334638_combined: complex_enzyme_gapN_2x_metabolite_nadp_2x_molecule_g3p_ATP_rheostatbiocrnpyler_334638_combined_model_of__biocrnpyler_702329_biocrnpyler_334638_1_combined => enzyme_gapN_ATP_rheostatbiocrnpyler_334638_combined_model_of__biocrnpyler_702329_biocrnpyler_334638_1_combined + 2 metabolite_nadp_ATP_rheostatbiocrnpyler_334638_combined_model_of__biocrnpyler_702329_biocrnpyler_334638_1_combined + 2 molecule_g3p_ATP_rheostatbiocrnpyler_334638_combined_model_of__biocrnpyler_702329_biocrnpyler_334638_1_combined; r20_1_ATP_rheostatbiocrnpyler_334638_combined_model_of__biocrnpyler_702329_biocrnpyler_334638_combined_k*complex_enzyme_gapN_2x_metabolite_nadp_2x_molecule_g3p_ATP_rheostatbiocrnpyler_334638_combined_model_of__biocrnpyler_702329_biocrnpyler_334638_1_combined;
    r20_1_ATP_rheostatbiocrnpyler_334638_combined_model_of__biocrnpyler_702329_biocrnpyler_334638_combined_k = 5400;
  r22_ATP_rheostatbiocrnpyler_334638_combined_model_of__biocrnpyler_702329_biocrnpyler_334638_combined: complex_enzyme_gapN_2x_metabolite_nadp_2x_molecule_g3p_ATP_rheostatbiocrnpyler_334638_combined_model_of__biocrnpyler_702329_biocrnpyler_334638_1_combined => complex_enzyme_gapN_2x_metabolite_nadph_2x_molecule_3pg_ATP_rheostatbiocrnpyler_334638_combined_model_of__biocrnpyler_702329_biocrnpyler_334638_1_combined; r22_ATP_rheostatbiocrnpyler_334638_combined_model_of__biocrnpyler_702329_biocrnpyler_334638_combined_k*complex_enzyme_gapN_2x_metabolite_nadp_2x_molecule_g3p_ATP_rheostatbiocrnpyler_334638_combined_model_of__biocrnpyler_702329_biocrnpyler_334638_1_combined;
    r22_ATP_rheostatbiocrnpyler_334638_combined_model_of__biocrnpyler_702329_biocrnpyler_334638_combined_k = 36000;
  r23_ATP_rheostatbiocrnpyler_334638_combined_model_of__biocrnpyler_702329_biocrnpyler_334638_combined: complex_enzyme_gapN_2x_metabolite_nadph_2x_molecule_3pg_ATP_rheostatbiocrnpyler_334638_combined_model_of__biocrnpyler_702329_biocrnpyler_334638_1_combined => enzyme_gapN_ATP_rheostatbiocrnpyler_334638_combined_model_of__biocrnpyler_702329_biocrnpyler_334638_1_combined + 2 molecule_3pg_ATP_rheostatbiocrnpyler_334638_combined_model_of__biocrnpyler_702329_biocrnpyler_334638_1_combined + 2 metabolite_nadph_ATP_rheostatbiocrnpyler_334638_combined_model_of__biocrnpyler_702329_biocrnpyler_334638_1_combined; r23_ATP_rheostatbiocrnpyler_334638_combined_model_of__biocrnpyler_702329_biocrnpyler_334638_combined_k*complex_enzyme_gapN_2x_metabolite_nadph_2x_molecule_3pg_ATP_rheostatbiocrnpyler_334638_combined_model_of__biocrnpyler_702329_biocrnpyler_334638_1_combined;
    r23_ATP_rheostatbiocrnpyler_334638_combined_model_of__biocrnpyler_702329_biocrnpyler_334638_combined_k = 54000;
  r23_1_ATP_rheostatbiocrnpyler_334638_combined_model_of__biocrnpyler_702329_biocrnpyler_334638_combined: enzyme_gapN_ATP_rheostatbiocrnpyler_334638_combined_model_of__biocrnpyler_702329_biocrnpyler_334638_1_combined + 2 molecule_3pg_ATP_rheostatbiocrnpyler_334638_combined_model_of__biocrnpyler_702329_biocrnpyler_334638_1_combined + 2 metabolite_nadph_ATP_rheostatbiocrnpyler_334638_combined_model_of__biocrnpyler_702329_biocrnpyler_334638_1_combined => complex_enzyme_gapN_2x_metabolite_nadph_2x_molecule_3pg_ATP_rheostatbiocrnpyler_334638_combined_model_of__biocrnpyler_702329_biocrnpyler_334638_1_combined; r23_1_ATP_rheostatbiocrnpyler_334638_combined_model_of__biocrnpyler_702329_biocrnpyler_334638_combined_k*enzyme_gapN_ATP_rheostatbiocrnpyler_334638_combined_model_of__biocrnpyler_702329_biocrnpyler_334638_1_combined*molecule_3pg_ATP_rheostatbiocrnpyler_334638_combined_model_of__biocrnpyler_702329_biocrnpyler_334638_1_combined^2*metabolite_nadph_ATP_rheostatbiocrnpyler_334638_combined_model_of__biocrnpyler_702329_biocrnpyler_334638_1_combined^2;
    r23_1_ATP_rheostatbiocrnpyler_334638_combined_model_of__biocrnpyler_702329_biocrnpyler_334638_combined_k = 5400;
  r25_ATP_rheostatbiocrnpyler_334638_combined_model_of__biocrnpyler_702329_biocrnpyler_334638_combined: enzyme_mGapDH_ATP_rheostatbiocrnpyler_334638_combined_model_of__biocrnpyler_702329_biocrnpyler_334638_1_combined + P_exsAbiocrnpyler_702329_1_combined_combined_model_of__biocrnpyler_702329_biocrnpyler_334638_1_combined + 2 metabolite_nadp_ATP_rheostatbiocrnpyler_334638_combined_model_of__biocrnpyler_702329_biocrnpyler_334638_1_combined + 2 molecule_g3p_ATP_rheostatbiocrnpyler_334638_combined_model_of__biocrnpyler_702329_biocrnpyler_334638_1_combined => complex_enzyme_mGapDH_2x_metabolite_nadp_metabolite_pi_2x_molecule_g3p_ATP_rheostatbiocrnpyler_334638_combined_model_of__biocrnpyler_702329_biocrnpyler_334638_1_combined; r25_ATP_rheostatbiocrnpyler_334638_combined_model_of__biocrnpyler_702329_biocrnpyler_334638_combined_k*enzyme_mGapDH_ATP_rheostatbiocrnpyler_334638_combined_model_of__biocrnpyler_702329_biocrnpyler_334638_1_combined*P_exsAbiocrnpyler_702329_1_combined_combined_model_of__biocrnpyler_702329_biocrnpyler_334638_1_combined*metabolite_nadp_ATP_rheostatbiocrnpyler_334638_combined_model_of__biocrnpyler_702329_biocrnpyler_334638_1_combined^2*molecule_g3p_ATP_rheostatbiocrnpyler_334638_combined_model_of__biocrnpyler_702329_biocrnpyler_334638_1_combined^2;
    r25_ATP_rheostatbiocrnpyler_334638_combined_model_of__biocrnpyler_702329_biocrnpyler_334638_combined_k = 54000;
  r25_1_ATP_rheostatbiocrnpyler_334638_combined_model_of__biocrnpyler_702329_biocrnpyler_334638_combined: complex_enzyme_mGapDH_2x_metabolite_nadp_metabolite_pi_2x_molecule_g3p_ATP_rheostatbiocrnpyler_334638_combined_model_of__biocrnpyler_702329_biocrnpyler_334638_1_combined => enzyme_mGapDH_ATP_rheostatbiocrnpyler_334638_combined_model_of__biocrnpyler_702329_biocrnpyler_334638_1_combined + P_exsAbiocrnpyler_702329_1_combined_combined_model_of__biocrnpyler_702329_biocrnpyler_334638_1_combined + 2 metabolite_nadp_ATP_rheostatbiocrnpyler_334638_combined_model_of__biocrnpyler_702329_biocrnpyler_334638_1_combined + 2 molecule_g3p_ATP_rheostatbiocrnpyler_334638_combined_model_of__biocrnpyler_702329_biocrnpyler_334638_1_combined; r25_1_ATP_rheostatbiocrnpyler_334638_combined_model_of__biocrnpyler_702329_biocrnpyler_334638_combined_k*complex_enzyme_mGapDH_2x_metabolite_nadp_metabolite_pi_2x_molecule_g3p_ATP_rheostatbiocrnpyler_334638_combined_model_of__biocrnpyler_702329_biocrnpyler_334638_1_combined;
    r25_1_ATP_rheostatbiocrnpyler_334638_combined_model_of__biocrnpyler_702329_biocrnpyler_334638_combined_k = 5400;
  r27_ATP_rheostatbiocrnpyler_334638_combined_model_of__biocrnpyler_702329_biocrnpyler_334638_combined: complex_enzyme_mGapDH_2x_metabolite_nadp_metabolite_pi_2x_molecule_g3p_ATP_rheostatbiocrnpyler_334638_combined_model_of__biocrnpyler_702329_biocrnpyler_334638_1_combined => complex_enzyme_mGapDH_2x_metabolite_nadph_molecule_13bpg_ATP_rheostatbiocrnpyler_334638_combined_model_of__biocrnpyler_702329_biocrnpyler_334638_1_combined; r27_ATP_rheostatbiocrnpyler_334638_combined_model_of__biocrnpyler_702329_biocrnpyler_334638_combined_k*complex_enzyme_mGapDH_2x_metabolite_nadp_metabolite_pi_2x_molecule_g3p_ATP_rheostatbiocrnpyler_334638_combined_model_of__biocrnpyler_702329_biocrnpyler_334638_1_combined;
    r27_ATP_rheostatbiocrnpyler_334638_combined_model_of__biocrnpyler_702329_biocrnpyler_334638_combined_k = 36000;
  r28_ATP_rheostatbiocrnpyler_334638_combined_model_of__biocrnpyler_702329_biocrnpyler_334638_combined: complex_enzyme_mGapDH_2x_metabolite_nadph_molecule_13bpg_ATP_rheostatbiocrnpyler_334638_combined_model_of__biocrnpyler_702329_biocrnpyler_334638_1_combined => enzyme_mGapDH_ATP_rheostatbiocrnpyler_334638_combined_model_of__biocrnpyler_702329_biocrnpyler_334638_1_combined + molecule_13bpg_ATP_rheostatbiocrnpyler_334638_combined_model_of__biocrnpyler_702329_biocrnpyler_334638_1_combined + 2 metabolite_nadph_ATP_rheostatbiocrnpyler_334638_combined_model_of__biocrnpyler_702329_biocrnpyler_334638_1_combined; r28_ATP_rheostatbiocrnpyler_334638_combined_model_of__biocrnpyler_702329_biocrnpyler_334638_combined_k*complex_enzyme_mGapDH_2x_metabolite_nadph_molecule_13bpg_ATP_rheostatbiocrnpyler_334638_combined_model_of__biocrnpyler_702329_biocrnpyler_334638_1_combined;
    r28_ATP_rheostatbiocrnpyler_334638_combined_model_of__biocrnpyler_702329_biocrnpyler_334638_combined_k = 54000;
  r28_1_ATP_rheostatbiocrnpyler_334638_combined_model_of__biocrnpyler_702329_biocrnpyler_334638_combined: enzyme_mGapDH_ATP_rheostatbiocrnpyler_334638_combined_model_of__biocrnpyler_702329_biocrnpyler_334638_1_combined + molecule_13bpg_ATP_rheostatbiocrnpyler_334638_combined_model_of__biocrnpyler_702329_biocrnpyler_334638_1_combined + 2 metabolite_nadph_ATP_rheostatbiocrnpyler_334638_combined_model_of__biocrnpyler_702329_biocrnpyler_334638_1_combined => complex_enzyme_mGapDH_2x_metabolite_nadph_molecule_13bpg_ATP_rheostatbiocrnpyler_334638_combined_model_of__biocrnpyler_702329_biocrnpyler_334638_1_combined; r28_1_ATP_rheostatbiocrnpyler_334638_combined_model_of__biocrnpyler_702329_biocrnpyler_334638_combined_k*enzyme_mGapDH_ATP_rheostatbiocrnpyler_334638_combined_model_of__biocrnpyler_702329_biocrnpyler_334638_1_combined*molecule_13bpg_ATP_rheostatbiocrnpyler_334638_combined_model_of__biocrnpyler_702329_biocrnpyler_334638_1_combined*metabolite_nadph_ATP_rheostatbiocrnpyler_334638_combined_model_of__biocrnpyler_702329_biocrnpyler_334638_1_combined^2;
    r28_1_ATP_rheostatbiocrnpyler_334638_combined_model_of__biocrnpyler_702329_biocrnpyler_334638_combined_k = 5400;
  r30_ATP_rheostatbiocrnpyler_334638_combined_model_of__biocrnpyler_702329_biocrnpyler_334638_combined: enzyme_pgk_ATP_rheostatbiocrnpyler_334638_combined_model_of__biocrnpyler_702329_biocrnpyler_334638_1_combined + ADP_exsAbiocrnpyler_702329_1_combined_combined_model_of__biocrnpyler_702329_biocrnpyler_334638_1_combined + molecule_13bpg_ATP_rheostatbiocrnpyler_334638_combined_model_of__biocrnpyler_702329_biocrnpyler_334638_1_combined => complex_enzyme_pgk_metabolite_adp_molecule_13bpg_ATP_rheostatbiocrnpyler_334638_combined_model_of__biocrnpyler_702329_biocrnpyler_334638_1_combined; r30_ATP_rheostatbiocrnpyler_334638_combined_model_of__biocrnpyler_702329_biocrnpyler_334638_combined_k*enzyme_pgk_ATP_rheostatbiocrnpyler_334638_combined_model_of__biocrnpyler_702329_biocrnpyler_334638_1_combined*ADP_exsAbiocrnpyler_702329_1_combined_combined_model_of__biocrnpyler_702329_biocrnpyler_334638_1_combined*molecule_13bpg_ATP_rheostatbiocrnpyler_334638_combined_model_of__biocrnpyler_702329_biocrnpyler_334638_1_combined;
    r30_ATP_rheostatbiocrnpyler_334638_combined_model_of__biocrnpyler_702329_biocrnpyler_334638_combined_k = 54000;
  r30_1_ATP_rheostatbiocrnpyler_334638_combined_model_of__biocrnpyler_702329_biocrnpyler_334638_combined: complex_enzyme_pgk_metabolite_adp_molecule_13bpg_ATP_rheostatbiocrnpyler_334638_combined_model_of__biocrnpyler_702329_biocrnpyler_334638_1_combined => enzyme_pgk_ATP_rheostatbiocrnpyler_334638_combined_model_of__biocrnpyler_702329_biocrnpyler_334638_1_combined + ADP_exsAbiocrnpyler_702329_1_combined_combined_model_of__biocrnpyler_702329_biocrnpyler_334638_1_combined + molecule_13bpg_ATP_rheostatbiocrnpyler_334638_combined_model_of__biocrnpyler_702329_biocrnpyler_334638_1_combined; r30_1_ATP_rheostatbiocrnpyler_334638_combined_model_of__biocrnpyler_702329_biocrnpyler_334638_combined_k*complex_enzyme_pgk_metabolite_adp_molecule_13bpg_ATP_rheostatbiocrnpyler_334638_combined_model_of__biocrnpyler_702329_biocrnpyler_334638_1_combined;
    r30_1_ATP_rheostatbiocrnpyler_334638_combined_model_of__biocrnpyler_702329_biocrnpyler_334638_combined_k = 5400;
  r32_ATP_rheostatbiocrnpyler_334638_combined_model_of__biocrnpyler_702329_biocrnpyler_334638_combined: complex_enzyme_pgk_metabolite_adp_molecule_13bpg_ATP_rheostatbiocrnpyler_334638_combined_model_of__biocrnpyler_702329_biocrnpyler_334638_1_combined => complex_enzyme_pgk_metabolite_atp_2x_molecule_3pg_ATP_rheostatbiocrnpyler_334638_combined_model_of__biocrnpyler_702329_biocrnpyler_334638_1_combined; r32_ATP_rheostatbiocrnpyler_334638_combined_model_of__biocrnpyler_702329_biocrnpyler_334638_combined_k*complex_enzyme_pgk_metabolite_adp_molecule_13bpg_ATP_rheostatbiocrnpyler_334638_combined_model_of__biocrnpyler_702329_biocrnpyler_334638_1_combined;
    r32_ATP_rheostatbiocrnpyler_334638_combined_model_of__biocrnpyler_702329_biocrnpyler_334638_combined_k = 36000;
  r33_ATP_rheostatbiocrnpyler_334638_combined_model_of__biocrnpyler_702329_biocrnpyler_334638_combined: complex_enzyme_pgk_metabolite_atp_2x_molecule_3pg_ATP_rheostatbiocrnpyler_334638_combined_model_of__biocrnpyler_702329_biocrnpyler_334638_1_combined => enzyme_pgk_ATP_rheostatbiocrnpyler_334638_combined_model_of__biocrnpyler_702329_biocrnpyler_334638_1_combined + 2 molecule_3pg_ATP_rheostatbiocrnpyler_334638_combined_model_of__biocrnpyler_702329_biocrnpyler_334638_1_combined + ATP_exsAbiocrnpyler_702329_1_combined_combined_model_of__biocrnpyler_702329_biocrnpyler_334638_1_combined; r33_ATP_rheostatbiocrnpyler_334638_combined_model_of__biocrnpyler_702329_biocrnpyler_334638_combined_k*complex_enzyme_pgk_metabolite_atp_2x_molecule_3pg_ATP_rheostatbiocrnpyler_334638_combined_model_of__biocrnpyler_702329_biocrnpyler_334638_1_combined;
    r33_ATP_rheostatbiocrnpyler_334638_combined_model_of__biocrnpyler_702329_biocrnpyler_334638_combined_k = 54000;
  r33_1_ATP_rheostatbiocrnpyler_334638_combined_model_of__biocrnpyler_702329_biocrnpyler_334638_combined: enzyme_pgk_ATP_rheostatbiocrnpyler_334638_combined_model_of__biocrnpyler_702329_biocrnpyler_334638_1_combined + 2 molecule_3pg_ATP_rheostatbiocrnpyler_334638_combined_model_of__biocrnpyler_702329_biocrnpyler_334638_1_combined + ATP_exsAbiocrnpyler_702329_1_combined_combined_model_of__biocrnpyler_702329_biocrnpyler_334638_1_combined => complex_enzyme_pgk_metabolite_atp_2x_molecule_3pg_ATP_rheostatbiocrnpyler_334638_combined_model_of__biocrnpyler_702329_biocrnpyler_334638_1_combined; r33_1_ATP_rheostatbiocrnpyler_334638_combined_model_of__biocrnpyler_702329_biocrnpyler_334638_combined_k*enzyme_pgk_ATP_rheostatbiocrnpyler_334638_combined_model_of__biocrnpyler_702329_biocrnpyler_334638_1_combined*molecule_3pg_ATP_rheostatbiocrnpyler_334638_combined_model_of__biocrnpyler_702329_biocrnpyler_334638_1_combined^2*ATP_exsAbiocrnpyler_702329_1_combined_combined_model_of__biocrnpyler_702329_biocrnpyler_334638_1_combined;
    r33_1_ATP_rheostatbiocrnpyler_334638_combined_model_of__biocrnpyler_702329_biocrnpyler_334638_combined_k = 5400;
  r35_ATP_rheostatbiocrnpyler_334638_combined_model_of__biocrnpyler_702329_biocrnpyler_334638_combined: enzyme_pgm_ATP_rheostatbiocrnpyler_334638_combined_model_of__biocrnpyler_702329_biocrnpyler_334638_1_combined + 2 molecule_3pg_ATP_rheostatbiocrnpyler_334638_combined_model_of__biocrnpyler_702329_biocrnpyler_334638_1_combined => complex_enzyme_pgm_2x_molecule_3pg_ATP_rheostatbiocrnpyler_334638_combined_model_of__biocrnpyler_702329_biocrnpyler_334638_1_combined; r35_ATP_rheostatbiocrnpyler_334638_combined_model_of__biocrnpyler_702329_biocrnpyler_334638_combined_k*enzyme_pgm_ATP_rheostatbiocrnpyler_334638_combined_model_of__biocrnpyler_702329_biocrnpyler_334638_1_combined*molecule_3pg_ATP_rheostatbiocrnpyler_334638_combined_model_of__biocrnpyler_702329_biocrnpyler_334638_1_combined^2;
    r35_ATP_rheostatbiocrnpyler_334638_combined_model_of__biocrnpyler_702329_biocrnpyler_334638_combined_k = 54000;
  r35_1_ATP_rheostatbiocrnpyler_334638_combined_model_of__biocrnpyler_702329_biocrnpyler_334638_combined: complex_enzyme_pgm_2x_molecule_3pg_ATP_rheostatbiocrnpyler_334638_combined_model_of__biocrnpyler_702329_biocrnpyler_334638_1_combined => enzyme_pgm_ATP_rheostatbiocrnpyler_334638_combined_model_of__biocrnpyler_702329_biocrnpyler_334638_1_combined + 2 molecule_3pg_ATP_rheostatbiocrnpyler_334638_combined_model_of__biocrnpyler_702329_biocrnpyler_334638_1_combined; r35_1_ATP_rheostatbiocrnpyler_334638_combined_model_of__biocrnpyler_702329_biocrnpyler_334638_combined_k*complex_enzyme_pgm_2x_molecule_3pg_ATP_rheostatbiocrnpyler_334638_combined_model_of__biocrnpyler_702329_biocrnpyler_334638_1_combined;
    r35_1_ATP_rheostatbiocrnpyler_334638_combined_model_of__biocrnpyler_702329_biocrnpyler_334638_combined_k = 5400;
  r37_ATP_rheostatbiocrnpyler_334638_combined_model_of__biocrnpyler_702329_biocrnpyler_334638_combined: complex_enzyme_pgm_2x_molecule_3pg_ATP_rheostatbiocrnpyler_334638_combined_model_of__biocrnpyler_702329_biocrnpyler_334638_1_combined => complex_enzyme_pgm_2x_molecule_2pg_ATP_rheostatbiocrnpyler_334638_combined_model_of__biocrnpyler_702329_biocrnpyler_334638_1_combined; r37_ATP_rheostatbiocrnpyler_334638_combined_model_of__biocrnpyler_702329_biocrnpyler_334638_combined_k*complex_enzyme_pgm_2x_molecule_3pg_ATP_rheostatbiocrnpyler_334638_combined_model_of__biocrnpyler_702329_biocrnpyler_334638_1_combined;
    r37_ATP_rheostatbiocrnpyler_334638_combined_model_of__biocrnpyler_702329_biocrnpyler_334638_combined_k = 36000;
  r38_ATP_rheostatbiocrnpyler_334638_combined_model_of__biocrnpyler_702329_biocrnpyler_334638_combined: complex_enzyme_pgm_2x_molecule_2pg_ATP_rheostatbiocrnpyler_334638_combined_model_of__biocrnpyler_702329_biocrnpyler_334638_1_combined => enzyme_pgm_ATP_rheostatbiocrnpyler_334638_combined_model_of__biocrnpyler_702329_biocrnpyler_334638_1_combined + 2 molecule_2pg_ATP_rheostatbiocrnpyler_334638_combined_model_of__biocrnpyler_702329_biocrnpyler_334638_1_combined; r38_ATP_rheostatbiocrnpyler_334638_combined_model_of__biocrnpyler_702329_biocrnpyler_334638_combined_k*complex_enzyme_pgm_2x_molecule_2pg_ATP_rheostatbiocrnpyler_334638_combined_model_of__biocrnpyler_702329_biocrnpyler_334638_1_combined;
    r38_ATP_rheostatbiocrnpyler_334638_combined_model_of__biocrnpyler_702329_biocrnpyler_334638_combined_k = 54000;
  r38_1_ATP_rheostatbiocrnpyler_334638_combined_model_of__biocrnpyler_702329_biocrnpyler_334638_combined: enzyme_pgm_ATP_rheostatbiocrnpyler_334638_combined_model_of__biocrnpyler_702329_biocrnpyler_334638_1_combined + 2 molecule_2pg_ATP_rheostatbiocrnpyler_334638_combined_model_of__biocrnpyler_702329_biocrnpyler_334638_1_combined => complex_enzyme_pgm_2x_molecule_2pg_ATP_rheostatbiocrnpyler_334638_combined_model_of__biocrnpyler_702329_biocrnpyler_334638_1_combined; r38_1_ATP_rheostatbiocrnpyler_334638_combined_model_of__biocrnpyler_702329_biocrnpyler_334638_combined_k*enzyme_pgm_ATP_rheostatbiocrnpyler_334638_combined_model_of__biocrnpyler_702329_biocrnpyler_334638_1_combined*molecule_2pg_ATP_rheostatbiocrnpyler_334638_combined_model_of__biocrnpyler_702329_biocrnpyler_334638_1_combined^2;
    r38_1_ATP_rheostatbiocrnpyler_334638_combined_model_of__biocrnpyler_702329_biocrnpyler_334638_combined_k = 5400;
  r40_ATP_rheostatbiocrnpyler_334638_combined_model_of__biocrnpyler_702329_biocrnpyler_334638_combined: enzyme_eno_ATP_rheostatbiocrnpyler_334638_combined_model_of__biocrnpyler_702329_biocrnpyler_334638_1_combined + 2 molecule_2pg_ATP_rheostatbiocrnpyler_334638_combined_model_of__biocrnpyler_702329_biocrnpyler_334638_1_combined => complex_enzyme_eno_2x_molecule_2pg_ATP_rheostatbiocrnpyler_334638_combined_model_of__biocrnpyler_702329_biocrnpyler_334638_1_combined; r40_ATP_rheostatbiocrnpyler_334638_combined_model_of__biocrnpyler_702329_biocrnpyler_334638_combined_k*enzyme_eno_ATP_rheostatbiocrnpyler_334638_combined_model_of__biocrnpyler_702329_biocrnpyler_334638_1_combined*molecule_2pg_ATP_rheostatbiocrnpyler_334638_combined_model_of__biocrnpyler_702329_biocrnpyler_334638_1_combined^2;
    r40_ATP_rheostatbiocrnpyler_334638_combined_model_of__biocrnpyler_702329_biocrnpyler_334638_combined_k = 54000;
  r40_1_ATP_rheostatbiocrnpyler_334638_combined_model_of__biocrnpyler_702329_biocrnpyler_334638_combined: complex_enzyme_eno_2x_molecule_2pg_ATP_rheostatbiocrnpyler_334638_combined_model_of__biocrnpyler_702329_biocrnpyler_334638_1_combined => enzyme_eno_ATP_rheostatbiocrnpyler_334638_combined_model_of__biocrnpyler_702329_biocrnpyler_334638_1_combined + 2 molecule_2pg_ATP_rheostatbiocrnpyler_334638_combined_model_of__biocrnpyler_702329_biocrnpyler_334638_1_combined; r40_1_ATP_rheostatbiocrnpyler_334638_combined_model_of__biocrnpyler_702329_biocrnpyler_334638_combined_k*complex_enzyme_eno_2x_molecule_2pg_ATP_rheostatbiocrnpyler_334638_combined_model_of__biocrnpyler_702329_biocrnpyler_334638_1_combined;
    r40_1_ATP_rheostatbiocrnpyler_334638_combined_model_of__biocrnpyler_702329_biocrnpyler_334638_combined_k = 5400;
  r42_ATP_rheostatbiocrnpyler_334638_combined_model_of__biocrnpyler_702329_biocrnpyler_334638_combined: complex_enzyme_eno_2x_molecule_2pg_ATP_rheostatbiocrnpyler_334638_combined_model_of__biocrnpyler_702329_biocrnpyler_334638_1_combined => complex_enzyme_eno_2x_molecule_pep_ATP_rheostatbiocrnpyler_334638_combined_model_of__biocrnpyler_702329_biocrnpyler_334638_1_combined; r42_ATP_rheostatbiocrnpyler_334638_combined_model_of__biocrnpyler_702329_biocrnpyler_334638_combined_k*complex_enzyme_eno_2x_molecule_2pg_ATP_rheostatbiocrnpyler_334638_combined_model_of__biocrnpyler_702329_biocrnpyler_334638_1_combined;
    r42_ATP_rheostatbiocrnpyler_334638_combined_model_of__biocrnpyler_702329_biocrnpyler_334638_combined_k = 36000;
  r43_ATP_rheostatbiocrnpyler_334638_combined_model_of__biocrnpyler_702329_biocrnpyler_334638_combined: complex_enzyme_eno_2x_molecule_pep_ATP_rheostatbiocrnpyler_334638_combined_model_of__biocrnpyler_702329_biocrnpyler_334638_1_combined => enzyme_eno_ATP_rheostatbiocrnpyler_334638_combined_model_of__biocrnpyler_702329_biocrnpyler_334638_1_combined + 2 molecule_pep_ATP_rheostatbiocrnpyler_334638_combined_model_of__biocrnpyler_702329_biocrnpyler_334638_1_combined; r43_ATP_rheostatbiocrnpyler_334638_combined_model_of__biocrnpyler_702329_biocrnpyler_334638_combined_k*complex_enzyme_eno_2x_molecule_pep_ATP_rheostatbiocrnpyler_334638_combined_model_of__biocrnpyler_702329_biocrnpyler_334638_1_combined;
    r43_ATP_rheostatbiocrnpyler_334638_combined_model_of__biocrnpyler_702329_biocrnpyler_334638_combined_k = 54000;
  r43_1_ATP_rheostatbiocrnpyler_334638_combined_model_of__biocrnpyler_702329_biocrnpyler_334638_combined: enzyme_eno_ATP_rheostatbiocrnpyler_334638_combined_model_of__biocrnpyler_702329_biocrnpyler_334638_1_combined + 2 molecule_pep_ATP_rheostatbiocrnpyler_334638_combined_model_of__biocrnpyler_702329_biocrnpyler_334638_1_combined => complex_enzyme_eno_2x_molecule_pep_ATP_rheostatbiocrnpyler_334638_combined_model_of__biocrnpyler_702329_biocrnpyler_334638_1_combined; r43_1_ATP_rheostatbiocrnpyler_334638_combined_model_of__biocrnpyler_702329_biocrnpyler_334638_combined_k*enzyme_eno_ATP_rheostatbiocrnpyler_334638_combined_model_of__biocrnpyler_702329_biocrnpyler_334638_1_combined*molecule_pep_ATP_rheostatbiocrnpyler_334638_combined_model_of__biocrnpyler_702329_biocrnpyler_334638_1_combined^2;
    r43_1_ATP_rheostatbiocrnpyler_334638_combined_model_of__biocrnpyler_702329_biocrnpyler_334638_combined_k = 5400;
  r45_ATP_rheostatbiocrnpyler_334638_combined_model_of__biocrnpyler_702329_biocrnpyler_334638_combined: enzyme_pyk_ATP_rheostatbiocrnpyler_334638_combined_model_of__biocrnpyler_702329_biocrnpyler_334638_1_combined + 2 ADP_exsAbiocrnpyler_702329_1_combined_combined_model_of__biocrnpyler_702329_biocrnpyler_334638_1_combined + 2 molecule_pep_ATP_rheostatbiocrnpyler_334638_combined_model_of__biocrnpyler_702329_biocrnpyler_334638_1_combined => complex_enzyme_pyk_2x_metabolite_adp_2x_molecule_pep_ATP_rheostatbiocrnpyler_334638_combined_model_of__biocrnpyler_702329_biocrnpyler_334638_1_combined; r45_ATP_rheostatbiocrnpyler_334638_combined_model_of__biocrnpyler_702329_biocrnpyler_334638_combined_k*enzyme_pyk_ATP_rheostatbiocrnpyler_334638_combined_model_of__biocrnpyler_702329_biocrnpyler_334638_1_combined*ADP_exsAbiocrnpyler_702329_1_combined_combined_model_of__biocrnpyler_702329_biocrnpyler_334638_1_combined^2*molecule_pep_ATP_rheostatbiocrnpyler_334638_combined_model_of__biocrnpyler_702329_biocrnpyler_334638_1_combined^2;
    r45_ATP_rheostatbiocrnpyler_334638_combined_model_of__biocrnpyler_702329_biocrnpyler_334638_combined_k = 54000;
  r45_1_ATP_rheostatbiocrnpyler_334638_combined_model_of__biocrnpyler_702329_biocrnpyler_334638_combined: complex_enzyme_pyk_2x_metabolite_adp_2x_molecule_pep_ATP_rheostatbiocrnpyler_334638_combined_model_of__biocrnpyler_702329_biocrnpyler_334638_1_combined => enzyme_pyk_ATP_rheostatbiocrnpyler_334638_combined_model_of__biocrnpyler_702329_biocrnpyler_334638_1_combined + 2 ADP_exsAbiocrnpyler_702329_1_combined_combined_model_of__biocrnpyler_702329_biocrnpyler_334638_1_combined + 2 molecule_pep_ATP_rheostatbiocrnpyler_334638_combined_model_of__biocrnpyler_702329_biocrnpyler_334638_1_combined; r45_1_ATP_rheostatbiocrnpyler_334638_combined_model_of__biocrnpyler_702329_biocrnpyler_334638_combined_k*complex_enzyme_pyk_2x_metabolite_adp_2x_molecule_pep_ATP_rheostatbiocrnpyler_334638_combined_model_of__biocrnpyler_702329_biocrnpyler_334638_1_combined;
    r45_1_ATP_rheostatbiocrnpyler_334638_combined_model_of__biocrnpyler_702329_biocrnpyler_334638_combined_k = 5400;
  r47_ATP_rheostatbiocrnpyler_334638_combined_model_of__biocrnpyler_702329_biocrnpyler_334638_combined: complex_enzyme_pyk_2x_metabolite_adp_2x_molecule_pep_ATP_rheostatbiocrnpyler_334638_combined_model_of__biocrnpyler_702329_biocrnpyler_334638_1_combined => complex_enzyme_pyk_2x_metabolite_atp_2x_molecule_pyruvate_ATP_rheostatbiocrnpyler_334638_combined_model_of__biocrnpyler_702329_biocrnpyler_334638_1_combined; r47_ATP_rheostatbiocrnpyler_334638_combined_model_of__biocrnpyler_702329_biocrnpyler_334638_combined_k*complex_enzyme_pyk_2x_metabolite_adp_2x_molecule_pep_ATP_rheostatbiocrnpyler_334638_combined_model_of__biocrnpyler_702329_biocrnpyler_334638_1_combined;
    r47_ATP_rheostatbiocrnpyler_334638_combined_model_of__biocrnpyler_702329_biocrnpyler_334638_combined_k = 36000;
  r48_ATP_rheostatbiocrnpyler_334638_combined_model_of__biocrnpyler_702329_biocrnpyler_334638_combined: complex_enzyme_pyk_2x_metabolite_atp_2x_molecule_pyruvate_ATP_rheostatbiocrnpyler_334638_combined_model_of__biocrnpyler_702329_biocrnpyler_334638_1_combined => enzyme_pyk_ATP_rheostatbiocrnpyler_334638_combined_model_of__biocrnpyler_702329_biocrnpyler_334638_1_combined + 2 molecule_pyruvate_ATP_rheostatbiocrnpyler_334638_combined_model_of__biocrnpyler_702329_biocrnpyler_334638_1_combined + 2 ATP_exsAbiocrnpyler_702329_1_combined_combined_model_of__biocrnpyler_702329_biocrnpyler_334638_1_combined; r48_ATP_rheostatbiocrnpyler_334638_combined_model_of__biocrnpyler_702329_biocrnpyler_334638_combined_k*complex_enzyme_pyk_2x_metabolite_atp_2x_molecule_pyruvate_ATP_rheostatbiocrnpyler_334638_combined_model_of__biocrnpyler_702329_biocrnpyler_334638_1_combined;
    r48_ATP_rheostatbiocrnpyler_334638_combined_model_of__biocrnpyler_702329_biocrnpyler_334638_combined_k = 54000;
  r48_1_ATP_rheostatbiocrnpyler_334638_combined_model_of__biocrnpyler_702329_biocrnpyler_334638_combined: enzyme_pyk_ATP_rheostatbiocrnpyler_334638_combined_model_of__biocrnpyler_702329_biocrnpyler_334638_1_combined + 2 molecule_pyruvate_ATP_rheostatbiocrnpyler_334638_combined_model_of__biocrnpyler_702329_biocrnpyler_334638_1_combined + 2 ATP_exsAbiocrnpyler_702329_1_combined_combined_model_of__biocrnpyler_702329_biocrnpyler_334638_1_combined => complex_enzyme_pyk_2x_metabolite_atp_2x_molecule_pyruvate_ATP_rheostatbiocrnpyler_334638_combined_model_of__biocrnpyler_702329_biocrnpyler_334638_1_combined; r48_1_ATP_rheostatbiocrnpyler_334638_combined_model_of__biocrnpyler_702329_biocrnpyler_334638_combined_k*enzyme_pyk_ATP_rheostatbiocrnpyler_334638_combined_model_of__biocrnpyler_702329_biocrnpyler_334638_1_combined*molecule_pyruvate_ATP_rheostatbiocrnpyler_334638_combined_model_of__biocrnpyler_702329_biocrnpyler_334638_1_combined^2*ATP_exsAbiocrnpyler_702329_1_combined_combined_model_of__biocrnpyler_702329_biocrnpyler_334638_1_combined^2;
    r48_1_ATP_rheostatbiocrnpyler_334638_combined_model_of__biocrnpyler_702329_biocrnpyler_334638_combined_k = 5400;
  r50_ATP_rheostatbiocrnpyler_334638_combined_model_of__biocrnpyler_702329_biocrnpyler_334638_combined: enzyme_alsS_ATP_rheostatbiocrnpyler_334638_combined_model_of__biocrnpyler_702329_biocrnpyler_334638_1_combined + 2 molecule_pyruvate_ATP_rheostatbiocrnpyler_334638_combined_model_of__biocrnpyler_702329_biocrnpyler_334638_1_combined => complex_enzyme_alsS_2x_molecule_pyruvate_ATP_rheostatbiocrnpyler_334638_combined_model_of__biocrnpyler_702329_biocrnpyler_334638_1_combined; r50_ATP_rheostatbiocrnpyler_334638_combined_model_of__biocrnpyler_702329_biocrnpyler_334638_combined_k*enzyme_alsS_ATP_rheostatbiocrnpyler_334638_combined_model_of__biocrnpyler_702329_biocrnpyler_334638_1_combined*molecule_pyruvate_ATP_rheostatbiocrnpyler_334638_combined_model_of__biocrnpyler_702329_biocrnpyler_334638_1_combined^2;
    r50_ATP_rheostatbiocrnpyler_334638_combined_model_of__biocrnpyler_702329_biocrnpyler_334638_combined_k = 54000;
  r50_1_ATP_rheostatbiocrnpyler_334638_combined_model_of__biocrnpyler_702329_biocrnpyler_334638_combined: complex_enzyme_alsS_2x_molecule_pyruvate_ATP_rheostatbiocrnpyler_334638_combined_model_of__biocrnpyler_702329_biocrnpyler_334638_1_combined => enzyme_alsS_ATP_rheostatbiocrnpyler_334638_combined_model_of__biocrnpyler_702329_biocrnpyler_334638_1_combined + 2 molecule_pyruvate_ATP_rheostatbiocrnpyler_334638_combined_model_of__biocrnpyler_702329_biocrnpyler_334638_1_combined; r50_1_ATP_rheostatbiocrnpyler_334638_combined_model_of__biocrnpyler_702329_biocrnpyler_334638_combined_k*complex_enzyme_alsS_2x_molecule_pyruvate_ATP_rheostatbiocrnpyler_334638_combined_model_of__biocrnpyler_702329_biocrnpyler_334638_1_combined;
    r50_1_ATP_rheostatbiocrnpyler_334638_combined_model_of__biocrnpyler_702329_biocrnpyler_334638_combined_k = 5400;
  r52_ATP_rheostatbiocrnpyler_334638_combined_model_of__biocrnpyler_702329_biocrnpyler_334638_combined: complex_enzyme_alsS_2x_molecule_pyruvate_ATP_rheostatbiocrnpyler_334638_combined_model_of__biocrnpyler_702329_biocrnpyler_334638_1_combined => complex_enzyme_alsS_molecule_acetolac_ATP_rheostatbiocrnpyler_334638_combined_model_of__biocrnpyler_702329_biocrnpyler_334638_1_combined; r52_ATP_rheostatbiocrnpyler_334638_combined_model_of__biocrnpyler_702329_biocrnpyler_334638_combined_k*complex_enzyme_alsS_2x_molecule_pyruvate_ATP_rheostatbiocrnpyler_334638_combined_model_of__biocrnpyler_702329_biocrnpyler_334638_1_combined;
    r52_ATP_rheostatbiocrnpyler_334638_combined_model_of__biocrnpyler_702329_biocrnpyler_334638_combined_k = 36000;
  r53_ATP_rheostatbiocrnpyler_334638_combined_model_of__biocrnpyler_702329_biocrnpyler_334638_combined: complex_enzyme_alsS_molecule_acetolac_ATP_rheostatbiocrnpyler_334638_combined_model_of__biocrnpyler_702329_biocrnpyler_334638_1_combined => enzyme_alsS_ATP_rheostatbiocrnpyler_334638_combined_model_of__biocrnpyler_702329_biocrnpyler_334638_1_combined + molecule_acetolac_ATP_rheostatbiocrnpyler_334638_combined_model_of__biocrnpyler_702329_biocrnpyler_334638_1_combined; r53_ATP_rheostatbiocrnpyler_334638_combined_model_of__biocrnpyler_702329_biocrnpyler_334638_combined_k*complex_enzyme_alsS_molecule_acetolac_ATP_rheostatbiocrnpyler_334638_combined_model_of__biocrnpyler_702329_biocrnpyler_334638_1_combined;
    r53_ATP_rheostatbiocrnpyler_334638_combined_model_of__biocrnpyler_702329_biocrnpyler_334638_combined_k = 54000;
  r53_1_ATP_rheostatbiocrnpyler_334638_combined_model_of__biocrnpyler_702329_biocrnpyler_334638_combined: enzyme_alsS_ATP_rheostatbiocrnpyler_334638_combined_model_of__biocrnpyler_702329_biocrnpyler_334638_1_combined + molecule_acetolac_ATP_rheostatbiocrnpyler_334638_combined_model_of__biocrnpyler_702329_biocrnpyler_334638_1_combined => complex_enzyme_alsS_molecule_acetolac_ATP_rheostatbiocrnpyler_334638_combined_model_of__biocrnpyler_702329_biocrnpyler_334638_1_combined; r53_1_ATP_rheostatbiocrnpyler_334638_combined_model_of__biocrnpyler_702329_biocrnpyler_334638_combined_k*enzyme_alsS_ATP_rheostatbiocrnpyler_334638_combined_model_of__biocrnpyler_702329_biocrnpyler_334638_1_combined*molecule_acetolac_ATP_rheostatbiocrnpyler_334638_combined_model_of__biocrnpyler_702329_biocrnpyler_334638_1_combined;
    r53_1_ATP_rheostatbiocrnpyler_334638_combined_model_of__biocrnpyler_702329_biocrnpyler_334638_combined_k = 5400;
  r55_ATP_rheostatbiocrnpyler_334638_combined_model_of__biocrnpyler_702329_biocrnpyler_334638_combined: enzyme_IlvC_ATP_rheostatbiocrnpyler_334638_combined_model_of__biocrnpyler_702329_biocrnpyler_334638_1_combined + metabolite_nadph_ATP_rheostatbiocrnpyler_334638_combined_model_of__biocrnpyler_702329_biocrnpyler_334638_1_combined + molecule_acetolac_ATP_rheostatbiocrnpyler_334638_combined_model_of__biocrnpyler_702329_biocrnpyler_334638_1_combined => complex_enzyme_IlvC_metabolite_nadph_molecule_acetolac_ATP_rheostatbiocrnpyler_334638_combined_model_of__biocrnpyler_702329_biocrnpyler_334638_1_combined; r55_ATP_rheostatbiocrnpyler_334638_combined_model_of__biocrnpyler_702329_biocrnpyler_334638_combined_k*enzyme_IlvC_ATP_rheostatbiocrnpyler_334638_combined_model_of__biocrnpyler_702329_biocrnpyler_334638_1_combined*metabolite_nadph_ATP_rheostatbiocrnpyler_334638_combined_model_of__biocrnpyler_702329_biocrnpyler_334638_1_combined*molecule_acetolac_ATP_rheostatbiocrnpyler_334638_combined_model_of__biocrnpyler_702329_biocrnpyler_334638_1_combined;
    r55_ATP_rheostatbiocrnpyler_334638_combined_model_of__biocrnpyler_702329_biocrnpyler_334638_combined_k = 54000;
  r55_1_ATP_rheostatbiocrnpyler_334638_combined_model_of__biocrnpyler_702329_biocrnpyler_334638_combined: complex_enzyme_IlvC_metabolite_nadph_molecule_acetolac_ATP_rheostatbiocrnpyler_334638_combined_model_of__biocrnpyler_702329_biocrnpyler_334638_1_combined => enzyme_IlvC_ATP_rheostatbiocrnpyler_334638_combined_model_of__biocrnpyler_702329_biocrnpyler_334638_1_combined + metabolite_nadph_ATP_rheostatbiocrnpyler_334638_combined_model_of__biocrnpyler_702329_biocrnpyler_334638_1_combined + molecule_acetolac_ATP_rheostatbiocrnpyler_334638_combined_model_of__biocrnpyler_702329_biocrnpyler_334638_1_combined; r55_1_ATP_rheostatbiocrnpyler_334638_combined_model_of__biocrnpyler_702329_biocrnpyler_334638_combined_k*complex_enzyme_IlvC_metabolite_nadph_molecule_acetolac_ATP_rheostatbiocrnpyler_334638_combined_model_of__biocrnpyler_702329_biocrnpyler_334638_1_combined;
    r55_1_ATP_rheostatbiocrnpyler_334638_combined_model_of__biocrnpyler_702329_biocrnpyler_334638_combined_k = 5400;
  r57_ATP_rheostatbiocrnpyler_334638_combined_model_of__biocrnpyler_702329_biocrnpyler_334638_combined: complex_enzyme_IlvC_metabolite_nadph_molecule_acetolac_ATP_rheostatbiocrnpyler_334638_combined_model_of__biocrnpyler_702329_biocrnpyler_334638_1_combined => complex_enzyme_IlvC_metabolite_nadp_molecule_23dih3mebut_ATP_rheostatbiocrnpyler_334638_combined_model_of__biocrnpyler_702329_biocrnpyler_334638_1_combined; r57_ATP_rheostatbiocrnpyler_334638_combined_model_of__biocrnpyler_702329_biocrnpyler_334638_combined_k*complex_enzyme_IlvC_metabolite_nadph_molecule_acetolac_ATP_rheostatbiocrnpyler_334638_combined_model_of__biocrnpyler_702329_biocrnpyler_334638_1_combined;
    r57_ATP_rheostatbiocrnpyler_334638_combined_model_of__biocrnpyler_702329_biocrnpyler_334638_combined_k = 36000;
  r58_ATP_rheostatbiocrnpyler_334638_combined_model_of__biocrnpyler_702329_biocrnpyler_334638_combined: complex_enzyme_IlvC_metabolite_nadp_molecule_23dih3mebut_ATP_rheostatbiocrnpyler_334638_combined_model_of__biocrnpyler_702329_biocrnpyler_334638_1_combined => enzyme_IlvC_ATP_rheostatbiocrnpyler_334638_combined_model_of__biocrnpyler_702329_biocrnpyler_334638_1_combined + molecule_23dih3mebut_ATP_rheostatbiocrnpyler_334638_combined_model_of__biocrnpyler_702329_biocrnpyler_334638_1_combined + metabolite_nadp_ATP_rheostatbiocrnpyler_334638_combined_model_of__biocrnpyler_702329_biocrnpyler_334638_1_combined; r58_ATP_rheostatbiocrnpyler_334638_combined_model_of__biocrnpyler_702329_biocrnpyler_334638_combined_k*complex_enzyme_IlvC_metabolite_nadp_molecule_23dih3mebut_ATP_rheostatbiocrnpyler_334638_combined_model_of__biocrnpyler_702329_biocrnpyler_334638_1_combined;
    r58_ATP_rheostatbiocrnpyler_334638_combined_model_of__biocrnpyler_702329_biocrnpyler_334638_combined_k = 54000;
  r58_1_ATP_rheostatbiocrnpyler_334638_combined_model_of__biocrnpyler_702329_biocrnpyler_334638_combined: enzyme_IlvC_ATP_rheostatbiocrnpyler_334638_combined_model_of__biocrnpyler_702329_biocrnpyler_334638_1_combined + molecule_23dih3mebut_ATP_rheostatbiocrnpyler_334638_combined_model_of__biocrnpyler_702329_biocrnpyler_334638_1_combined + metabolite_nadp_ATP_rheostatbiocrnpyler_334638_combined_model_of__biocrnpyler_702329_biocrnpyler_334638_1_combined => complex_enzyme_IlvC_metabolite_nadp_molecule_23dih3mebut_ATP_rheostatbiocrnpyler_334638_combined_model_of__biocrnpyler_702329_biocrnpyler_334638_1_combined; r58_1_ATP_rheostatbiocrnpyler_334638_combined_model_of__biocrnpyler_702329_biocrnpyler_334638_combined_k*enzyme_IlvC_ATP_rheostatbiocrnpyler_334638_combined_model_of__biocrnpyler_702329_biocrnpyler_334638_1_combined*molecule_23dih3mebut_ATP_rheostatbiocrnpyler_334638_combined_model_of__biocrnpyler_702329_biocrnpyler_334638_1_combined*metabolite_nadp_ATP_rheostatbiocrnpyler_334638_combined_model_of__biocrnpyler_702329_biocrnpyler_334638_1_combined;
    r58_1_ATP_rheostatbiocrnpyler_334638_combined_model_of__biocrnpyler_702329_biocrnpyler_334638_combined_k = 5400;
  r60_ATP_rheostatbiocrnpyler_334638_combined_model_of__biocrnpyler_702329_biocrnpyler_334638_combined: enzyme_IlvD_ATP_rheostatbiocrnpyler_334638_combined_model_of__biocrnpyler_702329_biocrnpyler_334638_1_combined + molecule_23dih3mebut_ATP_rheostatbiocrnpyler_334638_combined_model_of__biocrnpyler_702329_biocrnpyler_334638_1_combined => complex_enzyme_IlvD_molecule_23dih3mebut_ATP_rheostatbiocrnpyler_334638_combined_model_of__biocrnpyler_702329_biocrnpyler_334638_1_combined; r60_ATP_rheostatbiocrnpyler_334638_combined_model_of__biocrnpyler_702329_biocrnpyler_334638_combined_k*enzyme_IlvD_ATP_rheostatbiocrnpyler_334638_combined_model_of__biocrnpyler_702329_biocrnpyler_334638_1_combined*molecule_23dih3mebut_ATP_rheostatbiocrnpyler_334638_combined_model_of__biocrnpyler_702329_biocrnpyler_334638_1_combined;
    r60_ATP_rheostatbiocrnpyler_334638_combined_model_of__biocrnpyler_702329_biocrnpyler_334638_combined_k = 54000;
  r60_1_ATP_rheostatbiocrnpyler_334638_combined_model_of__biocrnpyler_702329_biocrnpyler_334638_combined: complex_enzyme_IlvD_molecule_23dih3mebut_ATP_rheostatbiocrnpyler_334638_combined_model_of__biocrnpyler_702329_biocrnpyler_334638_1_combined => enzyme_IlvD_ATP_rheostatbiocrnpyler_334638_combined_model_of__biocrnpyler_702329_biocrnpyler_334638_1_combined + molecule_23dih3mebut_ATP_rheostatbiocrnpyler_334638_combined_model_of__biocrnpyler_702329_biocrnpyler_334638_1_combined; r60_1_ATP_rheostatbiocrnpyler_334638_combined_model_of__biocrnpyler_702329_biocrnpyler_334638_combined_k*complex_enzyme_IlvD_molecule_23dih3mebut_ATP_rheostatbiocrnpyler_334638_combined_model_of__biocrnpyler_702329_biocrnpyler_334638_1_combined;
    r60_1_ATP_rheostatbiocrnpyler_334638_combined_model_of__biocrnpyler_702329_biocrnpyler_334638_combined_k = 5400;
  r62_ATP_rheostatbiocrnpyler_334638_combined_model_of__biocrnpyler_702329_biocrnpyler_334638_combined: complex_enzyme_IlvD_molecule_23dih3mebut_ATP_rheostatbiocrnpyler_334638_combined_model_of__biocrnpyler_702329_biocrnpyler_334638_1_combined => complex_enzyme_IlvD_molecule_3me2oxo_ATP_rheostatbiocrnpyler_334638_combined_model_of__biocrnpyler_702329_biocrnpyler_334638_1_combined; r62_ATP_rheostatbiocrnpyler_334638_combined_model_of__biocrnpyler_702329_biocrnpyler_334638_combined_k*complex_enzyme_IlvD_molecule_23dih3mebut_ATP_rheostatbiocrnpyler_334638_combined_model_of__biocrnpyler_702329_biocrnpyler_334638_1_combined;
    r62_ATP_rheostatbiocrnpyler_334638_combined_model_of__biocrnpyler_702329_biocrnpyler_334638_combined_k = 36000;
  r63_ATP_rheostatbiocrnpyler_334638_combined_model_of__biocrnpyler_702329_biocrnpyler_334638_combined: complex_enzyme_IlvD_molecule_3me2oxo_ATP_rheostatbiocrnpyler_334638_combined_model_of__biocrnpyler_702329_biocrnpyler_334638_1_combined => enzyme_IlvD_ATP_rheostatbiocrnpyler_334638_combined_model_of__biocrnpyler_702329_biocrnpyler_334638_1_combined + molecule_3me2oxo_ATP_rheostatbiocrnpyler_334638_combined_model_of__biocrnpyler_702329_biocrnpyler_334638_1_combined; r63_ATP_rheostatbiocrnpyler_334638_combined_model_of__biocrnpyler_702329_biocrnpyler_334638_combined_k*complex_enzyme_IlvD_molecule_3me2oxo_ATP_rheostatbiocrnpyler_334638_combined_model_of__biocrnpyler_702329_biocrnpyler_334638_1_combined;
    r63_ATP_rheostatbiocrnpyler_334638_combined_model_of__biocrnpyler_702329_biocrnpyler_334638_combined_k = 54000;
  r63_1_ATP_rheostatbiocrnpyler_334638_combined_model_of__biocrnpyler_702329_biocrnpyler_334638_combined: enzyme_IlvD_ATP_rheostatbiocrnpyler_334638_combined_model_of__biocrnpyler_702329_biocrnpyler_334638_1_combined + molecule_3me2oxo_ATP_rheostatbiocrnpyler_334638_combined_model_of__biocrnpyler_702329_biocrnpyler_334638_1_combined => complex_enzyme_IlvD_molecule_3me2oxo_ATP_rheostatbiocrnpyler_334638_combined_model_of__biocrnpyler_702329_biocrnpyler_334638_1_combined; r63_1_ATP_rheostatbiocrnpyler_334638_combined_model_of__biocrnpyler_702329_biocrnpyler_334638_combined_k*enzyme_IlvD_ATP_rheostatbiocrnpyler_334638_combined_model_of__biocrnpyler_702329_biocrnpyler_334638_1_combined*molecule_3me2oxo_ATP_rheostatbiocrnpyler_334638_combined_model_of__biocrnpyler_702329_biocrnpyler_334638_1_combined;
    r63_1_ATP_rheostatbiocrnpyler_334638_combined_model_of__biocrnpyler_702329_biocrnpyler_334638_combined_k = 5400;
  r65_ATP_rheostatbiocrnpyler_334638_combined_model_of__biocrnpyler_702329_biocrnpyler_334638_combined: enzyme_kivD_ATP_rheostatbiocrnpyler_334638_combined_model_of__biocrnpyler_702329_biocrnpyler_334638_1_combined + molecule_3me2oxo_ATP_rheostatbiocrnpyler_334638_combined_model_of__biocrnpyler_702329_biocrnpyler_334638_1_combined => complex_enzyme_kivD_molecule_3me2oxo_ATP_rheostatbiocrnpyler_334638_combined_model_of__biocrnpyler_702329_biocrnpyler_334638_1_combined; r65_ATP_rheostatbiocrnpyler_334638_combined_model_of__biocrnpyler_702329_biocrnpyler_334638_combined_k*enzyme_kivD_ATP_rheostatbiocrnpyler_334638_combined_model_of__biocrnpyler_702329_biocrnpyler_334638_1_combined*molecule_3me2oxo_ATP_rheostatbiocrnpyler_334638_combined_model_of__biocrnpyler_702329_biocrnpyler_334638_1_combined;
    r65_ATP_rheostatbiocrnpyler_334638_combined_model_of__biocrnpyler_702329_biocrnpyler_334638_combined_k = 54000;
  r65_1_ATP_rheostatbiocrnpyler_334638_combined_model_of__biocrnpyler_702329_biocrnpyler_334638_combined: complex_enzyme_kivD_molecule_3me2oxo_ATP_rheostatbiocrnpyler_334638_combined_model_of__biocrnpyler_702329_biocrnpyler_334638_1_combined => enzyme_kivD_ATP_rheostatbiocrnpyler_334638_combined_model_of__biocrnpyler_702329_biocrnpyler_334638_1_combined + molecule_3me2oxo_ATP_rheostatbiocrnpyler_334638_combined_model_of__biocrnpyler_702329_biocrnpyler_334638_1_combined; r65_1_ATP_rheostatbiocrnpyler_334638_combined_model_of__biocrnpyler_702329_biocrnpyler_334638_combined_k*complex_enzyme_kivD_molecule_3me2oxo_ATP_rheostatbiocrnpyler_334638_combined_model_of__biocrnpyler_702329_biocrnpyler_334638_1_combined;
    r65_1_ATP_rheostatbiocrnpyler_334638_combined_model_of__biocrnpyler_702329_biocrnpyler_334638_combined_k = 5400;
  r67_ATP_rheostatbiocrnpyler_334638_combined_model_of__biocrnpyler_702329_biocrnpyler_334638_combined: complex_enzyme_kivD_molecule_3me2oxo_ATP_rheostatbiocrnpyler_334638_combined_model_of__biocrnpyler_702329_biocrnpyler_334638_1_combined => complex_enzyme_kivD_molecule_isobutanal_ATP_rheostatbiocrnpyler_334638_combined_model_of__biocrnpyler_702329_biocrnpyler_334638_1_combined; r67_ATP_rheostatbiocrnpyler_334638_combined_model_of__biocrnpyler_702329_biocrnpyler_334638_combined_k*complex_enzyme_kivD_molecule_3me2oxo_ATP_rheostatbiocrnpyler_334638_combined_model_of__biocrnpyler_702329_biocrnpyler_334638_1_combined;
    r67_ATP_rheostatbiocrnpyler_334638_combined_model_of__biocrnpyler_702329_biocrnpyler_334638_combined_k = 36000;
  r68_ATP_rheostatbiocrnpyler_334638_combined_model_of__biocrnpyler_702329_biocrnpyler_334638_combined: complex_enzyme_kivD_molecule_isobutanal_ATP_rheostatbiocrnpyler_334638_combined_model_of__biocrnpyler_702329_biocrnpyler_334638_1_combined => enzyme_kivD_ATP_rheostatbiocrnpyler_334638_combined_model_of__biocrnpyler_702329_biocrnpyler_334638_1_combined + molecule_isobutanal_ATP_rheostatbiocrnpyler_334638_combined_model_of__biocrnpyler_702329_biocrnpyler_334638_1_combined; r68_ATP_rheostatbiocrnpyler_334638_combined_model_of__biocrnpyler_702329_biocrnpyler_334638_combined_k*complex_enzyme_kivD_molecule_isobutanal_ATP_rheostatbiocrnpyler_334638_combined_model_of__biocrnpyler_702329_biocrnpyler_334638_1_combined;
    r68_ATP_rheostatbiocrnpyler_334638_combined_model_of__biocrnpyler_702329_biocrnpyler_334638_combined_k = 54000;
  r68_1_ATP_rheostatbiocrnpyler_334638_combined_model_of__biocrnpyler_702329_biocrnpyler_334638_combined: enzyme_kivD_ATP_rheostatbiocrnpyler_334638_combined_model_of__biocrnpyler_702329_biocrnpyler_334638_1_combined + molecule_isobutanal_ATP_rheostatbiocrnpyler_334638_combined_model_of__biocrnpyler_702329_biocrnpyler_334638_1_combined => complex_enzyme_kivD_molecule_isobutanal_ATP_rheostatbiocrnpyler_334638_combined_model_of__biocrnpyler_702329_biocrnpyler_334638_1_combined; r68_1_ATP_rheostatbiocrnpyler_334638_combined_model_of__biocrnpyler_702329_biocrnpyler_334638_combined_k*enzyme_kivD_ATP_rheostatbiocrnpyler_334638_combined_model_of__biocrnpyler_702329_biocrnpyler_334638_1_combined*molecule_isobutanal_ATP_rheostatbiocrnpyler_334638_combined_model_of__biocrnpyler_702329_biocrnpyler_334638_1_combined;
    r68_1_ATP_rheostatbiocrnpyler_334638_combined_model_of__biocrnpyler_702329_biocrnpyler_334638_combined_k = 5400;
  r70_ATP_rheostatbiocrnpyler_334638_combined_model_of__biocrnpyler_702329_biocrnpyler_334638_combined: enzyme_yahk_ATP_rheostatbiocrnpyler_334638_combined_model_of__biocrnpyler_702329_biocrnpyler_334638_1_combined + metabolite_nadph_ATP_rheostatbiocrnpyler_334638_combined_model_of__biocrnpyler_702329_biocrnpyler_334638_1_combined + molecule_isobutanal_ATP_rheostatbiocrnpyler_334638_combined_model_of__biocrnpyler_702329_biocrnpyler_334638_1_combined => complex_enzyme_yahk_metabolite_nadph_molecule_isobutanal_ATP_rheostatbiocrnpyler_334638_combined_model_of__biocrnpyler_702329_biocrnpyler_334638_1_combined; r70_ATP_rheostatbiocrnpyler_334638_combined_model_of__biocrnpyler_702329_biocrnpyler_334638_combined_k*enzyme_yahk_ATP_rheostatbiocrnpyler_334638_combined_model_of__biocrnpyler_702329_biocrnpyler_334638_1_combined*metabolite_nadph_ATP_rheostatbiocrnpyler_334638_combined_model_of__biocrnpyler_702329_biocrnpyler_334638_1_combined*molecule_isobutanal_ATP_rheostatbiocrnpyler_334638_combined_model_of__biocrnpyler_702329_biocrnpyler_334638_1_combined;
    r70_ATP_rheostatbiocrnpyler_334638_combined_model_of__biocrnpyler_702329_biocrnpyler_334638_combined_k = 54000;
  r70_1_ATP_rheostatbiocrnpyler_334638_combined_model_of__biocrnpyler_702329_biocrnpyler_334638_combined: complex_enzyme_yahk_metabolite_nadph_molecule_isobutanal_ATP_rheostatbiocrnpyler_334638_combined_model_of__biocrnpyler_702329_biocrnpyler_334638_1_combined => enzyme_yahk_ATP_rheostatbiocrnpyler_334638_combined_model_of__biocrnpyler_702329_biocrnpyler_334638_1_combined + metabolite_nadph_ATP_rheostatbiocrnpyler_334638_combined_model_of__biocrnpyler_702329_biocrnpyler_334638_1_combined + molecule_isobutanal_ATP_rheostatbiocrnpyler_334638_combined_model_of__biocrnpyler_702329_biocrnpyler_334638_1_combined; r70_1_ATP_rheostatbiocrnpyler_334638_combined_model_of__biocrnpyler_702329_biocrnpyler_334638_combined_k*complex_enzyme_yahk_metabolite_nadph_molecule_isobutanal_ATP_rheostatbiocrnpyler_334638_combined_model_of__biocrnpyler_702329_biocrnpyler_334638_1_combined;
    r70_1_ATP_rheostatbiocrnpyler_334638_combined_model_of__biocrnpyler_702329_biocrnpyler_334638_combined_k = 5400;
  r72_ATP_rheostatbiocrnpyler_334638_combined_model_of__biocrnpyler_702329_biocrnpyler_334638_combined: complex_enzyme_yahk_metabolite_nadph_molecule_isobutanal_ATP_rheostatbiocrnpyler_334638_combined_model_of__biocrnpyler_702329_biocrnpyler_334638_1_combined => complex_enzyme_yahk_metabolite_nadp_molecule_isobutanol_ATP_rheostatbiocrnpyler_334638_combined_model_of__biocrnpyler_702329_biocrnpyler_334638_1_combined; r72_ATP_rheostatbiocrnpyler_334638_combined_model_of__biocrnpyler_702329_biocrnpyler_334638_combined_k*complex_enzyme_yahk_metabolite_nadph_molecule_isobutanal_ATP_rheostatbiocrnpyler_334638_combined_model_of__biocrnpyler_702329_biocrnpyler_334638_1_combined;
    r72_ATP_rheostatbiocrnpyler_334638_combined_model_of__biocrnpyler_702329_biocrnpyler_334638_combined_k = 36000;
  r73_ATP_rheostatbiocrnpyler_334638_combined_model_of__biocrnpyler_702329_biocrnpyler_334638_combined: complex_enzyme_yahk_metabolite_nadp_molecule_isobutanol_ATP_rheostatbiocrnpyler_334638_combined_model_of__biocrnpyler_702329_biocrnpyler_334638_1_combined => enzyme_yahk_ATP_rheostatbiocrnpyler_334638_combined_model_of__biocrnpyler_702329_biocrnpyler_334638_1_combined + molecule_isobutanol_ATP_rheostatbiocrnpyler_334638_combined_model_of__biocrnpyler_702329_biocrnpyler_334638_1_combined + metabolite_nadp_ATP_rheostatbiocrnpyler_334638_combined_model_of__biocrnpyler_702329_biocrnpyler_334638_1_combined; r73_ATP_rheostatbiocrnpyler_334638_combined_model_of__biocrnpyler_702329_biocrnpyler_334638_combined_k*complex_enzyme_yahk_metabolite_nadp_molecule_isobutanol_ATP_rheostatbiocrnpyler_334638_combined_model_of__biocrnpyler_702329_biocrnpyler_334638_1_combined;
    r73_ATP_rheostatbiocrnpyler_334638_combined_model_of__biocrnpyler_702329_biocrnpyler_334638_combined_k = 54000;
  r73_1_ATP_rheostatbiocrnpyler_334638_combined_model_of__biocrnpyler_702329_biocrnpyler_334638_combined: enzyme_yahk_ATP_rheostatbiocrnpyler_334638_combined_model_of__biocrnpyler_702329_biocrnpyler_334638_1_combined + molecule_isobutanol_ATP_rheostatbiocrnpyler_334638_combined_model_of__biocrnpyler_702329_biocrnpyler_334638_1_combined + metabolite_nadp_ATP_rheostatbiocrnpyler_334638_combined_model_of__biocrnpyler_702329_biocrnpyler_334638_1_combined => complex_enzyme_yahk_metabolite_nadp_molecule_isobutanol_ATP_rheostatbiocrnpyler_334638_combined_model_of__biocrnpyler_702329_biocrnpyler_334638_1_combined; r73_1_ATP_rheostatbiocrnpyler_334638_combined_model_of__biocrnpyler_702329_biocrnpyler_334638_combined_k*enzyme_yahk_ATP_rheostatbiocrnpyler_334638_combined_model_of__biocrnpyler_702329_biocrnpyler_334638_1_combined*molecule_isobutanol_ATP_rheostatbiocrnpyler_334638_combined_model_of__biocrnpyler_702329_biocrnpyler_334638_1_combined*metabolite_nadp_ATP_rheostatbiocrnpyler_334638_combined_model_of__biocrnpyler_702329_biocrnpyler_334638_1_combined;
    r73_1_ATP_rheostatbiocrnpyler_334638_combined_model_of__biocrnpyler_702329_biocrnpyler_334638_combined_k = 5400;
  r75_ATP_rheostatbiocrnpyler_334638_combined_model_of__biocrnpyler_702329_biocrnpyler_334638_combined: enzyme_atp_use_ATP_rheostatbiocrnpyler_334638_combined_model_of__biocrnpyler_702329_biocrnpyler_334638_1_combined + ATP_exsAbiocrnpyler_702329_1_combined_combined_model_of__biocrnpyler_702329_biocrnpyler_334638_1_combined => complex_enzyme_atp_use_metabolite_atp_ATP_rheostatbiocrnpyler_334638_combined_model_of__biocrnpyler_702329_biocrnpyler_334638_1_combined; r75_ATP_rheostatbiocrnpyler_334638_combined_model_of__biocrnpyler_702329_biocrnpyler_334638_combined_k*enzyme_atp_use_ATP_rheostatbiocrnpyler_334638_combined_model_of__biocrnpyler_702329_biocrnpyler_334638_1_combined*ATP_exsAbiocrnpyler_702329_1_combined_combined_model_of__biocrnpyler_702329_biocrnpyler_334638_1_combined;
    r75_ATP_rheostatbiocrnpyler_334638_combined_model_of__biocrnpyler_702329_biocrnpyler_334638_combined_k = 54000;
  r75_1_ATP_rheostatbiocrnpyler_334638_combined_model_of__biocrnpyler_702329_biocrnpyler_334638_combined: complex_enzyme_atp_use_metabolite_atp_ATP_rheostatbiocrnpyler_334638_combined_model_of__biocrnpyler_702329_biocrnpyler_334638_1_combined => enzyme_atp_use_ATP_rheostatbiocrnpyler_334638_combined_model_of__biocrnpyler_702329_biocrnpyler_334638_1_combined + ATP_exsAbiocrnpyler_702329_1_combined_combined_model_of__biocrnpyler_702329_biocrnpyler_334638_1_combined; r75_1_ATP_rheostatbiocrnpyler_334638_combined_model_of__biocrnpyler_702329_biocrnpyler_334638_combined_k*complex_enzyme_atp_use_metabolite_atp_ATP_rheostatbiocrnpyler_334638_combined_model_of__biocrnpyler_702329_biocrnpyler_334638_1_combined;
    r75_1_ATP_rheostatbiocrnpyler_334638_combined_model_of__biocrnpyler_702329_biocrnpyler_334638_combined_k = 5400;
  r77_ATP_rheostatbiocrnpyler_334638_combined_model_of__biocrnpyler_702329_biocrnpyler_334638_combined: complex_enzyme_atp_use_metabolite_atp_ATP_rheostatbiocrnpyler_334638_combined_model_of__biocrnpyler_702329_biocrnpyler_334638_1_combined => complex_enzyme_atp_use_metabolite_adp_metabolite_pi_ATP_rheostatbiocrnpyler_334638_combined_model_of__biocrnpyler_702329_biocrnpyler_334638_1_combined; r77_ATP_rheostatbiocrnpyler_334638_combined_model_of__biocrnpyler_702329_biocrnpyler_334638_combined_k*complex_enzyme_atp_use_metabolite_atp_ATP_rheostatbiocrnpyler_334638_combined_model_of__biocrnpyler_702329_biocrnpyler_334638_1_combined;
    r77_ATP_rheostatbiocrnpyler_334638_combined_model_of__biocrnpyler_702329_biocrnpyler_334638_combined_k = 2;
  r78_ATP_rheostatbiocrnpyler_334638_combined_model_of__biocrnpyler_702329_biocrnpyler_334638_combined: complex_enzyme_atp_use_metabolite_adp_metabolite_pi_ATP_rheostatbiocrnpyler_334638_combined_model_of__biocrnpyler_702329_biocrnpyler_334638_1_combined => enzyme_atp_use_ATP_rheostatbiocrnpyler_334638_combined_model_of__biocrnpyler_702329_biocrnpyler_334638_1_combined + ADP_exsAbiocrnpyler_702329_1_combined_combined_model_of__biocrnpyler_702329_biocrnpyler_334638_1_combined + P_exsAbiocrnpyler_702329_1_combined_combined_model_of__biocrnpyler_702329_biocrnpyler_334638_1_combined; r78_ATP_rheostatbiocrnpyler_334638_combined_model_of__biocrnpyler_702329_biocrnpyler_334638_combined_k*complex_enzyme_atp_use_metabolite_adp_metabolite_pi_ATP_rheostatbiocrnpyler_334638_combined_model_of__biocrnpyler_702329_biocrnpyler_334638_1_combined;
    r78_ATP_rheostatbiocrnpyler_334638_combined_model_of__biocrnpyler_702329_biocrnpyler_334638_combined_k = 54000;
  r78_1_ATP_rheostatbiocrnpyler_334638_combined_model_of__biocrnpyler_702329_biocrnpyler_334638_combined: enzyme_atp_use_ATP_rheostatbiocrnpyler_334638_combined_model_of__biocrnpyler_702329_biocrnpyler_334638_1_combined + ADP_exsAbiocrnpyler_702329_1_combined_combined_model_of__biocrnpyler_702329_biocrnpyler_334638_1_combined + P_exsAbiocrnpyler_702329_1_combined_combined_model_of__biocrnpyler_702329_biocrnpyler_334638_1_combined => complex_enzyme_atp_use_metabolite_adp_metabolite_pi_ATP_rheostatbiocrnpyler_334638_combined_model_of__biocrnpyler_702329_biocrnpyler_334638_1_combined; r78_1_ATP_rheostatbiocrnpyler_334638_combined_model_of__biocrnpyler_702329_biocrnpyler_334638_combined_k*enzyme_atp_use_ATP_rheostatbiocrnpyler_334638_combined_model_of__biocrnpyler_702329_biocrnpyler_334638_1_combined*ADP_exsAbiocrnpyler_702329_1_combined_combined_model_of__biocrnpyler_702329_biocrnpyler_334638_1_combined*P_exsAbiocrnpyler_702329_1_combined_combined_model_of__biocrnpyler_702329_biocrnpyler_334638_1_combined;
    r78_1_ATP_rheostatbiocrnpyler_334638_combined_model_of__biocrnpyler_702329_biocrnpyler_334638_combined_k = 5400;
  r0_gfpbiocrnpyler_468481_combined_model_of__biocrnpyler_468481_biocrnpyler_334638: dna_h_gfpbiocrnpyler_468481_combined_model_of__biocrnpyler_468481_biocrnpyler_334638 + exsA_exsAbiocrnpyler_702329_combined_model_of__biocrnpyler_702329_biocrnpyler_334638_1_combined => complex_dna_h_exsA_gfpbiocrnpyler_468481_combined_model_of__biocrnpyler_468481_biocrnpyler_334638; r0_gfpbiocrnpyler_468481_combined_model_of__biocrnpyler_468481_biocrnpyler_334638_k*dna_h_gfpbiocrnpyler_468481_combined_model_of__biocrnpyler_468481_biocrnpyler_334638*exsA_exsAbiocrnpyler_702329_combined_model_of__biocrnpyler_702329_biocrnpyler_334638_1_combined;
    r0_gfpbiocrnpyler_468481_combined_model_of__biocrnpyler_468481_biocrnpyler_334638_k = 4e-5;
  r0_1_gfpbiocrnpyler_468481_combined_model_of__biocrnpyler_468481_biocrnpyler_334638: complex_dna_h_exsA_gfpbiocrnpyler_468481_combined_model_of__biocrnpyler_468481_biocrnpyler_334638 => dna_h_gfpbiocrnpyler_468481_combined_model_of__biocrnpyler_468481_biocrnpyler_334638 + exsA_exsAbiocrnpyler_702329_combined_model_of__biocrnpyler_702329_biocrnpyler_334638_1_combined; r0_1_gfpbiocrnpyler_468481_combined_model_of__biocrnpyler_468481_biocrnpyler_334638_k*complex_dna_h_exsA_gfpbiocrnpyler_468481_combined_model_of__biocrnpyler_468481_biocrnpyler_334638;
    r0_1_gfpbiocrnpyler_468481_combined_model_of__biocrnpyler_468481_biocrnpyler_334638_k = 1e-12;
  r2_gfpbiocrnpyler_468481_combined_model_of__biocrnpyler_468481_biocrnpyler_334638: complex_dna_h_exsA_gfpbiocrnpyler_468481_combined_model_of__biocrnpyler_468481_biocrnpyler_334638 => complex_dna_h_exsA_gfpbiocrnpyler_468481_combined_model_of__biocrnpyler_468481_biocrnpyler_334638 + rna_h_gfpbiocrnpyler_468481_combined_model_of__biocrnpyler_468481_biocrnpyler_334638; r2_gfpbiocrnpyler_468481_combined_model_of__biocrnpyler_468481_biocrnpyler_334638_k*complex_dna_h_exsA_gfpbiocrnpyler_468481_combined_model_of__biocrnpyler_468481_biocrnpyler_334638;
    r2_gfpbiocrnpyler_468481_combined_model_of__biocrnpyler_468481_biocrnpyler_334638_k = 0.001875;
  r3_gfpbiocrnpyler_468481_combined_model_of__biocrnpyler_468481_biocrnpyler_334638: rna_h_gfpbiocrnpyler_468481_combined_model_of__biocrnpyler_468481_biocrnpyler_334638 + ATP_exsAbiocrnpyler_702329_1_combined_combined_model_of__biocrnpyler_702329_biocrnpyler_334638_1_combined => rna_h_gfpbiocrnpyler_468481_combined_model_of__biocrnpyler_468481_biocrnpyler_334638 + ADP_exsAbiocrnpyler_702329_1_combined_combined_model_of__biocrnpyler_702329_biocrnpyler_334638_1_combined + gfp_gfpbiocrnpyler_468481_combined_model_of__biocrnpyler_468481_biocrnpyler_334638 + P_exsAbiocrnpyler_702329_1_combined_combined_model_of__biocrnpyler_702329_biocrnpyler_334638_1_combined; r3_gfpbiocrnpyler_468481_combined_model_of__biocrnpyler_468481_biocrnpyler_334638_k*rna_h_gfpbiocrnpyler_468481_combined_model_of__biocrnpyler_468481_biocrnpyler_334638*ATP_exsAbiocrnpyler_702329_1_combined_combined_model_of__biocrnpyler_702329_biocrnpyler_334638_1_combined^r3_gfpbiocrnpyler_468481_combined_model_of__biocrnpyler_468481_biocrnpyler_334638_n/(ATP_exsAbiocrnpyler_702329_1_combined_combined_model_of__biocrnpyler_702329_biocrnpyler_334638_1_combined^r3_gfpbiocrnpyler_468481_combined_model_of__biocrnpyler_468481_biocrnpyler_334638_n + r3_gfpbiocrnpyler_468481_combined_model_of__biocrnpyler_468481_biocrnpyler_334638_K);
    r3_gfpbiocrnpyler_468481_combined_model_of__biocrnpyler_468481_biocrnpyler_334638_k = 0.0007; r3_gfpbiocrnpyler_468481_combined_model_of__biocrnpyler_468481_biocrnpyler_334638_n = 1; r3_gfpbiocrnpyler_468481_combined_model_of__biocrnpyler_468481_biocrnpyler_334638_K = 1;
  r4_gfpbiocrnpyler_468481_combined_model_of__biocrnpyler_468481_biocrnpyler_334638: rna_h_gfpbiocrnpyler_468481_combined_model_of__biocrnpyler_468481_biocrnpyler_334638 => ; r4_gfpbiocrnpyler_468481_combined_model_of__biocrnpyler_468481_biocrnpyler_334638_k*rna_h_gfpbiocrnpyler_468481_combined_model_of__biocrnpyler_468481_biocrnpyler_334638;
    r4_gfpbiocrnpyler_468481_combined_model_of__biocrnpyler_468481_biocrnpyler_334638_k = 0.001;

  // Unit definitions:
  unit square_metre = metre^2;
  unit per_second = 1 / second;
  unit substance = dimensionless;
end
