// SBML level 3 version 2

model biocrnpyler_644479()
  // model units - substance: mole, time: second, volume: litre, area: square_metre, length: metre, extent: mole

  // Compartments:
  compartment default = 1e-6;

  // Species:
  species protein_hex in default = 0;
  species glucose in default = 0;
  species atp in default = 0;
  species g6p in default = 0;
  species adp in default = 0;
  species complex_atp_glucose_protein_hex in default = 0;
  species complex_adp_g6p_protein_hex in default = 0;
  species protein_pgi in default = 0;
  species f6p in default = 0;
  species complex_g6p_protein_pgi in default = 0;
  species complex_f6p_protein_pgi in default = 0;
  species protein_pfk in default = 0;
  species f16p in default = 0;
  species complex_atp_f6p_protein_pfk in default = 0;
  species complex_adp_f16p_protein_pfk in default = 0;
  species protein_ald_tpi in default = 0;
  species g3p in default = 0;
  species complex_f16p_protein_ald_tpi in default = 0;
  species complex_2x_g3p_protein_ald_tpi in default = 0;
  species protein_gapN in default = 0;
  species nadp in default = 0;
  species a3pg in default = 0;
  species nadph in default = 0;
  species complex_2x_g3p_2x_nadp_protein_gapN in default = 0;
  species complex_2x_a3pg_2x_nadph_protein_gapN in default = 0;
  species protein_mGapDH in default = 0;
  species pi in default = 0;
  species a13bpg in default = 0;
  species complex_2x_g3p_2x_nadp_pi_protein_mGapDH in default = 0;
  species complex_a13bpg_2x_nadph_protein_mGapDH in default = 0;
  species protein_pgk in default = 0;
  species complex_a13bpg_adp_protein_pgk in default = 0;
  species complex_2x_a3pg_atp_protein_pgk in default = 0;
  species protein_pgm in default = 0;
  species a2pg in default = 0;
  species complex_2x_a3pg_protein_pgm in default = 0;
  species complex_2x_a2pg_protein_pgm in default = 0;
  species protein_eno in default = 0;
  species pep in default = 0;
  species complex_2x_a2pg_protein_eno in default = 0;
  species complex_2x_pep_protein_eno in default = 0;
  species protein_pyk in default = 0;
  species pyruvate in default = 0;
  species complex_2x_adp_2x_pep_protein_pyk in default = 0;
  species complex_2x_atp_protein_pyk_2x_pyruvate in default = 0;
  species protein_alsS in default = 0;
  species acetolac in default = 0;
  species complex_protein_alsS_2x_pyruvate in default = 0;
  species complex_acetolac_protein_alsS in default = 0;
  species protein_IlvC in default = 0;
  species a23dih3mebut in default = 0;
  species complex_acetolac_nadph_protein_IlvC in default = 0;
  species complex_a23dih3mebut_nadp_protein_IlvC in default = 0;
  species protein_IlvD in default = 0;
  species a3me2oxo in default = 0;
  species complex_a23dih3mebut_protein_IlvD in default = 0;
  species complex_a3me2oxo_protein_IlvD in default = 0;
  species protein_kivD in default = 0;
  species isobutanal in default = 0;
  species complex_a3me2oxo_protein_kivD in default = 0;
  species complex_isobutanal_protein_kivD in default = 0;
  species protein_yahk in default = 0;
  species isobutanol in default = 0;
  species complex_isobutanal_nadph_protein_yahk in default = 0;
  species complex_isobutanol_nadp_protein_yahk in default = 0;
  species protein_atpase in default = 0;
  species complex_adp_pi_protein_atpase in default = 0;
  species complex_atp_protein_atpase in default = 0;

  // Reactions:
  r0: glucose + atp + protein_hex => complex_atp_glucose_protein_hex; r0_k*glucose*atp*protein_hex;
    r0_k = 15;
  r0_1: complex_atp_glucose_protein_hex => glucose + atp + protein_hex; r0_1_k*complex_atp_glucose_protein_hex;
    r0_1_k = 1.5;
  r2: g6p + adp + protein_hex => complex_adp_g6p_protein_hex; r2_k*g6p*adp*protein_hex;
    r2_k = 15;
  r2_1: complex_adp_g6p_protein_hex => g6p + adp + protein_hex; r2_1_k*complex_adp_g6p_protein_hex;
    r2_1_k = 1.5;
  r4: complex_atp_glucose_protein_hex => complex_adp_g6p_protein_hex; r4_k*complex_atp_glucose_protein_hex;
    r4_k = 36000;
  r4_1: complex_adp_g6p_protein_hex => complex_atp_glucose_protein_hex; r4_1_k*complex_adp_g6p_protein_hex;
    r4_1_k = 1e-5;
  r6: g6p + protein_pgi => complex_g6p_protein_pgi; r6_k*g6p*protein_pgi;
    r6_k = 15;
  r6_1: complex_g6p_protein_pgi => g6p + protein_pgi; r6_1_k*complex_g6p_protein_pgi;
    r6_1_k = 1.5;
  r8: f6p + protein_pgi => complex_f6p_protein_pgi; r8_k*f6p*protein_pgi;
    r8_k = 15;
  r8_1: complex_f6p_protein_pgi => f6p + protein_pgi; r8_1_k*complex_f6p_protein_pgi;
    r8_1_k = 1.5;
  r10: complex_g6p_protein_pgi => complex_f6p_protein_pgi; r10_k*complex_g6p_protein_pgi;
    r10_k = 36000;
  r10_1: complex_f6p_protein_pgi => complex_g6p_protein_pgi; r10_1_k*complex_f6p_protein_pgi;
    r10_1_k = 1e-5;
  r12: f6p + atp + protein_pfk => complex_atp_f6p_protein_pfk; r12_k*f6p*atp*protein_pfk;
    r12_k = 15;
  r12_1: complex_atp_f6p_protein_pfk => f6p + atp + protein_pfk; r12_1_k*complex_atp_f6p_protein_pfk;
    r12_1_k = 1.5;
  r14: f16p + adp + protein_pfk => complex_adp_f16p_protein_pfk; r14_k*f16p*adp*protein_pfk;
    r14_k = 15;
  r14_1: complex_adp_f16p_protein_pfk => f16p + adp + protein_pfk; r14_1_k*complex_adp_f16p_protein_pfk;
    r14_1_k = 1.5;
  r16: complex_atp_f6p_protein_pfk => complex_adp_f16p_protein_pfk; r16_k*complex_atp_f6p_protein_pfk;
    r16_k = 36000;
  r16_1: complex_adp_f16p_protein_pfk => complex_atp_f6p_protein_pfk; r16_1_k*complex_adp_f16p_protein_pfk;
    r16_1_k = 1e-5;
  r18: f16p + protein_ald_tpi => complex_f16p_protein_ald_tpi; r18_k*f16p*protein_ald_tpi;
    r18_k = 15;
  r18_1: complex_f16p_protein_ald_tpi => f16p + protein_ald_tpi; r18_1_k*complex_f16p_protein_ald_tpi;
    r18_1_k = 1.5;
  r20: 2 g3p + protein_ald_tpi => complex_2x_g3p_protein_ald_tpi; r20_k*g3p^2*protein_ald_tpi;
    r20_k = 15;
  r20_1: complex_2x_g3p_protein_ald_tpi => 2 g3p + protein_ald_tpi; r20_1_k*complex_2x_g3p_protein_ald_tpi;
    r20_1_k = 1.5;
  r22: complex_f16p_protein_ald_tpi => complex_2x_g3p_protein_ald_tpi; r22_k*complex_f16p_protein_ald_tpi;
    r22_k = 36000;
  r22_1: complex_2x_g3p_protein_ald_tpi => complex_f16p_protein_ald_tpi; r22_1_k*complex_2x_g3p_protein_ald_tpi;
    r22_1_k = 1e-5;
  r24: 2 g3p + 2 nadp + protein_gapN => complex_2x_g3p_2x_nadp_protein_gapN; r24_k*g3p^2*nadp^2*protein_gapN;
    r24_k = 15;
  r24_1: complex_2x_g3p_2x_nadp_protein_gapN => 2 g3p + 2 nadp + protein_gapN; r24_1_k*complex_2x_g3p_2x_nadp_protein_gapN;
    r24_1_k = 1.5;
  r26: 2 a3pg + 2 nadph + protein_gapN => complex_2x_a3pg_2x_nadph_protein_gapN; r26_k*a3pg^2*nadph^2*protein_gapN;
    r26_k = 15;
  r26_1: complex_2x_a3pg_2x_nadph_protein_gapN => 2 a3pg + 2 nadph + protein_gapN; r26_1_k*complex_2x_a3pg_2x_nadph_protein_gapN;
    r26_1_k = 1.5;
  r28: complex_2x_g3p_2x_nadp_protein_gapN => complex_2x_a3pg_2x_nadph_protein_gapN; r28_k*complex_2x_g3p_2x_nadp_protein_gapN;
    r28_k = 36000;
  r28_1: complex_2x_a3pg_2x_nadph_protein_gapN => complex_2x_g3p_2x_nadp_protein_gapN; r28_1_k*complex_2x_a3pg_2x_nadph_protein_gapN;
    r28_1_k = 1e-5;
  r30: 2 g3p + pi + 2 nadp + protein_mGapDH => complex_2x_g3p_2x_nadp_pi_protein_mGapDH; r30_k*g3p^2*pi*nadp^2*protein_mGapDH;
    r30_k = 15;
  r30_1: complex_2x_g3p_2x_nadp_pi_protein_mGapDH => 2 g3p + pi + 2 nadp + protein_mGapDH; r30_1_k*complex_2x_g3p_2x_nadp_pi_protein_mGapDH;
    r30_1_k = 1.5;
  r32: a13bpg + 2 nadph + protein_mGapDH => complex_a13bpg_2x_nadph_protein_mGapDH; r32_k*a13bpg*nadph^2*protein_mGapDH;
    r32_k = 15;
  r32_1: complex_a13bpg_2x_nadph_protein_mGapDH => a13bpg + 2 nadph + protein_mGapDH; r32_1_k*complex_a13bpg_2x_nadph_protein_mGapDH;
    r32_1_k = 1.5;
  r34: complex_2x_g3p_2x_nadp_pi_protein_mGapDH => complex_a13bpg_2x_nadph_protein_mGapDH; r34_k*complex_2x_g3p_2x_nadp_pi_protein_mGapDH;
    r34_k = 36000;
  r34_1: complex_a13bpg_2x_nadph_protein_mGapDH => complex_2x_g3p_2x_nadp_pi_protein_mGapDH; r34_1_k*complex_a13bpg_2x_nadph_protein_mGapDH;
    r34_1_k = 1e-5;
  r36: a13bpg + adp + protein_pgk => complex_a13bpg_adp_protein_pgk; r36_k*a13bpg*adp*protein_pgk;
    r36_k = 15;
  r36_1: complex_a13bpg_adp_protein_pgk => a13bpg + adp + protein_pgk; r36_1_k*complex_a13bpg_adp_protein_pgk;
    r36_1_k = 1.5;
  r38: 2 a3pg + atp + protein_pgk => complex_2x_a3pg_atp_protein_pgk; r38_k*a3pg^2*atp*protein_pgk;
    r38_k = 15;
  r38_1: complex_2x_a3pg_atp_protein_pgk => 2 a3pg + atp + protein_pgk; r38_1_k*complex_2x_a3pg_atp_protein_pgk;
    r38_1_k = 1.5;
  r40: complex_a13bpg_adp_protein_pgk => complex_2x_a3pg_atp_protein_pgk; r40_k*complex_a13bpg_adp_protein_pgk;
    r40_k = 36000;
  r40_1: complex_2x_a3pg_atp_protein_pgk => complex_a13bpg_adp_protein_pgk; r40_1_k*complex_2x_a3pg_atp_protein_pgk;
    r40_1_k = 1e-5;
  r42: 2 a3pg + protein_pgm => complex_2x_a3pg_protein_pgm; r42_k*a3pg^2*protein_pgm;
    r42_k = 15;
  r42_1: complex_2x_a3pg_protein_pgm => 2 a3pg + protein_pgm; r42_1_k*complex_2x_a3pg_protein_pgm;
    r42_1_k = 1.5;
  r44: 2 a2pg + protein_pgm => complex_2x_a2pg_protein_pgm; r44_k*a2pg^2*protein_pgm;
    r44_k = 15;
  r44_1: complex_2x_a2pg_protein_pgm => 2 a2pg + protein_pgm; r44_1_k*complex_2x_a2pg_protein_pgm;
    r44_1_k = 1.5;
  r46: complex_2x_a3pg_protein_pgm => complex_2x_a2pg_protein_pgm; r46_k*complex_2x_a3pg_protein_pgm;
    r46_k = 36000;
  r46_1: complex_2x_a2pg_protein_pgm => complex_2x_a3pg_protein_pgm; r46_1_k*complex_2x_a2pg_protein_pgm;
    r46_1_k = 1e-5;
  r48: 2 a2pg + protein_eno => complex_2x_a2pg_protein_eno; r48_k*a2pg^2*protein_eno;
    r48_k = 15;
  r48_1: complex_2x_a2pg_protein_eno => 2 a2pg + protein_eno; r48_1_k*complex_2x_a2pg_protein_eno;
    r48_1_k = 1.5;
  r50: 2 pep + protein_eno => complex_2x_pep_protein_eno; r50_k*pep^2*protein_eno;
    r50_k = 15;
  r50_1: complex_2x_pep_protein_eno => 2 pep + protein_eno; r50_1_k*complex_2x_pep_protein_eno;
    r50_1_k = 1.5;
  r52: complex_2x_a2pg_protein_eno => complex_2x_pep_protein_eno; r52_k*complex_2x_a2pg_protein_eno;
    r52_k = 36000;
  r52_1: complex_2x_pep_protein_eno => complex_2x_a2pg_protein_eno; r52_1_k*complex_2x_pep_protein_eno;
    r52_1_k = 1e-5;
  r54: 2 pep + 2 adp + protein_pyk => complex_2x_adp_2x_pep_protein_pyk; r54_k*pep^2*adp^2*protein_pyk;
    r54_k = 15;
  r54_1: complex_2x_adp_2x_pep_protein_pyk => 2 pep + 2 adp + protein_pyk; r54_1_k*complex_2x_adp_2x_pep_protein_pyk;
    r54_1_k = 1.5;
  r56: 2 pyruvate + 2 atp + protein_pyk => complex_2x_atp_protein_pyk_2x_pyruvate; r56_k*pyruvate^2*atp^2*protein_pyk;
    r56_k = 15;
  r56_1: complex_2x_atp_protein_pyk_2x_pyruvate => 2 pyruvate + 2 atp + protein_pyk; r56_1_k*complex_2x_atp_protein_pyk_2x_pyruvate;
    r56_1_k = 1.5;
  r58: complex_2x_adp_2x_pep_protein_pyk => complex_2x_atp_protein_pyk_2x_pyruvate; r58_k*complex_2x_adp_2x_pep_protein_pyk;
    r58_k = 36000;
  r58_1: complex_2x_atp_protein_pyk_2x_pyruvate => complex_2x_adp_2x_pep_protein_pyk; r58_1_k*complex_2x_atp_protein_pyk_2x_pyruvate;
    r58_1_k = 1e-5;
  r60: 2 pyruvate + protein_alsS => complex_protein_alsS_2x_pyruvate; r60_k*pyruvate^2*protein_alsS;
    r60_k = 15;
  r60_1: complex_protein_alsS_2x_pyruvate => 2 pyruvate + protein_alsS; r60_1_k*complex_protein_alsS_2x_pyruvate;
    r60_1_k = 1.5;
  r62: acetolac + protein_alsS => complex_acetolac_protein_alsS; r62_k*acetolac*protein_alsS;
    r62_k = 15;
  r62_1: complex_acetolac_protein_alsS => acetolac + protein_alsS; r62_1_k*complex_acetolac_protein_alsS;
    r62_1_k = 1.5;
  r64: complex_protein_alsS_2x_pyruvate => complex_acetolac_protein_alsS; r64_k*complex_protein_alsS_2x_pyruvate;
    r64_k = 36000;
  r64_1: complex_acetolac_protein_alsS => complex_protein_alsS_2x_pyruvate; r64_1_k*complex_acetolac_protein_alsS;
    r64_1_k = 1e-5;
  r66: acetolac + nadph + protein_IlvC => complex_acetolac_nadph_protein_IlvC; r66_k*acetolac*nadph*protein_IlvC;
    r66_k = 15;
  r66_1: complex_acetolac_nadph_protein_IlvC => acetolac + nadph + protein_IlvC; r66_1_k*complex_acetolac_nadph_protein_IlvC;
    r66_1_k = 1.5;
  r68: a23dih3mebut + nadp + protein_IlvC => complex_a23dih3mebut_nadp_protein_IlvC; r68_k*a23dih3mebut*nadp*protein_IlvC;
    r68_k = 15;
  r68_1: complex_a23dih3mebut_nadp_protein_IlvC => a23dih3mebut + nadp + protein_IlvC; r68_1_k*complex_a23dih3mebut_nadp_protein_IlvC;
    r68_1_k = 1.5;
  r70: complex_acetolac_nadph_protein_IlvC => complex_a23dih3mebut_nadp_protein_IlvC; r70_k*complex_acetolac_nadph_protein_IlvC;
    r70_k = 36000;
  r70_1: complex_a23dih3mebut_nadp_protein_IlvC => complex_acetolac_nadph_protein_IlvC; r70_1_k*complex_a23dih3mebut_nadp_protein_IlvC;
    r70_1_k = 1e-5;
  r72: a23dih3mebut + protein_IlvD => complex_a23dih3mebut_protein_IlvD; r72_k*a23dih3mebut*protein_IlvD;
    r72_k = 15;
  r72_1: complex_a23dih3mebut_protein_IlvD => a23dih3mebut + protein_IlvD; r72_1_k*complex_a23dih3mebut_protein_IlvD;
    r72_1_k = 1.5;
  r74: a3me2oxo + protein_IlvD => complex_a3me2oxo_protein_IlvD; r74_k*a3me2oxo*protein_IlvD;
    r74_k = 15;
  r74_1: complex_a3me2oxo_protein_IlvD => a3me2oxo + protein_IlvD; r74_1_k*complex_a3me2oxo_protein_IlvD;
    r74_1_k = 1.5;
  r76: complex_a23dih3mebut_protein_IlvD => complex_a3me2oxo_protein_IlvD; r76_k*complex_a23dih3mebut_protein_IlvD;
    r76_k = 36000;
  r76_1: complex_a3me2oxo_protein_IlvD => complex_a23dih3mebut_protein_IlvD; r76_1_k*complex_a3me2oxo_protein_IlvD;
    r76_1_k = 1e-5;
  r78: a3me2oxo + protein_kivD => complex_a3me2oxo_protein_kivD; r78_k*a3me2oxo*protein_kivD;
    r78_k = 15;
  r78_1: complex_a3me2oxo_protein_kivD => a3me2oxo + protein_kivD; r78_1_k*complex_a3me2oxo_protein_kivD;
    r78_1_k = 1.5;
  r80: isobutanal + protein_kivD => complex_isobutanal_protein_kivD; r80_k*isobutanal*protein_kivD;
    r80_k = 15;
  r80_1: complex_isobutanal_protein_kivD => isobutanal + protein_kivD; r80_1_k*complex_isobutanal_protein_kivD;
    r80_1_k = 1.5;
  r82: complex_a3me2oxo_protein_kivD => complex_isobutanal_protein_kivD; r82_k*complex_a3me2oxo_protein_kivD;
    r82_k = 36000;
  r82_1: complex_isobutanal_protein_kivD => complex_a3me2oxo_protein_kivD; r82_1_k*complex_isobutanal_protein_kivD;
    r82_1_k = 1e-5;
  r84: isobutanal + nadph + protein_yahk => complex_isobutanal_nadph_protein_yahk; r84_k*isobutanal*nadph*protein_yahk;
    r84_k = 15;
  r84_1: complex_isobutanal_nadph_protein_yahk => isobutanal + nadph + protein_yahk; r84_1_k*complex_isobutanal_nadph_protein_yahk;
    r84_1_k = 1.5;
  r86: isobutanol + nadp + protein_yahk => complex_isobutanol_nadp_protein_yahk; r86_k*isobutanol*nadp*protein_yahk;
    r86_k = 15;
  r86_1: complex_isobutanol_nadp_protein_yahk => isobutanol + nadp + protein_yahk; r86_1_k*complex_isobutanol_nadp_protein_yahk;
    r86_1_k = 1.5;
  r88: complex_isobutanal_nadph_protein_yahk => complex_isobutanol_nadp_protein_yahk; r88_k*complex_isobutanal_nadph_protein_yahk;
    r88_k = 36000;
  r88_1: complex_isobutanol_nadp_protein_yahk => complex_isobutanal_nadph_protein_yahk; r88_1_k*complex_isobutanol_nadp_protein_yahk;
    r88_1_k = 1e-5;
  r90: adp + pi + protein_atpase => complex_adp_pi_protein_atpase; r90_k*adp*pi*protein_atpase;
    r90_k = 15;
  r90_1: complex_adp_pi_protein_atpase => adp + pi + protein_atpase; r90_1_k*complex_adp_pi_protein_atpase;
    r90_1_k = 1.5;
  r92: atp + protein_atpase => complex_atp_protein_atpase; r92_k*atp*protein_atpase;
    r92_k = 15;
  r92_1: complex_atp_protein_atpase => atp + protein_atpase; r92_1_k*complex_atp_protein_atpase;
    r92_1_k = 1.5;
  r94: complex_adp_pi_protein_atpase => complex_atp_protein_atpase; r94_k*complex_adp_pi_protein_atpase;
    r94_k = 2;
  r94_1: complex_atp_protein_atpase => complex_adp_pi_protein_atpase; r94_1_k*complex_atp_protein_atpase;
    r94_1_k = 1e-5;

  // Unit definitions:
  unit square_metre = metre^2;
end
