// SBML level 3 version 2

model biocrnpyler_241754()
  // model units - substance: mole, time: second, volume: litre, area: square_metre, length: metre, extent: mole

  // Compartments:
  compartment default = 1e-6;

  // Species:
  species protein_Ribo_machinery in default = 0;
  species protein_RNAase_machinery in default = 0;
  species protein_proton_pump in default = 0;
  species dna_proton_pump in default = 0;
  species complex_protein_RNAase_rna_proton_pump_machinery in default = 0;
  species complex_dna_proton_pump_protein_RNAP_machinery in default = 0;
  species complex_protein_Ribo_rna_proton_pump_machinery in default = 0;
  species protein_RNAP_machinery in default = 0;
  species rna_proton_pump in default = 0;
  species rna_cellular_processes in default = 0;
  species complex_dna_cellular_processes_protein_RNAP_machinery in default = 0;
  species dna_cellular_processes in default = 0;
  species complex_protein_RNAase_rna_cellular_processes_machinery in default = 0;
  species complex_protein_Ribo_rna_cellular_processes_machinery in default = 0;
  species protein_cellular_processes in default = 0;

  // Reactions:
  r0: dna_proton_pump + protein_RNAP_machinery => complex_dna_proton_pump_protein_RNAP_machinery; r0_k*dna_proton_pump*protein_RNAP_machinery;
    r0_k = 100;
  r0_1: complex_dna_proton_pump_protein_RNAP_machinery => dna_proton_pump + protein_RNAP_machinery; r0_1_k*complex_dna_proton_pump_protein_RNAP_machinery;
    r0_1_k = 10;
  r2: complex_dna_proton_pump_protein_RNAP_machinery => dna_proton_pump + rna_proton_pump + protein_RNAP_machinery; r2_k*complex_dna_proton_pump_protein_RNAP_machinery;
    r2_k = 0.05;
  r3: rna_proton_pump + protein_Ribo_machinery => complex_protein_Ribo_rna_proton_pump_machinery; r3_k*rna_proton_pump*protein_Ribo_machinery;
    r3_k = 100;
  r3_1: complex_protein_Ribo_rna_proton_pump_machinery => rna_proton_pump + protein_Ribo_machinery; r3_1_k*complex_protein_Ribo_rna_proton_pump_machinery;
    r3_1_k = 10;
  r5: complex_protein_Ribo_rna_proton_pump_machinery => rna_proton_pump + protein_proton_pump + protein_Ribo_machinery; r5_k*complex_protein_Ribo_rna_proton_pump_machinery;
    r5_k = 0.05;
  r6: rna_proton_pump + protein_RNAase_machinery => complex_protein_RNAase_rna_proton_pump_machinery; r6_k*rna_proton_pump*protein_RNAase_machinery;
    r6_k = 100;
  r6_1: complex_protein_RNAase_rna_proton_pump_machinery => rna_proton_pump + protein_RNAase_machinery; r6_1_k*complex_protein_RNAase_rna_proton_pump_machinery;
    r6_1_k = 10;
  r8: complex_protein_RNAase_rna_proton_pump_machinery => protein_RNAase_machinery; r8_k*complex_protein_RNAase_rna_proton_pump_machinery;
    r8_k = 0.001;
  r9: dna_cellular_processes + protein_RNAP_machinery => complex_dna_cellular_processes_protein_RNAP_machinery; r9_k*dna_cellular_processes*protein_RNAP_machinery;
    r9_k = 500;
  r9_1: complex_dna_cellular_processes_protein_RNAP_machinery => dna_cellular_processes + protein_RNAP_machinery; r9_1_k*complex_dna_cellular_processes_protein_RNAP_machinery;
    r9_1_k = 50;
  r11: complex_dna_cellular_processes_protein_RNAP_machinery => dna_cellular_processes + rna_cellular_processes + protein_RNAP_machinery; r11_k*complex_dna_cellular_processes_protein_RNAP_machinery;
    r11_k = 0.1;
  r12: rna_cellular_processes + protein_Ribo_machinery => complex_protein_Ribo_rna_cellular_processes_machinery; r12_k*rna_cellular_processes*protein_Ribo_machinery;
    r12_k = 500;
  r12_1: complex_protein_Ribo_rna_cellular_processes_machinery => rna_cellular_processes + protein_Ribo_machinery; r12_1_k*complex_protein_Ribo_rna_cellular_processes_machinery;
    r12_1_k = 5;
  r14: complex_protein_Ribo_rna_cellular_processes_machinery => rna_cellular_processes + protein_cellular_processes + protein_Ribo_machinery; r14_k*complex_protein_Ribo_rna_cellular_processes_machinery;
    r14_k = 0.1;
  r15: rna_cellular_processes + protein_RNAase_machinery => complex_protein_RNAase_rna_cellular_processes_machinery; r15_k*rna_cellular_processes*protein_RNAase_machinery;
    r15_k = 500;
  r15_1: complex_protein_RNAase_rna_cellular_processes_machinery => rna_cellular_processes + protein_RNAase_machinery; r15_1_k*complex_protein_RNAase_rna_cellular_processes_machinery;
    r15_1_k = 50;
  r17: complex_protein_RNAase_rna_cellular_processes_machinery => protein_RNAase_machinery; r17_k*complex_protein_RNAase_rna_cellular_processes_machinery;
    r17_k = 0.001;
  r18: protein_proton_pump => ; r18_k*protein_proton_pump;
    r18_k = 0.001;
  r19: rna_proton_pump => ; r19_k*rna_proton_pump;
    r19_k = 0.001;
  r20: rna_cellular_processes => ; r20_k*rna_cellular_processes;
    r20_k = 0.001;
  r21: protein_cellular_processes => ; r21_k*protein_cellular_processes;
    r21_k = 0.001;

  // Unit definitions:
  unit square_metre = metre^2;
end
