// SBML level 3 version 2

model combined_model_of__combined_model_of__external_reservoir_model_combined_model_of__atc_membrane_combined_model_of__biocrnpyler_702329()
  // model units - substance: mole, time: second, volume: litre, area: square_metre, length: metre, extent: mole

  // Compartments:
  compartment cellfusedexternal2 = 2e-6 litre;
  compartment cellfusedinternal2 = 1e-6 litre;

  // Species:
  species atc_e_external_reservoir_model_1_combined in cellfusedexternal2 = 10000/cellfusedexternal2;
  species dna_f_biocrnpyler_702329 in cellfusedinternal2 = 1/cellfusedinternal2;
  species tetR_biocrnpyler_702329 in cellfusedinternal2 = 10/cellfusedinternal2;
  species rna_f_biocrnpyler_702329 in cellfusedinternal2 = 0;
  species exsA_biocrnpyler_702329 in cellfusedinternal2 = 0;
  species ATP_biocrnpyler_702329 in cellfusedinternal2 = 20/cellfusedinternal2;
  species ADP_biocrnpyler_702329 in cellfusedinternal2 = 0;
  species atc_i_1_combined in cellfusedinternal2 = 0;
  species complex_atc_i_tetR_biocrnpyler_702329 in cellfusedinternal2 = 0;
  species complex_dna_f_tetR_biocrnpyler_702329 in cellfusedinternal2 = 0;
  species complex_atc_i_dna_f_tetR_biocrnpyler_702329 in cellfusedinternal2 = 0;
  species P_biocrnpyler_702329 in cellfusedinternal2 = 0;

  // Parameters:
  kb = 0.002 per_second;
  kd = 1e-5 per_second;

  // Reactions:
  r1: atc_e_external_reservoir_model_1_combined -> atc_i_1_combined; kb*atc_e_external_reservoir_model_1_combined - kd*atc_i_1_combined;
  r0_biocrnpyler_702329: atc_i_1_combined + tetR_biocrnpyler_702329 => complex_atc_i_tetR_biocrnpyler_702329; r0_biocrnpyler_702329_k*atc_i_1_combined*tetR_biocrnpyler_702329;
    r0_biocrnpyler_702329_k = 2e-5;
  r0_1_biocrnpyler_702329: complex_atc_i_tetR_biocrnpyler_702329 => atc_i_1_combined + tetR_biocrnpyler_702329; r0_1_biocrnpyler_702329_k*complex_atc_i_tetR_biocrnpyler_702329;
    r0_1_biocrnpyler_702329_k = 2e-9;
  r2_biocrnpyler_702329: dna_f_biocrnpyler_702329 + tetR_biocrnpyler_702329 => complex_dna_f_tetR_biocrnpyler_702329; r2_biocrnpyler_702329_k*dna_f_biocrnpyler_702329*tetR_biocrnpyler_702329;
    r2_biocrnpyler_702329_k = 4e-7;
  r2_1_biocrnpyler_702329: complex_dna_f_tetR_biocrnpyler_702329 => dna_f_biocrnpyler_702329 + tetR_biocrnpyler_702329; r2_1_biocrnpyler_702329_k*complex_dna_f_tetR_biocrnpyler_702329;
    r2_1_biocrnpyler_702329_k = 1e-12;
  r4_biocrnpyler_702329: complex_dna_f_tetR_biocrnpyler_702329 + atc_i_1_combined => complex_atc_i_dna_f_tetR_biocrnpyler_702329; r4_biocrnpyler_702329_k*complex_dna_f_tetR_biocrnpyler_702329*atc_i_1_combined;
    r4_biocrnpyler_702329_k = 6e-8;
  r4_1_biocrnpyler_702329: complex_atc_i_dna_f_tetR_biocrnpyler_702329 => complex_dna_f_tetR_biocrnpyler_702329 + atc_i_1_combined; r4_1_biocrnpyler_702329_k*complex_atc_i_dna_f_tetR_biocrnpyler_702329;
    r4_1_biocrnpyler_702329_k = 3e-9;
  r6_biocrnpyler_702329: complex_atc_i_dna_f_tetR_biocrnpyler_702329 => dna_f_biocrnpyler_702329 + complex_atc_i_tetR_biocrnpyler_702329; r6_biocrnpyler_702329_k*complex_atc_i_dna_f_tetR_biocrnpyler_702329;
    r6_biocrnpyler_702329_k = 5e-5;
  r6_1_biocrnpyler_702329: dna_f_biocrnpyler_702329 + complex_atc_i_tetR_biocrnpyler_702329 => complex_atc_i_dna_f_tetR_biocrnpyler_702329; r6_1_biocrnpyler_702329_k*dna_f_biocrnpyler_702329*complex_atc_i_tetR_biocrnpyler_702329;
    r6_1_biocrnpyler_702329_k = 1e-10;
  r8_biocrnpyler_702329: dna_f_biocrnpyler_702329 => dna_f_biocrnpyler_702329 + rna_f_biocrnpyler_702329; r8_biocrnpyler_702329_k*dna_f_biocrnpyler_702329;
    r8_biocrnpyler_702329_k = 0.001875;
  r9_biocrnpyler_702329: rna_f_biocrnpyler_702329 + ATP_biocrnpyler_702329 => rna_f_biocrnpyler_702329 + ADP_biocrnpyler_702329 + exsA_biocrnpyler_702329 + P_biocrnpyler_702329; r9_biocrnpyler_702329_k*rna_f_biocrnpyler_702329*ATP_biocrnpyler_702329^n/(ATP_biocrnpyler_702329^n + K);
    r9_biocrnpyler_702329_k = 0.0007; n = 1; K = 1;
  r10_biocrnpyler_702329: rna_f_biocrnpyler_702329 => ; r10_biocrnpyler_702329_k*rna_f_biocrnpyler_702329;
    r10_biocrnpyler_702329_k = 0.001;

  // Unit definitions:
  unit square_metre = metre^2;
  unit per_second = 1 / second;
  unit substance = dimensionless;
end
