// SBML level 3 version 2

model combined_model_of__biocrnpyler_899612_biocrnpyler_34648()
  // model units - substance: mole, time: second, volume: litre, area: square_metre, length: metre, extent: mole

  // Compartments:
  compartment default_violaceinbiocrnpyler_899612_combined = 2e-6;

  // Species:
  species protein_RNAase_violaceinbiocrnpyler_899612 in default_violaceinbiocrnpyler_899612_combined = 6;
  species protein_RNAP_violaceinbiocrnpyler_899612 in default_violaceinbiocrnpyler_899612_combined = 3;
  species complex_dna_dna_vioA_protein_RNAP_violaceinbiocrnpyler_899612 in default_violaceinbiocrnpyler_899612_combined = 0;
  species dna_dna_vioA_violaceinbiocrnpyler_899612 in default_violaceinbiocrnpyler_899612_combined = 10/default_violaceinbiocrnpyler_899612_combined;
  species transcript_vioA_violaceinbiocrnpyler_899612 in default_violaceinbiocrnpyler_899612_combined = 0;
  species complex_protein_Ribo_transcript_vioA_violaceinbiocrnpyler_899612 in default_violaceinbiocrnpyler_899612_combined = 0;
  species complex_protein_RNAase_transcript_vioA_violaceinbiocrnpyler_899612 in default_violaceinbiocrnpyler_899612_combined = 0;
  species enzyme_VioA_violaceinbiocrnpyler_899612 in default_violaceinbiocrnpyler_899612_combined = 0;
  species protein_Ribo_violaceinbiocrnpyler_899612 in default_violaceinbiocrnpyler_899612_combined = 24;
  species complex_protein_Ribo_transcript_vioB_violaceinbiocrnpyler_899612 in default_violaceinbiocrnpyler_899612_combined = 0;
  species enzyme_VioB_violaceinbiocrnpyler_899612 in default_violaceinbiocrnpyler_899612_combined = 0;
  species complex_protein_RNAase_transcript_vioB_violaceinbiocrnpyler_899612 in default_violaceinbiocrnpyler_899612_combined = 0;
  species dna_dna_vioB_violaceinbiocrnpyler_899612 in default_violaceinbiocrnpyler_899612_combined = 10/default_violaceinbiocrnpyler_899612_combined;
  species transcript_vioB_violaceinbiocrnpyler_899612 in default_violaceinbiocrnpyler_899612_combined = 0;
  species complex_dna_dna_vioB_protein_RNAP_violaceinbiocrnpyler_899612 in default_violaceinbiocrnpyler_899612_combined = 0;
  species dna_dna_vioE_violaceinbiocrnpyler_899612 in default_violaceinbiocrnpyler_899612_combined = 10/default_violaceinbiocrnpyler_899612_combined;
  species complex_dna_dna_vioE_protein_RNAP_violaceinbiocrnpyler_899612 in default_violaceinbiocrnpyler_899612_combined = 0;
  species complex_protein_Ribo_transcript_vioE_violaceinbiocrnpyler_899612 in default_violaceinbiocrnpyler_899612_combined = 0;
  species transcript_vioE_violaceinbiocrnpyler_899612 in default_violaceinbiocrnpyler_899612_combined = 0;
  species complex_protein_RNAase_transcript_vioE_violaceinbiocrnpyler_899612 in default_violaceinbiocrnpyler_899612_combined = 0;
  species enzyme_VioE_violaceinbiocrnpyler_899612 in default_violaceinbiocrnpyler_899612_combined = 0;
  species complex_dna_dna_vioD_protein_RNAP_violaceinbiocrnpyler_899612 in default_violaceinbiocrnpyler_899612_combined = 0;
  species transcript_vioD_violaceinbiocrnpyler_899612 in default_violaceinbiocrnpyler_899612_combined = 0;
  species enzyme_VioD_violaceinbiocrnpyler_899612 in default_violaceinbiocrnpyler_899612_combined = 0;
  species dna_dna_vioD_violaceinbiocrnpyler_899612 in default_violaceinbiocrnpyler_899612_combined = 10/default_violaceinbiocrnpyler_899612_combined;
  species complex_protein_RNAase_transcript_vioD_violaceinbiocrnpyler_899612 in default_violaceinbiocrnpyler_899612_combined = 0;
  species complex_protein_Ribo_transcript_vioD_violaceinbiocrnpyler_899612 in default_violaceinbiocrnpyler_899612_combined = 0;
  species complex_dna_dna_vioC_protein_RNAP_violaceinbiocrnpyler_899612 in default_violaceinbiocrnpyler_899612_combined = 0;
  species complex_protein_Ribo_transcript_vioC_violaceinbiocrnpyler_899612 in default_violaceinbiocrnpyler_899612_combined = 0;
  species transcript_vioC_violaceinbiocrnpyler_899612 in default_violaceinbiocrnpyler_899612_combined = 0;
  species dna_dna_vioC_violaceinbiocrnpyler_899612 in default_violaceinbiocrnpyler_899612_combined = 10/default_violaceinbiocrnpyler_899612_combined;
  species complex_protein_RNAase_transcript_vioC_violaceinbiocrnpyler_899612 in default_violaceinbiocrnpyler_899612_combined = 0;
  species enzyme_VioC_violaceinbiocrnpyler_899612 in default_violaceinbiocrnpyler_899612_combined = 0;
  species TRP_violaceinbiocrnpyler_899612 in default_violaceinbiocrnpyler_899612_combined = 10/default_violaceinbiocrnpyler_899612_combined;
  species IPA_imine_violaceinbiocrnpyler_899612 in default_violaceinbiocrnpyler_899612_combined = 0;
  species complex_TRP_enzyme_VioA_violaceinbiocrnpyler_899612 in default_violaceinbiocrnpyler_899612_combined = 0;
  species IPA_imine_dimer_violaceinbiocrnpyler_899612 in default_violaceinbiocrnpyler_899612_combined = 0;
  species complex_2x_IPA_imine_enzyme_VioB_violaceinbiocrnpyler_899612 in default_violaceinbiocrnpyler_899612_combined = 0;
  species PTDVA_violaceinbiocrnpyler_899612 in default_violaceinbiocrnpyler_899612_combined = 0;
  species complex_IPA_imine_dimer_enzyme_VioE_violaceinbiocrnpyler_899612 in default_violaceinbiocrnpyler_899612_combined = 0;
  species PTVA_violaceinbiocrnpyler_899612 in default_violaceinbiocrnpyler_899612_combined = 0;
  species complex_NADPH_PTDVA_enzyme_VioD_violaceinbiocrnpyler_899612 in default_violaceinbiocrnpyler_899612_combined = 0;
  species V_violaceinbiocrnpyler_899612 in default_violaceinbiocrnpyler_899612_combined = 0;
  species complex_NADPH_PTVA_enzyme_VioC_violaceinbiocrnpyler_899612 in default_violaceinbiocrnpyler_899612_combined = 0;
  species DV_violaceinbiocrnpyler_899612 in default_violaceinbiocrnpyler_899612_combined = 0;
  species complex_NADPH_PTDVA_enzyme_VioC_violaceinbiocrnpyler_899612 in default_violaceinbiocrnpyler_899612_combined = 0;
  species enzyme_glk_rheostatbiocrnpyler_34648 in default_violaceinbiocrnpyler_899612_combined = 0.2/default_violaceinbiocrnpyler_899612_combined;
  species metabolite_atp_rheostatbiocrnpyler_34648 in default_violaceinbiocrnpyler_899612_combined = 30/default_violaceinbiocrnpyler_899612_combined;
  species molecule_glucose_rheostatbiocrnpyler_34648 in default_violaceinbiocrnpyler_899612_combined = 30/default_violaceinbiocrnpyler_899612_combined;
  species molecule_g6p_rheostatbiocrnpyler_34648 in default_violaceinbiocrnpyler_899612_combined = 0;
  species metabolite_adp_rheostatbiocrnpyler_34648 in default_violaceinbiocrnpyler_899612_combined = 0;
  species complex_enzyme_glk_metabolite_atp_molecule_glucose_rheostatbiocrnpyler_34648 in default_violaceinbiocrnpyler_899612_combined = 0;
  species complex_enzyme_glk_metabolite_adp_molecule_g6p_rheostatbiocrnpyler_34648 in default_violaceinbiocrnpyler_899612_combined = 0;
  species enzyme_zwf_rheostatbiocrnpyler_34648 in default_violaceinbiocrnpyler_899612_combined = 0.2/default_violaceinbiocrnpyler_899612_combined;
  species NADP_violaceinbiocrnpyler_899612_1_combined in default_violaceinbiocrnpyler_899612_combined = 0; NADP_violaceinbiocrnpyler_899612_1_combined is "metabolite_nadp";
  species molecule_6pdglu15lac_rheostatbiocrnpyler_34648 in default_violaceinbiocrnpyler_899612_combined = 0;
  species NADPH_violaceinbiocrnpyler_899612_1_combined in default_violaceinbiocrnpyler_899612_combined = 1/default_violaceinbiocrnpyler_899612_combined; NADPH_violaceinbiocrnpyler_899612_1_combined is "metabolite_nadph";
  species complex_enzyme_zwf_metabolite_nadp_molecule_g6p_rheostatbiocrnpyler_34648 in default_violaceinbiocrnpyler_899612_combined = 0;
  species complex_enzyme_zwf_metabolite_nadph_molecule_6pdglu15lac_rheostatbiocrnpyler_34648 in default_violaceinbiocrnpyler_899612_combined = 0;
  species enzyme_noxe_rheostatbiocrnpyler_34648 in default_violaceinbiocrnpyler_899612_combined = 0.2/default_violaceinbiocrnpyler_899612_combined;
  species molecule_nadph_rheostatbiocrnpyler_34648 in default_violaceinbiocrnpyler_899612_combined = 0;
  species molecule_nadp_rheostatbiocrnpyler_34648 in default_violaceinbiocrnpyler_899612_combined = 0;
  species complex_enzyme_noxe_molecule_nadph_rheostatbiocrnpyler_34648 in default_violaceinbiocrnpyler_899612_combined = 0;
  species complex_enzyme_noxe_molecule_nadp_rheostatbiocrnpyler_34648 in default_violaceinbiocrnpyler_899612_combined = 0;
  species enzyme_pgi_rheostatbiocrnpyler_34648 in default_violaceinbiocrnpyler_899612_combined = 0.2/default_violaceinbiocrnpyler_899612_combined;
  species molecule_6pdgluc_rheostatbiocrnpyler_34648 in default_violaceinbiocrnpyler_899612_combined = 0;
  species complex_enzyme_pgi_molecule_6pdglu15lac_rheostatbiocrnpyler_34648 in default_violaceinbiocrnpyler_899612_combined = 0;
  species complex_enzyme_pgi_molecule_6pdgluc_rheostatbiocrnpyler_34648 in default_violaceinbiocrnpyler_899612_combined = 0;
  species enzyme_gnd_rheostatbiocrnpyler_34648 in default_violaceinbiocrnpyler_899612_combined = 0.2/default_violaceinbiocrnpyler_899612_combined;
  species molecule_rib5p_rheostatbiocrnpyler_34648 in default_violaceinbiocrnpyler_899612_combined = 0;
  species metabolite_co2_rheostatbiocrnpyler_34648 in default_violaceinbiocrnpyler_899612_combined = 0;
  species complex_enzyme_gnd_metabolite_nadp_molecule_6pdgluc_rheostatbiocrnpyler_34648 in default_violaceinbiocrnpyler_899612_combined = 0;
  species complex_enzyme_gnd_metabolite_co2_metabolite_nadph_molecule_rib5p_rheostatbiocrnpyler_34648 in default_violaceinbiocrnpyler_899612_combined = 0;
  species enzyme_rpi_rheostatbiocrnpyler_34648 in default_violaceinbiocrnpyler_899612_combined = 0.2/default_violaceinbiocrnpyler_899612_combined;
  species molecule_rib5p2_rheostatbiocrnpyler_34648 in default_violaceinbiocrnpyler_899612_combined = 0;
  species complex_enzyme_rpi_molecule_rib5p_rheostatbiocrnpyler_34648 in default_violaceinbiocrnpyler_899612_combined = 0;
  species complex_enzyme_rpi_molecule_rib5p2_rheostatbiocrnpyler_34648 in default_violaceinbiocrnpyler_899612_combined = 0;
  species enzyme_rpe_rheostatbiocrnpyler_34648 in default_violaceinbiocrnpyler_899612_combined = 0.2/default_violaceinbiocrnpyler_899612_combined;
  species molecule_xyl5p_rheostatbiocrnpyler_34648 in default_violaceinbiocrnpyler_899612_combined = 0;
  species complex_enzyme_rpe_molecule_rib5p_rheostatbiocrnpyler_34648 in default_violaceinbiocrnpyler_899612_combined = 0;
  species complex_enzyme_rpe_molecule_xyl5p_rheostatbiocrnpyler_34648 in default_violaceinbiocrnpyler_899612_combined = 0;
  species enzyme_xfp_rheostatbiocrnpyler_34648 in default_violaceinbiocrnpyler_899612_combined = 0.2/default_violaceinbiocrnpyler_899612_combined;
  species metabolite_pi_rheostatbiocrnpyler_34648 in default_violaceinbiocrnpyler_899612_combined = 30/default_violaceinbiocrnpyler_899612_combined;
  species molecule_acetylp_rheostatbiocrnpyler_34648 in default_violaceinbiocrnpyler_899612_combined = 0;
  species complex_enzyme_xfp_metabolite_pi_molecule_xyl5p_rheostatbiocrnpyler_34648 in default_violaceinbiocrnpyler_899612_combined = 0;
  species complex_enzyme_xfp_molecule_acetylp_rheostatbiocrnpyler_34648 in default_violaceinbiocrnpyler_899612_combined = 0;
  species enzyme_pta_rheostatbiocrnpyler_34648 in default_violaceinbiocrnpyler_899612_combined = 0.2/default_violaceinbiocrnpyler_899612_combined;
  species metabolite_coa_rheostatbiocrnpyler_34648 in default_violaceinbiocrnpyler_899612_combined = 30/default_violaceinbiocrnpyler_899612_combined;
  species molecule_acetylcoa_rheostatbiocrnpyler_34648 in default_violaceinbiocrnpyler_899612_combined = 0;
  species complex_enzyme_pta_metabolite_coa_molecule_acetylp_rheostatbiocrnpyler_34648 in default_violaceinbiocrnpyler_899612_combined = 0;
  species complex_enzyme_pta_molecule_acetylcoa_rheostatbiocrnpyler_34648 in default_violaceinbiocrnpyler_899612_combined = 0;
  species enzyme_phaa_rheostatbiocrnpyler_34648 in default_violaceinbiocrnpyler_899612_combined = 0.2/default_violaceinbiocrnpyler_899612_combined;
  species molecule_acetoacetylcoa_rheostatbiocrnpyler_34648 in default_violaceinbiocrnpyler_899612_combined = 0;
  species complex_enzyme_phaa_molecule_acetylcoa_rheostatbiocrnpyler_34648 in default_violaceinbiocrnpyler_899612_combined = 0;
  species complex_enzyme_phaa_metabolite_coa_molecule_acetoacetylcoa_rheostatbiocrnpyler_34648 in default_violaceinbiocrnpyler_899612_combined = 0;
  species enzyme_phab_rheostatbiocrnpyler_34648 in default_violaceinbiocrnpyler_899612_combined = 0.2/default_violaceinbiocrnpyler_899612_combined;
  species molecule_3hydroxycoa_rheostatbiocrnpyler_34648 in default_violaceinbiocrnpyler_899612_combined = 0;
  species complex_enzyme_phab_metabolite_nadph_molecule_acetoacetylcoa_rheostatbiocrnpyler_34648 in default_violaceinbiocrnpyler_899612_combined = 0;
  species complex_enzyme_phab_metabolite_nadp_molecule_3hydroxycoa_rheostatbiocrnpyler_34648 in default_violaceinbiocrnpyler_899612_combined = 0;
  species enzyme_phac_rheostatbiocrnpyler_34648 in default_violaceinbiocrnpyler_899612_combined = 0.2/default_violaceinbiocrnpyler_899612_combined;
  species molecule_phb_rheostatbiocrnpyler_34648 in default_violaceinbiocrnpyler_899612_combined = 0;
  species complex_enzyme_phac_molecule_3hydroxycoa_rheostatbiocrnpyler_34648 in default_violaceinbiocrnpyler_899612_combined = 0;
  species complex_enzyme_phac_metabolite_coa_molecule_phb_rheostatbiocrnpyler_34648 in default_violaceinbiocrnpyler_899612_combined = 0;
  species molecule_g3p_rheostatbiocrnpyler_34648 in default_violaceinbiocrnpyler_899612_combined = 0;
  species complex_enzyme_xfp_molecule_xyl5p_rheostatbiocrnpyler_34648 in default_violaceinbiocrnpyler_899612_combined = 0;
  species complex_enzyme_xfp_molecule_g3p_rheostatbiocrnpyler_34648 in default_violaceinbiocrnpyler_899612_combined = 0;
  species enzyme_fba_rheostatbiocrnpyler_34648 in default_violaceinbiocrnpyler_899612_combined = 0.2/default_violaceinbiocrnpyler_899612_combined;
  species molecule_f16bp_rheostatbiocrnpyler_34648 in default_violaceinbiocrnpyler_899612_combined = 0;
  species complex_enzyme_fba_molecule_g3p_rheostatbiocrnpyler_34648 in default_violaceinbiocrnpyler_899612_combined = 0;
  species complex_enzyme_fba_molecule_f16bp_rheostatbiocrnpyler_34648 in default_violaceinbiocrnpyler_899612_combined = 0;
  species molecule_dhap_rheostatbiocrnpyler_34648 in default_violaceinbiocrnpyler_899612_combined = 0;
  species complex_enzyme_fba_molecule_dhap_rheostatbiocrnpyler_34648 in default_violaceinbiocrnpyler_899612_combined = 0;
  species enzyme_tpi_rheostatbiocrnpyler_34648 in default_violaceinbiocrnpyler_899612_combined = 0.2/default_violaceinbiocrnpyler_899612_combined;
  species complex_enzyme_tpi_molecule_dhap_rheostatbiocrnpyler_34648 in default_violaceinbiocrnpyler_899612_combined = 0;
  species complex_enzyme_tpi_molecule_g3p_rheostatbiocrnpyler_34648 in default_violaceinbiocrnpyler_899612_combined = 0;
  species enzyme_pfkb_rheostatbiocrnpyler_34648 in default_violaceinbiocrnpyler_899612_combined = 0.2/default_violaceinbiocrnpyler_899612_combined;
  species molecule_f6p_rheostatbiocrnpyler_34648 in default_violaceinbiocrnpyler_899612_combined = 0;
  species complex_enzyme_pfkb_metabolite_adp_molecule_f16bp_rheostatbiocrnpyler_34648 in default_violaceinbiocrnpyler_899612_combined = 0;
  species complex_enzyme_pfkb_metabolite_atp_molecule_f6p_rheostatbiocrnpyler_34648 in default_violaceinbiocrnpyler_899612_combined = 0;
  species complex_enzyme_pgi_molecule_f6p_rheostatbiocrnpyler_34648 in default_violaceinbiocrnpyler_899612_combined = 0;
  species complex_enzyme_pgi_molecule_g6p_rheostatbiocrnpyler_34648 in default_violaceinbiocrnpyler_899612_combined = 0;
  species molecule_er4p_rheostatbiocrnpyler_34648 in default_violaceinbiocrnpyler_899612_combined = 0;
  species complex_enzyme_xfp_molecule_f6p_rheostatbiocrnpyler_34648 in default_violaceinbiocrnpyler_899612_combined = 0;
  species complex_enzyme_xfp_molecule_er4p_rheostatbiocrnpyler_34648 in default_violaceinbiocrnpyler_899612_combined = 0;
  species complex_enzyme_xfp_metabolite_pi_molecule_f6p_rheostatbiocrnpyler_34648 in default_violaceinbiocrnpyler_899612_combined = 0;
  species enzyme_tktatalb_rheostatbiocrnpyler_34648 in default_violaceinbiocrnpyler_899612_combined = 0.2/default_violaceinbiocrnpyler_899612_combined;
  species complex_enzyme_tktatalb_molecule_er4p_rheostatbiocrnpyler_34648 in default_violaceinbiocrnpyler_899612_combined = 0;
  species complex_enzyme_tktatalb_molecule_f6p_rheostatbiocrnpyler_34648 in default_violaceinbiocrnpyler_899612_combined = 0;
  species complex_enzyme_tktatalb_molecule_g3p_rheostatbiocrnpyler_34648 in default_violaceinbiocrnpyler_899612_combined = 0;
  species complex_enzyme_tktatalb_molecule_rib5p2_rheostatbiocrnpyler_34648 in default_violaceinbiocrnpyler_899612_combined = 0;
  species complex_enzyme_tktatalb_molecule_xyl5p_rheostatbiocrnpyler_34648 in default_violaceinbiocrnpyler_899612_combined = 0;
  species enzyme_nadphase_rheostatbiocrnpyler_34648 in default_violaceinbiocrnpyler_899612_combined = 0.2/default_violaceinbiocrnpyler_899612_combined;
  species complex_enzyme_nadphase_metabolite_nadph_rheostatbiocrnpyler_34648 in default_violaceinbiocrnpyler_899612_combined = 0;
  species complex_enzyme_nadphase_metabolite_nadp_rheostatbiocrnpyler_34648 in default_violaceinbiocrnpyler_899612_combined = 0;

  // Reactions:
  r0_violaceinbiocrnpyler_899612: dna_dna_vioA_violaceinbiocrnpyler_899612 + protein_RNAP_violaceinbiocrnpyler_899612 => complex_dna_dna_vioA_protein_RNAP_violaceinbiocrnpyler_899612; r0_violaceinbiocrnpyler_899612_k*dna_dna_vioA_violaceinbiocrnpyler_899612*protein_RNAP_violaceinbiocrnpyler_899612;
    r0_violaceinbiocrnpyler_899612_k = 100;
  r0_1_violaceinbiocrnpyler_899612: complex_dna_dna_vioA_protein_RNAP_violaceinbiocrnpyler_899612 => dna_dna_vioA_violaceinbiocrnpyler_899612 + protein_RNAP_violaceinbiocrnpyler_899612; r0_1_violaceinbiocrnpyler_899612_k*complex_dna_dna_vioA_protein_RNAP_violaceinbiocrnpyler_899612;
    r0_1_violaceinbiocrnpyler_899612_k = 10;
  r2_violaceinbiocrnpyler_899612: complex_dna_dna_vioA_protein_RNAP_violaceinbiocrnpyler_899612 => dna_dna_vioA_violaceinbiocrnpyler_899612 + transcript_vioA_violaceinbiocrnpyler_899612 + protein_RNAP_violaceinbiocrnpyler_899612; r2_violaceinbiocrnpyler_899612_k*complex_dna_dna_vioA_protein_RNAP_violaceinbiocrnpyler_899612;
    r2_violaceinbiocrnpyler_899612_k = 0.05;
  r3_violaceinbiocrnpyler_899612: transcript_vioA_violaceinbiocrnpyler_899612 + protein_Ribo_violaceinbiocrnpyler_899612 => complex_protein_Ribo_transcript_vioA_violaceinbiocrnpyler_899612; r3_violaceinbiocrnpyler_899612_k*transcript_vioA_violaceinbiocrnpyler_899612*protein_Ribo_violaceinbiocrnpyler_899612;
    r3_violaceinbiocrnpyler_899612_k = 100;
  r3_1_violaceinbiocrnpyler_899612: complex_protein_Ribo_transcript_vioA_violaceinbiocrnpyler_899612 => transcript_vioA_violaceinbiocrnpyler_899612 + protein_Ribo_violaceinbiocrnpyler_899612; r3_1_violaceinbiocrnpyler_899612_k*complex_protein_Ribo_transcript_vioA_violaceinbiocrnpyler_899612;
    r3_1_violaceinbiocrnpyler_899612_k = 10;
  r5_violaceinbiocrnpyler_899612: complex_protein_Ribo_transcript_vioA_violaceinbiocrnpyler_899612 => transcript_vioA_violaceinbiocrnpyler_899612 + enzyme_VioA_violaceinbiocrnpyler_899612 + protein_Ribo_violaceinbiocrnpyler_899612; r5_violaceinbiocrnpyler_899612_k*complex_protein_Ribo_transcript_vioA_violaceinbiocrnpyler_899612;
    r5_violaceinbiocrnpyler_899612_k = 0.05;
  r6_violaceinbiocrnpyler_899612: transcript_vioA_violaceinbiocrnpyler_899612 + protein_RNAase_violaceinbiocrnpyler_899612 => complex_protein_RNAase_transcript_vioA_violaceinbiocrnpyler_899612; r6_violaceinbiocrnpyler_899612_k*transcript_vioA_violaceinbiocrnpyler_899612*protein_RNAase_violaceinbiocrnpyler_899612;
    r6_violaceinbiocrnpyler_899612_k = 100;
  r6_1_violaceinbiocrnpyler_899612: complex_protein_RNAase_transcript_vioA_violaceinbiocrnpyler_899612 => transcript_vioA_violaceinbiocrnpyler_899612 + protein_RNAase_violaceinbiocrnpyler_899612; r6_1_violaceinbiocrnpyler_899612_k*complex_protein_RNAase_transcript_vioA_violaceinbiocrnpyler_899612;
    r6_1_violaceinbiocrnpyler_899612_k = 10;
  r8_violaceinbiocrnpyler_899612: complex_protein_RNAase_transcript_vioA_violaceinbiocrnpyler_899612 => protein_RNAase_violaceinbiocrnpyler_899612; r8_violaceinbiocrnpyler_899612_k*complex_protein_RNAase_transcript_vioA_violaceinbiocrnpyler_899612;
    r8_violaceinbiocrnpyler_899612_k = 0.001;
  r9_violaceinbiocrnpyler_899612: dna_dna_vioB_violaceinbiocrnpyler_899612 + protein_RNAP_violaceinbiocrnpyler_899612 => complex_dna_dna_vioB_protein_RNAP_violaceinbiocrnpyler_899612; r9_violaceinbiocrnpyler_899612_k*dna_dna_vioB_violaceinbiocrnpyler_899612*protein_RNAP_violaceinbiocrnpyler_899612;
    r9_violaceinbiocrnpyler_899612_k = 100;
  r9_1_violaceinbiocrnpyler_899612: complex_dna_dna_vioB_protein_RNAP_violaceinbiocrnpyler_899612 => dna_dna_vioB_violaceinbiocrnpyler_899612 + protein_RNAP_violaceinbiocrnpyler_899612; r9_1_violaceinbiocrnpyler_899612_k*complex_dna_dna_vioB_protein_RNAP_violaceinbiocrnpyler_899612;
    r9_1_violaceinbiocrnpyler_899612_k = 10;
  r11_violaceinbiocrnpyler_899612: complex_dna_dna_vioB_protein_RNAP_violaceinbiocrnpyler_899612 => dna_dna_vioB_violaceinbiocrnpyler_899612 + transcript_vioB_violaceinbiocrnpyler_899612 + protein_RNAP_violaceinbiocrnpyler_899612; r11_violaceinbiocrnpyler_899612_k*complex_dna_dna_vioB_protein_RNAP_violaceinbiocrnpyler_899612;
    r11_violaceinbiocrnpyler_899612_k = 0.05;
  r12_violaceinbiocrnpyler_899612: transcript_vioB_violaceinbiocrnpyler_899612 + protein_Ribo_violaceinbiocrnpyler_899612 => complex_protein_Ribo_transcript_vioB_violaceinbiocrnpyler_899612; r12_violaceinbiocrnpyler_899612_k*transcript_vioB_violaceinbiocrnpyler_899612*protein_Ribo_violaceinbiocrnpyler_899612;
    r12_violaceinbiocrnpyler_899612_k = 100;
  r12_1_violaceinbiocrnpyler_899612: complex_protein_Ribo_transcript_vioB_violaceinbiocrnpyler_899612 => transcript_vioB_violaceinbiocrnpyler_899612 + protein_Ribo_violaceinbiocrnpyler_899612; r12_1_violaceinbiocrnpyler_899612_k*complex_protein_Ribo_transcript_vioB_violaceinbiocrnpyler_899612;
    r12_1_violaceinbiocrnpyler_899612_k = 10;
  r14_violaceinbiocrnpyler_899612: complex_protein_Ribo_transcript_vioB_violaceinbiocrnpyler_899612 => transcript_vioB_violaceinbiocrnpyler_899612 + enzyme_VioB_violaceinbiocrnpyler_899612 + protein_Ribo_violaceinbiocrnpyler_899612; r14_violaceinbiocrnpyler_899612_k*complex_protein_Ribo_transcript_vioB_violaceinbiocrnpyler_899612;
    r14_violaceinbiocrnpyler_899612_k = 0.05;
  r15_violaceinbiocrnpyler_899612: transcript_vioB_violaceinbiocrnpyler_899612 + protein_RNAase_violaceinbiocrnpyler_899612 => complex_protein_RNAase_transcript_vioB_violaceinbiocrnpyler_899612; r15_violaceinbiocrnpyler_899612_k*transcript_vioB_violaceinbiocrnpyler_899612*protein_RNAase_violaceinbiocrnpyler_899612;
    r15_violaceinbiocrnpyler_899612_k = 100;
  r15_1_violaceinbiocrnpyler_899612: complex_protein_RNAase_transcript_vioB_violaceinbiocrnpyler_899612 => transcript_vioB_violaceinbiocrnpyler_899612 + protein_RNAase_violaceinbiocrnpyler_899612; r15_1_violaceinbiocrnpyler_899612_k*complex_protein_RNAase_transcript_vioB_violaceinbiocrnpyler_899612;
    r15_1_violaceinbiocrnpyler_899612_k = 10;
  r17_violaceinbiocrnpyler_899612: complex_protein_RNAase_transcript_vioB_violaceinbiocrnpyler_899612 => protein_RNAase_violaceinbiocrnpyler_899612; r17_violaceinbiocrnpyler_899612_k*complex_protein_RNAase_transcript_vioB_violaceinbiocrnpyler_899612;
    r17_violaceinbiocrnpyler_899612_k = 0.001;
  r18_violaceinbiocrnpyler_899612: dna_dna_vioE_violaceinbiocrnpyler_899612 + protein_RNAP_violaceinbiocrnpyler_899612 => complex_dna_dna_vioE_protein_RNAP_violaceinbiocrnpyler_899612; r18_violaceinbiocrnpyler_899612_k*dna_dna_vioE_violaceinbiocrnpyler_899612*protein_RNAP_violaceinbiocrnpyler_899612;
    r18_violaceinbiocrnpyler_899612_k = 100;
  r18_1_violaceinbiocrnpyler_899612: complex_dna_dna_vioE_protein_RNAP_violaceinbiocrnpyler_899612 => dna_dna_vioE_violaceinbiocrnpyler_899612 + protein_RNAP_violaceinbiocrnpyler_899612; r18_1_violaceinbiocrnpyler_899612_k*complex_dna_dna_vioE_protein_RNAP_violaceinbiocrnpyler_899612;
    r18_1_violaceinbiocrnpyler_899612_k = 10;
  r20_violaceinbiocrnpyler_899612: complex_dna_dna_vioE_protein_RNAP_violaceinbiocrnpyler_899612 => dna_dna_vioE_violaceinbiocrnpyler_899612 + transcript_vioE_violaceinbiocrnpyler_899612 + protein_RNAP_violaceinbiocrnpyler_899612; r20_violaceinbiocrnpyler_899612_k*complex_dna_dna_vioE_protein_RNAP_violaceinbiocrnpyler_899612;
    r20_violaceinbiocrnpyler_899612_k = 0.05;
  r21_violaceinbiocrnpyler_899612: transcript_vioE_violaceinbiocrnpyler_899612 + protein_Ribo_violaceinbiocrnpyler_899612 => complex_protein_Ribo_transcript_vioE_violaceinbiocrnpyler_899612; r21_violaceinbiocrnpyler_899612_k*transcript_vioE_violaceinbiocrnpyler_899612*protein_Ribo_violaceinbiocrnpyler_899612;
    r21_violaceinbiocrnpyler_899612_k = 100;
  r21_1_violaceinbiocrnpyler_899612: complex_protein_Ribo_transcript_vioE_violaceinbiocrnpyler_899612 => transcript_vioE_violaceinbiocrnpyler_899612 + protein_Ribo_violaceinbiocrnpyler_899612; r21_1_violaceinbiocrnpyler_899612_k*complex_protein_Ribo_transcript_vioE_violaceinbiocrnpyler_899612;
    r21_1_violaceinbiocrnpyler_899612_k = 10;
  r23_violaceinbiocrnpyler_899612: complex_protein_Ribo_transcript_vioE_violaceinbiocrnpyler_899612 => transcript_vioE_violaceinbiocrnpyler_899612 + enzyme_VioE_violaceinbiocrnpyler_899612 + protein_Ribo_violaceinbiocrnpyler_899612; r23_violaceinbiocrnpyler_899612_k*complex_protein_Ribo_transcript_vioE_violaceinbiocrnpyler_899612;
    r23_violaceinbiocrnpyler_899612_k = 0.05;
  r24_violaceinbiocrnpyler_899612: transcript_vioE_violaceinbiocrnpyler_899612 + protein_RNAase_violaceinbiocrnpyler_899612 => complex_protein_RNAase_transcript_vioE_violaceinbiocrnpyler_899612; r24_violaceinbiocrnpyler_899612_k*transcript_vioE_violaceinbiocrnpyler_899612*protein_RNAase_violaceinbiocrnpyler_899612;
    r24_violaceinbiocrnpyler_899612_k = 100;
  r24_1_violaceinbiocrnpyler_899612: complex_protein_RNAase_transcript_vioE_violaceinbiocrnpyler_899612 => transcript_vioE_violaceinbiocrnpyler_899612 + protein_RNAase_violaceinbiocrnpyler_899612; r24_1_violaceinbiocrnpyler_899612_k*complex_protein_RNAase_transcript_vioE_violaceinbiocrnpyler_899612;
    r24_1_violaceinbiocrnpyler_899612_k = 10;
  r26_violaceinbiocrnpyler_899612: complex_protein_RNAase_transcript_vioE_violaceinbiocrnpyler_899612 => protein_RNAase_violaceinbiocrnpyler_899612; r26_violaceinbiocrnpyler_899612_k*complex_protein_RNAase_transcript_vioE_violaceinbiocrnpyler_899612;
    r26_violaceinbiocrnpyler_899612_k = 0.001;
  r27_violaceinbiocrnpyler_899612: dna_dna_vioD_violaceinbiocrnpyler_899612 + protein_RNAP_violaceinbiocrnpyler_899612 => complex_dna_dna_vioD_protein_RNAP_violaceinbiocrnpyler_899612; r27_violaceinbiocrnpyler_899612_k*dna_dna_vioD_violaceinbiocrnpyler_899612*protein_RNAP_violaceinbiocrnpyler_899612;
    r27_violaceinbiocrnpyler_899612_k = 100;
  r27_1_violaceinbiocrnpyler_899612: complex_dna_dna_vioD_protein_RNAP_violaceinbiocrnpyler_899612 => dna_dna_vioD_violaceinbiocrnpyler_899612 + protein_RNAP_violaceinbiocrnpyler_899612; r27_1_violaceinbiocrnpyler_899612_k*complex_dna_dna_vioD_protein_RNAP_violaceinbiocrnpyler_899612;
    r27_1_violaceinbiocrnpyler_899612_k = 10;
  r29_violaceinbiocrnpyler_899612: complex_dna_dna_vioD_protein_RNAP_violaceinbiocrnpyler_899612 => dna_dna_vioD_violaceinbiocrnpyler_899612 + transcript_vioD_violaceinbiocrnpyler_899612 + protein_RNAP_violaceinbiocrnpyler_899612; r29_violaceinbiocrnpyler_899612_k*complex_dna_dna_vioD_protein_RNAP_violaceinbiocrnpyler_899612;
    r29_violaceinbiocrnpyler_899612_k = 0.05;
  r30_violaceinbiocrnpyler_899612: transcript_vioD_violaceinbiocrnpyler_899612 + protein_Ribo_violaceinbiocrnpyler_899612 => complex_protein_Ribo_transcript_vioD_violaceinbiocrnpyler_899612; r30_violaceinbiocrnpyler_899612_k*transcript_vioD_violaceinbiocrnpyler_899612*protein_Ribo_violaceinbiocrnpyler_899612;
    r30_violaceinbiocrnpyler_899612_k = 100;
  r30_1_violaceinbiocrnpyler_899612: complex_protein_Ribo_transcript_vioD_violaceinbiocrnpyler_899612 => transcript_vioD_violaceinbiocrnpyler_899612 + protein_Ribo_violaceinbiocrnpyler_899612; r30_1_violaceinbiocrnpyler_899612_k*complex_protein_Ribo_transcript_vioD_violaceinbiocrnpyler_899612;
    r30_1_violaceinbiocrnpyler_899612_k = 10;
  r32_violaceinbiocrnpyler_899612: complex_protein_Ribo_transcript_vioD_violaceinbiocrnpyler_899612 => transcript_vioD_violaceinbiocrnpyler_899612 + enzyme_VioD_violaceinbiocrnpyler_899612 + protein_Ribo_violaceinbiocrnpyler_899612; r32_violaceinbiocrnpyler_899612_k*complex_protein_Ribo_transcript_vioD_violaceinbiocrnpyler_899612;
    r32_violaceinbiocrnpyler_899612_k = 0.05;
  r33_violaceinbiocrnpyler_899612: transcript_vioD_violaceinbiocrnpyler_899612 + protein_RNAase_violaceinbiocrnpyler_899612 => complex_protein_RNAase_transcript_vioD_violaceinbiocrnpyler_899612; r33_violaceinbiocrnpyler_899612_k*transcript_vioD_violaceinbiocrnpyler_899612*protein_RNAase_violaceinbiocrnpyler_899612;
    r33_violaceinbiocrnpyler_899612_k = 100;
  r33_1_violaceinbiocrnpyler_899612: complex_protein_RNAase_transcript_vioD_violaceinbiocrnpyler_899612 => transcript_vioD_violaceinbiocrnpyler_899612 + protein_RNAase_violaceinbiocrnpyler_899612; r33_1_violaceinbiocrnpyler_899612_k*complex_protein_RNAase_transcript_vioD_violaceinbiocrnpyler_899612;
    r33_1_violaceinbiocrnpyler_899612_k = 10;
  r35_violaceinbiocrnpyler_899612: complex_protein_RNAase_transcript_vioD_violaceinbiocrnpyler_899612 => protein_RNAase_violaceinbiocrnpyler_899612; r35_violaceinbiocrnpyler_899612_k*complex_protein_RNAase_transcript_vioD_violaceinbiocrnpyler_899612;
    r35_violaceinbiocrnpyler_899612_k = 0.001;
  r36_violaceinbiocrnpyler_899612: dna_dna_vioC_violaceinbiocrnpyler_899612 + protein_RNAP_violaceinbiocrnpyler_899612 => complex_dna_dna_vioC_protein_RNAP_violaceinbiocrnpyler_899612; r36_violaceinbiocrnpyler_899612_k*dna_dna_vioC_violaceinbiocrnpyler_899612*protein_RNAP_violaceinbiocrnpyler_899612;
    r36_violaceinbiocrnpyler_899612_k = 100;
  r36_1_violaceinbiocrnpyler_899612: complex_dna_dna_vioC_protein_RNAP_violaceinbiocrnpyler_899612 => dna_dna_vioC_violaceinbiocrnpyler_899612 + protein_RNAP_violaceinbiocrnpyler_899612; r36_1_violaceinbiocrnpyler_899612_k*complex_dna_dna_vioC_protein_RNAP_violaceinbiocrnpyler_899612;
    r36_1_violaceinbiocrnpyler_899612_k = 10;
  r38_violaceinbiocrnpyler_899612: complex_dna_dna_vioC_protein_RNAP_violaceinbiocrnpyler_899612 => dna_dna_vioC_violaceinbiocrnpyler_899612 + transcript_vioC_violaceinbiocrnpyler_899612 + protein_RNAP_violaceinbiocrnpyler_899612; r38_violaceinbiocrnpyler_899612_k*complex_dna_dna_vioC_protein_RNAP_violaceinbiocrnpyler_899612;
    r38_violaceinbiocrnpyler_899612_k = 0.05;
  r39_violaceinbiocrnpyler_899612: transcript_vioC_violaceinbiocrnpyler_899612 + protein_Ribo_violaceinbiocrnpyler_899612 => complex_protein_Ribo_transcript_vioC_violaceinbiocrnpyler_899612; r39_violaceinbiocrnpyler_899612_k*transcript_vioC_violaceinbiocrnpyler_899612*protein_Ribo_violaceinbiocrnpyler_899612;
    r39_violaceinbiocrnpyler_899612_k = 100;
  r39_1_violaceinbiocrnpyler_899612: complex_protein_Ribo_transcript_vioC_violaceinbiocrnpyler_899612 => transcript_vioC_violaceinbiocrnpyler_899612 + protein_Ribo_violaceinbiocrnpyler_899612; r39_1_violaceinbiocrnpyler_899612_k*complex_protein_Ribo_transcript_vioC_violaceinbiocrnpyler_899612;
    r39_1_violaceinbiocrnpyler_899612_k = 10;
  r41_violaceinbiocrnpyler_899612: complex_protein_Ribo_transcript_vioC_violaceinbiocrnpyler_899612 => transcript_vioC_violaceinbiocrnpyler_899612 + enzyme_VioC_violaceinbiocrnpyler_899612 + protein_Ribo_violaceinbiocrnpyler_899612; r41_violaceinbiocrnpyler_899612_k*complex_protein_Ribo_transcript_vioC_violaceinbiocrnpyler_899612;
    r41_violaceinbiocrnpyler_899612_k = 0.05;
  r42_violaceinbiocrnpyler_899612: transcript_vioC_violaceinbiocrnpyler_899612 + protein_RNAase_violaceinbiocrnpyler_899612 => complex_protein_RNAase_transcript_vioC_violaceinbiocrnpyler_899612; r42_violaceinbiocrnpyler_899612_k*transcript_vioC_violaceinbiocrnpyler_899612*protein_RNAase_violaceinbiocrnpyler_899612;
    r42_violaceinbiocrnpyler_899612_k = 100;
  r42_1_violaceinbiocrnpyler_899612: complex_protein_RNAase_transcript_vioC_violaceinbiocrnpyler_899612 => transcript_vioC_violaceinbiocrnpyler_899612 + protein_RNAase_violaceinbiocrnpyler_899612; r42_1_violaceinbiocrnpyler_899612_k*complex_protein_RNAase_transcript_vioC_violaceinbiocrnpyler_899612;
    r42_1_violaceinbiocrnpyler_899612_k = 10;
  r44_violaceinbiocrnpyler_899612: complex_protein_RNAase_transcript_vioC_violaceinbiocrnpyler_899612 => protein_RNAase_violaceinbiocrnpyler_899612; r44_violaceinbiocrnpyler_899612_k*complex_protein_RNAase_transcript_vioC_violaceinbiocrnpyler_899612;
    r44_violaceinbiocrnpyler_899612_k = 0.001;
  r45_violaceinbiocrnpyler_899612: TRP_violaceinbiocrnpyler_899612 + enzyme_VioA_violaceinbiocrnpyler_899612 => complex_TRP_enzyme_VioA_violaceinbiocrnpyler_899612; r45_violaceinbiocrnpyler_899612_k*TRP_violaceinbiocrnpyler_899612*enzyme_VioA_violaceinbiocrnpyler_899612;
    r45_violaceinbiocrnpyler_899612_k = 10;
  r45_1_violaceinbiocrnpyler_899612: complex_TRP_enzyme_VioA_violaceinbiocrnpyler_899612 => TRP_violaceinbiocrnpyler_899612 + enzyme_VioA_violaceinbiocrnpyler_899612; r45_1_violaceinbiocrnpyler_899612_k*complex_TRP_enzyme_VioA_violaceinbiocrnpyler_899612;
    r45_1_violaceinbiocrnpyler_899612_k = 1;
  r47_violaceinbiocrnpyler_899612: complex_TRP_enzyme_VioA_violaceinbiocrnpyler_899612 => IPA_imine_violaceinbiocrnpyler_899612 + enzyme_VioA_violaceinbiocrnpyler_899612; r47_violaceinbiocrnpyler_899612_k*complex_TRP_enzyme_VioA_violaceinbiocrnpyler_899612;
    r47_violaceinbiocrnpyler_899612_k = 203;
  r48_violaceinbiocrnpyler_899612: 2 IPA_imine_violaceinbiocrnpyler_899612 + enzyme_VioB_violaceinbiocrnpyler_899612 => complex_2x_IPA_imine_enzyme_VioB_violaceinbiocrnpyler_899612; r48_violaceinbiocrnpyler_899612_k*IPA_imine_violaceinbiocrnpyler_899612^2*enzyme_VioB_violaceinbiocrnpyler_899612;
    r48_violaceinbiocrnpyler_899612_k = 10;
  r48_1_violaceinbiocrnpyler_899612: complex_2x_IPA_imine_enzyme_VioB_violaceinbiocrnpyler_899612 => 2 IPA_imine_violaceinbiocrnpyler_899612 + enzyme_VioB_violaceinbiocrnpyler_899612; r48_1_violaceinbiocrnpyler_899612_k*complex_2x_IPA_imine_enzyme_VioB_violaceinbiocrnpyler_899612;
    r48_1_violaceinbiocrnpyler_899612_k = 1;
  r50_violaceinbiocrnpyler_899612: complex_2x_IPA_imine_enzyme_VioB_violaceinbiocrnpyler_899612 => IPA_imine_dimer_violaceinbiocrnpyler_899612 + enzyme_VioB_violaceinbiocrnpyler_899612; r50_violaceinbiocrnpyler_899612_k*complex_2x_IPA_imine_enzyme_VioB_violaceinbiocrnpyler_899612;
    r50_violaceinbiocrnpyler_899612_k = 4500;
  r51_violaceinbiocrnpyler_899612: IPA_imine_dimer_violaceinbiocrnpyler_899612 + enzyme_VioE_violaceinbiocrnpyler_899612 => complex_IPA_imine_dimer_enzyme_VioE_violaceinbiocrnpyler_899612; r51_violaceinbiocrnpyler_899612_k*IPA_imine_dimer_violaceinbiocrnpyler_899612*enzyme_VioE_violaceinbiocrnpyler_899612;
    r51_violaceinbiocrnpyler_899612_k = 100;
  r51_1_violaceinbiocrnpyler_899612: complex_IPA_imine_dimer_enzyme_VioE_violaceinbiocrnpyler_899612 => IPA_imine_dimer_violaceinbiocrnpyler_899612 + enzyme_VioE_violaceinbiocrnpyler_899612; r51_1_violaceinbiocrnpyler_899612_k*complex_IPA_imine_dimer_enzyme_VioE_violaceinbiocrnpyler_899612;
    r51_1_violaceinbiocrnpyler_899612_k = 10;
  r53_violaceinbiocrnpyler_899612: complex_IPA_imine_dimer_enzyme_VioE_violaceinbiocrnpyler_899612 => PTDVA_violaceinbiocrnpyler_899612 + enzyme_VioE_violaceinbiocrnpyler_899612; r53_violaceinbiocrnpyler_899612_k*complex_IPA_imine_dimer_enzyme_VioE_violaceinbiocrnpyler_899612;
    r53_violaceinbiocrnpyler_899612_k = 100;
  r54_violaceinbiocrnpyler_899612: PTDVA_violaceinbiocrnpyler_899612 + NADPH_violaceinbiocrnpyler_899612_1_combined + enzyme_VioD_violaceinbiocrnpyler_899612 => complex_NADPH_PTDVA_enzyme_VioD_violaceinbiocrnpyler_899612; r54_violaceinbiocrnpyler_899612_k*PTDVA_violaceinbiocrnpyler_899612*NADPH_violaceinbiocrnpyler_899612_1_combined*enzyme_VioD_violaceinbiocrnpyler_899612;
    r54_violaceinbiocrnpyler_899612_k = 100;
  r54_1_violaceinbiocrnpyler_899612: complex_NADPH_PTDVA_enzyme_VioD_violaceinbiocrnpyler_899612 => PTDVA_violaceinbiocrnpyler_899612 + NADPH_violaceinbiocrnpyler_899612_1_combined + enzyme_VioD_violaceinbiocrnpyler_899612; r54_1_violaceinbiocrnpyler_899612_k*complex_NADPH_PTDVA_enzyme_VioD_violaceinbiocrnpyler_899612;
    r54_1_violaceinbiocrnpyler_899612_k = 10;
  r56_violaceinbiocrnpyler_899612: complex_NADPH_PTDVA_enzyme_VioD_violaceinbiocrnpyler_899612 => PTVA_violaceinbiocrnpyler_899612 + NADP_violaceinbiocrnpyler_899612_1_combined + enzyme_VioD_violaceinbiocrnpyler_899612; r56_violaceinbiocrnpyler_899612_k*complex_NADPH_PTDVA_enzyme_VioD_violaceinbiocrnpyler_899612;
    r56_violaceinbiocrnpyler_899612_k = 100;
  r57_violaceinbiocrnpyler_899612: PTVA_violaceinbiocrnpyler_899612 + NADPH_violaceinbiocrnpyler_899612_1_combined + enzyme_VioC_violaceinbiocrnpyler_899612 => complex_NADPH_PTVA_enzyme_VioC_violaceinbiocrnpyler_899612; r57_violaceinbiocrnpyler_899612_k*PTVA_violaceinbiocrnpyler_899612*NADPH_violaceinbiocrnpyler_899612_1_combined*enzyme_VioC_violaceinbiocrnpyler_899612;
    r57_violaceinbiocrnpyler_899612_k = 100;
  r57_1_violaceinbiocrnpyler_899612: complex_NADPH_PTVA_enzyme_VioC_violaceinbiocrnpyler_899612 => PTVA_violaceinbiocrnpyler_899612 + NADPH_violaceinbiocrnpyler_899612_1_combined + enzyme_VioC_violaceinbiocrnpyler_899612; r57_1_violaceinbiocrnpyler_899612_k*complex_NADPH_PTVA_enzyme_VioC_violaceinbiocrnpyler_899612;
    r57_1_violaceinbiocrnpyler_899612_k = 10;
  r59_violaceinbiocrnpyler_899612: complex_NADPH_PTVA_enzyme_VioC_violaceinbiocrnpyler_899612 => V_violaceinbiocrnpyler_899612 + NADP_violaceinbiocrnpyler_899612_1_combined + enzyme_VioC_violaceinbiocrnpyler_899612; r59_violaceinbiocrnpyler_899612_k*complex_NADPH_PTVA_enzyme_VioC_violaceinbiocrnpyler_899612;
    r59_violaceinbiocrnpyler_899612_k = 100;
  r60_violaceinbiocrnpyler_899612: PTDVA_violaceinbiocrnpyler_899612 + NADPH_violaceinbiocrnpyler_899612_1_combined + enzyme_VioC_violaceinbiocrnpyler_899612 => complex_NADPH_PTDVA_enzyme_VioC_violaceinbiocrnpyler_899612; r60_violaceinbiocrnpyler_899612_k*PTDVA_violaceinbiocrnpyler_899612*NADPH_violaceinbiocrnpyler_899612_1_combined*enzyme_VioC_violaceinbiocrnpyler_899612;
    r60_violaceinbiocrnpyler_899612_k = 100;
  r60_1_violaceinbiocrnpyler_899612: complex_NADPH_PTDVA_enzyme_VioC_violaceinbiocrnpyler_899612 => PTDVA_violaceinbiocrnpyler_899612 + NADPH_violaceinbiocrnpyler_899612_1_combined + enzyme_VioC_violaceinbiocrnpyler_899612; r60_1_violaceinbiocrnpyler_899612_k*complex_NADPH_PTDVA_enzyme_VioC_violaceinbiocrnpyler_899612;
    r60_1_violaceinbiocrnpyler_899612_k = 10;
  r62_violaceinbiocrnpyler_899612: complex_NADPH_PTDVA_enzyme_VioC_violaceinbiocrnpyler_899612 => DV_violaceinbiocrnpyler_899612 + NADP_violaceinbiocrnpyler_899612_1_combined + enzyme_VioC_violaceinbiocrnpyler_899612; r62_violaceinbiocrnpyler_899612_k*complex_NADPH_PTDVA_enzyme_VioC_violaceinbiocrnpyler_899612;
    r62_violaceinbiocrnpyler_899612_k = 100;
  r0_rheostatbiocrnpyler_34648: enzyme_glk_rheostatbiocrnpyler_34648 + metabolite_atp_rheostatbiocrnpyler_34648 + molecule_glucose_rheostatbiocrnpyler_34648 => complex_enzyme_glk_metabolite_atp_molecule_glucose_rheostatbiocrnpyler_34648; r0_rheostatbiocrnpyler_34648_k*enzyme_glk_rheostatbiocrnpyler_34648*metabolite_atp_rheostatbiocrnpyler_34648*molecule_glucose_rheostatbiocrnpyler_34648;
    r0_rheostatbiocrnpyler_34648_k = 20;
  r0_1_rheostatbiocrnpyler_34648: complex_enzyme_glk_metabolite_atp_molecule_glucose_rheostatbiocrnpyler_34648 => enzyme_glk_rheostatbiocrnpyler_34648 + metabolite_atp_rheostatbiocrnpyler_34648 + molecule_glucose_rheostatbiocrnpyler_34648; r0_1_rheostatbiocrnpyler_34648_k*complex_enzyme_glk_metabolite_atp_molecule_glucose_rheostatbiocrnpyler_34648;
    r0_1_rheostatbiocrnpyler_34648_k = 0.0002;
  r2_rheostatbiocrnpyler_34648: complex_enzyme_glk_metabolite_atp_molecule_glucose_rheostatbiocrnpyler_34648 => complex_enzyme_glk_metabolite_adp_molecule_g6p_rheostatbiocrnpyler_34648; r2_rheostatbiocrnpyler_34648_k*complex_enzyme_glk_metabolite_atp_molecule_glucose_rheostatbiocrnpyler_34648;
    r2_rheostatbiocrnpyler_34648_k = 36000;
  r3_rheostatbiocrnpyler_34648: complex_enzyme_glk_metabolite_adp_molecule_g6p_rheostatbiocrnpyler_34648 => enzyme_glk_rheostatbiocrnpyler_34648 + molecule_g6p_rheostatbiocrnpyler_34648 + metabolite_adp_rheostatbiocrnpyler_34648; r3_rheostatbiocrnpyler_34648_k*complex_enzyme_glk_metabolite_adp_molecule_g6p_rheostatbiocrnpyler_34648;
    r3_rheostatbiocrnpyler_34648_k = 20;
  r3_1_rheostatbiocrnpyler_34648: enzyme_glk_rheostatbiocrnpyler_34648 + molecule_g6p_rheostatbiocrnpyler_34648 + metabolite_adp_rheostatbiocrnpyler_34648 => complex_enzyme_glk_metabolite_adp_molecule_g6p_rheostatbiocrnpyler_34648; r3_1_rheostatbiocrnpyler_34648_k*enzyme_glk_rheostatbiocrnpyler_34648*molecule_g6p_rheostatbiocrnpyler_34648*metabolite_adp_rheostatbiocrnpyler_34648;
    r3_1_rheostatbiocrnpyler_34648_k = 0.0002;
  r5_rheostatbiocrnpyler_34648: enzyme_zwf_rheostatbiocrnpyler_34648 + NADP_violaceinbiocrnpyler_899612_1_combined + molecule_g6p_rheostatbiocrnpyler_34648 => complex_enzyme_zwf_metabolite_nadp_molecule_g6p_rheostatbiocrnpyler_34648; r5_rheostatbiocrnpyler_34648_k*enzyme_zwf_rheostatbiocrnpyler_34648*NADP_violaceinbiocrnpyler_899612_1_combined*molecule_g6p_rheostatbiocrnpyler_34648;
    r5_rheostatbiocrnpyler_34648_k = 20;
  r5_1_rheostatbiocrnpyler_34648: complex_enzyme_zwf_metabolite_nadp_molecule_g6p_rheostatbiocrnpyler_34648 => enzyme_zwf_rheostatbiocrnpyler_34648 + NADP_violaceinbiocrnpyler_899612_1_combined + molecule_g6p_rheostatbiocrnpyler_34648; r5_1_rheostatbiocrnpyler_34648_k*complex_enzyme_zwf_metabolite_nadp_molecule_g6p_rheostatbiocrnpyler_34648;
    r5_1_rheostatbiocrnpyler_34648_k = 0.0002;
  r7_rheostatbiocrnpyler_34648: complex_enzyme_zwf_metabolite_nadp_molecule_g6p_rheostatbiocrnpyler_34648 => complex_enzyme_zwf_metabolite_nadph_molecule_6pdglu15lac_rheostatbiocrnpyler_34648; r7_rheostatbiocrnpyler_34648_k*complex_enzyme_zwf_metabolite_nadp_molecule_g6p_rheostatbiocrnpyler_34648;
    r7_rheostatbiocrnpyler_34648_k = 36000;
  r8_rheostatbiocrnpyler_34648: complex_enzyme_zwf_metabolite_nadph_molecule_6pdglu15lac_rheostatbiocrnpyler_34648 => enzyme_zwf_rheostatbiocrnpyler_34648 + molecule_6pdglu15lac_rheostatbiocrnpyler_34648 + NADPH_violaceinbiocrnpyler_899612_1_combined; r8_rheostatbiocrnpyler_34648_k*complex_enzyme_zwf_metabolite_nadph_molecule_6pdglu15lac_rheostatbiocrnpyler_34648;
    r8_rheostatbiocrnpyler_34648_k = 20;
  r8_1_rheostatbiocrnpyler_34648: enzyme_zwf_rheostatbiocrnpyler_34648 + molecule_6pdglu15lac_rheostatbiocrnpyler_34648 + NADPH_violaceinbiocrnpyler_899612_1_combined => complex_enzyme_zwf_metabolite_nadph_molecule_6pdglu15lac_rheostatbiocrnpyler_34648; r8_1_rheostatbiocrnpyler_34648_k*enzyme_zwf_rheostatbiocrnpyler_34648*molecule_6pdglu15lac_rheostatbiocrnpyler_34648*NADPH_violaceinbiocrnpyler_899612_1_combined;
    r8_1_rheostatbiocrnpyler_34648_k = 0.0002;
  r10_rheostatbiocrnpyler_34648: enzyme_noxe_rheostatbiocrnpyler_34648 + molecule_nadph_rheostatbiocrnpyler_34648 => complex_enzyme_noxe_molecule_nadph_rheostatbiocrnpyler_34648; r10_rheostatbiocrnpyler_34648_k*enzyme_noxe_rheostatbiocrnpyler_34648*molecule_nadph_rheostatbiocrnpyler_34648;
    r10_rheostatbiocrnpyler_34648_k = 20;
  r10_1_rheostatbiocrnpyler_34648: complex_enzyme_noxe_molecule_nadph_rheostatbiocrnpyler_34648 => enzyme_noxe_rheostatbiocrnpyler_34648 + molecule_nadph_rheostatbiocrnpyler_34648; r10_1_rheostatbiocrnpyler_34648_k*complex_enzyme_noxe_molecule_nadph_rheostatbiocrnpyler_34648;
    r10_1_rheostatbiocrnpyler_34648_k = 0.0002;
  r12_rheostatbiocrnpyler_34648: complex_enzyme_noxe_molecule_nadph_rheostatbiocrnpyler_34648 => complex_enzyme_noxe_molecule_nadp_rheostatbiocrnpyler_34648; r12_rheostatbiocrnpyler_34648_k*complex_enzyme_noxe_molecule_nadph_rheostatbiocrnpyler_34648;
    r12_rheostatbiocrnpyler_34648_k = 36000;
  r13_rheostatbiocrnpyler_34648: complex_enzyme_noxe_molecule_nadp_rheostatbiocrnpyler_34648 => enzyme_noxe_rheostatbiocrnpyler_34648 + molecule_nadp_rheostatbiocrnpyler_34648; r13_rheostatbiocrnpyler_34648_k*complex_enzyme_noxe_molecule_nadp_rheostatbiocrnpyler_34648;
    r13_rheostatbiocrnpyler_34648_k = 20;
  r13_1_rheostatbiocrnpyler_34648: enzyme_noxe_rheostatbiocrnpyler_34648 + molecule_nadp_rheostatbiocrnpyler_34648 => complex_enzyme_noxe_molecule_nadp_rheostatbiocrnpyler_34648; r13_1_rheostatbiocrnpyler_34648_k*enzyme_noxe_rheostatbiocrnpyler_34648*molecule_nadp_rheostatbiocrnpyler_34648;
    r13_1_rheostatbiocrnpyler_34648_k = 0.0002;
  r15_rheostatbiocrnpyler_34648: enzyme_pgi_rheostatbiocrnpyler_34648 + molecule_6pdglu15lac_rheostatbiocrnpyler_34648 => complex_enzyme_pgi_molecule_6pdglu15lac_rheostatbiocrnpyler_34648; r15_rheostatbiocrnpyler_34648_k*enzyme_pgi_rheostatbiocrnpyler_34648*molecule_6pdglu15lac_rheostatbiocrnpyler_34648;
    r15_rheostatbiocrnpyler_34648_k = 20;
  r15_1_rheostatbiocrnpyler_34648: complex_enzyme_pgi_molecule_6pdglu15lac_rheostatbiocrnpyler_34648 => enzyme_pgi_rheostatbiocrnpyler_34648 + molecule_6pdglu15lac_rheostatbiocrnpyler_34648; r15_1_rheostatbiocrnpyler_34648_k*complex_enzyme_pgi_molecule_6pdglu15lac_rheostatbiocrnpyler_34648;
    r15_1_rheostatbiocrnpyler_34648_k = 0.0002;
  r17_rheostatbiocrnpyler_34648: complex_enzyme_pgi_molecule_6pdglu15lac_rheostatbiocrnpyler_34648 => complex_enzyme_pgi_molecule_6pdgluc_rheostatbiocrnpyler_34648; r17_rheostatbiocrnpyler_34648_k*complex_enzyme_pgi_molecule_6pdglu15lac_rheostatbiocrnpyler_34648;
    r17_rheostatbiocrnpyler_34648_k = 36000;
  r18_rheostatbiocrnpyler_34648: complex_enzyme_pgi_molecule_6pdgluc_rheostatbiocrnpyler_34648 => enzyme_pgi_rheostatbiocrnpyler_34648 + molecule_6pdgluc_rheostatbiocrnpyler_34648; r18_rheostatbiocrnpyler_34648_k*complex_enzyme_pgi_molecule_6pdgluc_rheostatbiocrnpyler_34648;
    r18_rheostatbiocrnpyler_34648_k = 20;
  r18_1_rheostatbiocrnpyler_34648: enzyme_pgi_rheostatbiocrnpyler_34648 + molecule_6pdgluc_rheostatbiocrnpyler_34648 => complex_enzyme_pgi_molecule_6pdgluc_rheostatbiocrnpyler_34648; r18_1_rheostatbiocrnpyler_34648_k*enzyme_pgi_rheostatbiocrnpyler_34648*molecule_6pdgluc_rheostatbiocrnpyler_34648;
    r18_1_rheostatbiocrnpyler_34648_k = 0.0002;
  r20_rheostatbiocrnpyler_34648: enzyme_gnd_rheostatbiocrnpyler_34648 + NADP_violaceinbiocrnpyler_899612_1_combined + molecule_6pdgluc_rheostatbiocrnpyler_34648 => complex_enzyme_gnd_metabolite_nadp_molecule_6pdgluc_rheostatbiocrnpyler_34648; r20_rheostatbiocrnpyler_34648_k*enzyme_gnd_rheostatbiocrnpyler_34648*NADP_violaceinbiocrnpyler_899612_1_combined*molecule_6pdgluc_rheostatbiocrnpyler_34648;
    r20_rheostatbiocrnpyler_34648_k = 20;
  r20_1_rheostatbiocrnpyler_34648: complex_enzyme_gnd_metabolite_nadp_molecule_6pdgluc_rheostatbiocrnpyler_34648 => enzyme_gnd_rheostatbiocrnpyler_34648 + NADP_violaceinbiocrnpyler_899612_1_combined + molecule_6pdgluc_rheostatbiocrnpyler_34648; r20_1_rheostatbiocrnpyler_34648_k*complex_enzyme_gnd_metabolite_nadp_molecule_6pdgluc_rheostatbiocrnpyler_34648;
    r20_1_rheostatbiocrnpyler_34648_k = 0.0002;
  r22_rheostatbiocrnpyler_34648: complex_enzyme_gnd_metabolite_nadp_molecule_6pdgluc_rheostatbiocrnpyler_34648 => complex_enzyme_gnd_metabolite_co2_metabolite_nadph_molecule_rib5p_rheostatbiocrnpyler_34648; r22_rheostatbiocrnpyler_34648_k*complex_enzyme_gnd_metabolite_nadp_molecule_6pdgluc_rheostatbiocrnpyler_34648;
    r22_rheostatbiocrnpyler_34648_k = 36000;
  r23_rheostatbiocrnpyler_34648: complex_enzyme_gnd_metabolite_co2_metabolite_nadph_molecule_rib5p_rheostatbiocrnpyler_34648 => enzyme_gnd_rheostatbiocrnpyler_34648 + molecule_rib5p_rheostatbiocrnpyler_34648 + NADPH_violaceinbiocrnpyler_899612_1_combined + metabolite_co2_rheostatbiocrnpyler_34648; r23_rheostatbiocrnpyler_34648_k*complex_enzyme_gnd_metabolite_co2_metabolite_nadph_molecule_rib5p_rheostatbiocrnpyler_34648;
    r23_rheostatbiocrnpyler_34648_k = 20;
  r23_1_rheostatbiocrnpyler_34648: enzyme_gnd_rheostatbiocrnpyler_34648 + molecule_rib5p_rheostatbiocrnpyler_34648 + NADPH_violaceinbiocrnpyler_899612_1_combined + metabolite_co2_rheostatbiocrnpyler_34648 => complex_enzyme_gnd_metabolite_co2_metabolite_nadph_molecule_rib5p_rheostatbiocrnpyler_34648; r23_1_rheostatbiocrnpyler_34648_k*enzyme_gnd_rheostatbiocrnpyler_34648*molecule_rib5p_rheostatbiocrnpyler_34648*NADPH_violaceinbiocrnpyler_899612_1_combined*metabolite_co2_rheostatbiocrnpyler_34648;
    r23_1_rheostatbiocrnpyler_34648_k = 0.0002;
  r25_rheostatbiocrnpyler_34648: enzyme_rpi_rheostatbiocrnpyler_34648 + molecule_rib5p_rheostatbiocrnpyler_34648 => complex_enzyme_rpi_molecule_rib5p_rheostatbiocrnpyler_34648; r25_rheostatbiocrnpyler_34648_k*enzyme_rpi_rheostatbiocrnpyler_34648*molecule_rib5p_rheostatbiocrnpyler_34648;
    r25_rheostatbiocrnpyler_34648_k = 20;
  r25_1_rheostatbiocrnpyler_34648: complex_enzyme_rpi_molecule_rib5p_rheostatbiocrnpyler_34648 => enzyme_rpi_rheostatbiocrnpyler_34648 + molecule_rib5p_rheostatbiocrnpyler_34648; r25_1_rheostatbiocrnpyler_34648_k*complex_enzyme_rpi_molecule_rib5p_rheostatbiocrnpyler_34648;
    r25_1_rheostatbiocrnpyler_34648_k = 20;
  r27_rheostatbiocrnpyler_34648: complex_enzyme_rpi_molecule_rib5p_rheostatbiocrnpyler_34648 => complex_enzyme_rpi_molecule_rib5p2_rheostatbiocrnpyler_34648; r27_rheostatbiocrnpyler_34648_k*complex_enzyme_rpi_molecule_rib5p_rheostatbiocrnpyler_34648;
    r27_rheostatbiocrnpyler_34648_k = 36000;
  r28_rheostatbiocrnpyler_34648: complex_enzyme_rpi_molecule_rib5p2_rheostatbiocrnpyler_34648 => enzyme_rpi_rheostatbiocrnpyler_34648 + molecule_rib5p2_rheostatbiocrnpyler_34648; r28_rheostatbiocrnpyler_34648_k*complex_enzyme_rpi_molecule_rib5p2_rheostatbiocrnpyler_34648;
    r28_rheostatbiocrnpyler_34648_k = 20;
  r28_1_rheostatbiocrnpyler_34648: enzyme_rpi_rheostatbiocrnpyler_34648 + molecule_rib5p2_rheostatbiocrnpyler_34648 => complex_enzyme_rpi_molecule_rib5p2_rheostatbiocrnpyler_34648; r28_1_rheostatbiocrnpyler_34648_k*enzyme_rpi_rheostatbiocrnpyler_34648*molecule_rib5p2_rheostatbiocrnpyler_34648;
    r28_1_rheostatbiocrnpyler_34648_k = 20;
  r30_rheostatbiocrnpyler_34648: enzyme_rpe_rheostatbiocrnpyler_34648 + molecule_rib5p_rheostatbiocrnpyler_34648 => complex_enzyme_rpe_molecule_rib5p_rheostatbiocrnpyler_34648; r30_rheostatbiocrnpyler_34648_k*enzyme_rpe_rheostatbiocrnpyler_34648*molecule_rib5p_rheostatbiocrnpyler_34648;
    r30_rheostatbiocrnpyler_34648_k = 20;
  r30_1_rheostatbiocrnpyler_34648: complex_enzyme_rpe_molecule_rib5p_rheostatbiocrnpyler_34648 => enzyme_rpe_rheostatbiocrnpyler_34648 + molecule_rib5p_rheostatbiocrnpyler_34648; r30_1_rheostatbiocrnpyler_34648_k*complex_enzyme_rpe_molecule_rib5p_rheostatbiocrnpyler_34648;
    r30_1_rheostatbiocrnpyler_34648_k = 0.0002;
  r32_rheostatbiocrnpyler_34648: complex_enzyme_rpe_molecule_rib5p_rheostatbiocrnpyler_34648 => complex_enzyme_rpe_molecule_xyl5p_rheostatbiocrnpyler_34648; r32_rheostatbiocrnpyler_34648_k*complex_enzyme_rpe_molecule_rib5p_rheostatbiocrnpyler_34648;
    r32_rheostatbiocrnpyler_34648_k = 36000;
  r33_rheostatbiocrnpyler_34648: complex_enzyme_rpe_molecule_xyl5p_rheostatbiocrnpyler_34648 => enzyme_rpe_rheostatbiocrnpyler_34648 + molecule_xyl5p_rheostatbiocrnpyler_34648; r33_rheostatbiocrnpyler_34648_k*complex_enzyme_rpe_molecule_xyl5p_rheostatbiocrnpyler_34648;
    r33_rheostatbiocrnpyler_34648_k = 20;
  r33_1_rheostatbiocrnpyler_34648: enzyme_rpe_rheostatbiocrnpyler_34648 + molecule_xyl5p_rheostatbiocrnpyler_34648 => complex_enzyme_rpe_molecule_xyl5p_rheostatbiocrnpyler_34648; r33_1_rheostatbiocrnpyler_34648_k*enzyme_rpe_rheostatbiocrnpyler_34648*molecule_xyl5p_rheostatbiocrnpyler_34648;
    r33_1_rheostatbiocrnpyler_34648_k = 0.0002;
  r35_rheostatbiocrnpyler_34648: enzyme_xfp_rheostatbiocrnpyler_34648 + metabolite_pi_rheostatbiocrnpyler_34648 + molecule_xyl5p_rheostatbiocrnpyler_34648 => complex_enzyme_xfp_metabolite_pi_molecule_xyl5p_rheostatbiocrnpyler_34648; r35_rheostatbiocrnpyler_34648_k*enzyme_xfp_rheostatbiocrnpyler_34648*metabolite_pi_rheostatbiocrnpyler_34648*molecule_xyl5p_rheostatbiocrnpyler_34648;
    r35_rheostatbiocrnpyler_34648_k = 20;
  r35_1_rheostatbiocrnpyler_34648: complex_enzyme_xfp_metabolite_pi_molecule_xyl5p_rheostatbiocrnpyler_34648 => enzyme_xfp_rheostatbiocrnpyler_34648 + metabolite_pi_rheostatbiocrnpyler_34648 + molecule_xyl5p_rheostatbiocrnpyler_34648; r35_1_rheostatbiocrnpyler_34648_k*complex_enzyme_xfp_metabolite_pi_molecule_xyl5p_rheostatbiocrnpyler_34648;
    r35_1_rheostatbiocrnpyler_34648_k = 0.0002;
  r37_rheostatbiocrnpyler_34648: complex_enzyme_xfp_metabolite_pi_molecule_xyl5p_rheostatbiocrnpyler_34648 => complex_enzyme_xfp_molecule_acetylp_rheostatbiocrnpyler_34648; r37_rheostatbiocrnpyler_34648_k*complex_enzyme_xfp_metabolite_pi_molecule_xyl5p_rheostatbiocrnpyler_34648;
    r37_rheostatbiocrnpyler_34648_k = 36000;
  r38_rheostatbiocrnpyler_34648: complex_enzyme_xfp_molecule_acetylp_rheostatbiocrnpyler_34648 => enzyme_xfp_rheostatbiocrnpyler_34648 + molecule_acetylp_rheostatbiocrnpyler_34648; r38_rheostatbiocrnpyler_34648_k*complex_enzyme_xfp_molecule_acetylp_rheostatbiocrnpyler_34648;
    r38_rheostatbiocrnpyler_34648_k = 20;
  r38_1_rheostatbiocrnpyler_34648: enzyme_xfp_rheostatbiocrnpyler_34648 + molecule_acetylp_rheostatbiocrnpyler_34648 => complex_enzyme_xfp_molecule_acetylp_rheostatbiocrnpyler_34648; r38_1_rheostatbiocrnpyler_34648_k*enzyme_xfp_rheostatbiocrnpyler_34648*molecule_acetylp_rheostatbiocrnpyler_34648;
    r38_1_rheostatbiocrnpyler_34648_k = 0.0002;
  r40_rheostatbiocrnpyler_34648: enzyme_pta_rheostatbiocrnpyler_34648 + metabolite_coa_rheostatbiocrnpyler_34648 + molecule_acetylp_rheostatbiocrnpyler_34648 => complex_enzyme_pta_metabolite_coa_molecule_acetylp_rheostatbiocrnpyler_34648; r40_rheostatbiocrnpyler_34648_k*enzyme_pta_rheostatbiocrnpyler_34648*metabolite_coa_rheostatbiocrnpyler_34648*molecule_acetylp_rheostatbiocrnpyler_34648;
    r40_rheostatbiocrnpyler_34648_k = 20;
  r40_1_rheostatbiocrnpyler_34648: complex_enzyme_pta_metabolite_coa_molecule_acetylp_rheostatbiocrnpyler_34648 => enzyme_pta_rheostatbiocrnpyler_34648 + metabolite_coa_rheostatbiocrnpyler_34648 + molecule_acetylp_rheostatbiocrnpyler_34648; r40_1_rheostatbiocrnpyler_34648_k*complex_enzyme_pta_metabolite_coa_molecule_acetylp_rheostatbiocrnpyler_34648;
    r40_1_rheostatbiocrnpyler_34648_k = 0.0002;
  r42_rheostatbiocrnpyler_34648: complex_enzyme_pta_metabolite_coa_molecule_acetylp_rheostatbiocrnpyler_34648 => complex_enzyme_pta_molecule_acetylcoa_rheostatbiocrnpyler_34648; r42_rheostatbiocrnpyler_34648_k*complex_enzyme_pta_metabolite_coa_molecule_acetylp_rheostatbiocrnpyler_34648;
    r42_rheostatbiocrnpyler_34648_k = 36000;
  r43_rheostatbiocrnpyler_34648: complex_enzyme_pta_molecule_acetylcoa_rheostatbiocrnpyler_34648 => enzyme_pta_rheostatbiocrnpyler_34648 + molecule_acetylcoa_rheostatbiocrnpyler_34648; r43_rheostatbiocrnpyler_34648_k*complex_enzyme_pta_molecule_acetylcoa_rheostatbiocrnpyler_34648;
    r43_rheostatbiocrnpyler_34648_k = 20;
  r43_1_rheostatbiocrnpyler_34648: enzyme_pta_rheostatbiocrnpyler_34648 + molecule_acetylcoa_rheostatbiocrnpyler_34648 => complex_enzyme_pta_molecule_acetylcoa_rheostatbiocrnpyler_34648; r43_1_rheostatbiocrnpyler_34648_k*enzyme_pta_rheostatbiocrnpyler_34648*molecule_acetylcoa_rheostatbiocrnpyler_34648;
    r43_1_rheostatbiocrnpyler_34648_k = 0.0002;
  r45_rheostatbiocrnpyler_34648: enzyme_phaa_rheostatbiocrnpyler_34648 + molecule_acetylcoa_rheostatbiocrnpyler_34648 => complex_enzyme_phaa_molecule_acetylcoa_rheostatbiocrnpyler_34648; r45_rheostatbiocrnpyler_34648_k*enzyme_phaa_rheostatbiocrnpyler_34648*molecule_acetylcoa_rheostatbiocrnpyler_34648;
    r45_rheostatbiocrnpyler_34648_k = 20;
  r45_1_rheostatbiocrnpyler_34648: complex_enzyme_phaa_molecule_acetylcoa_rheostatbiocrnpyler_34648 => enzyme_phaa_rheostatbiocrnpyler_34648 + molecule_acetylcoa_rheostatbiocrnpyler_34648; r45_1_rheostatbiocrnpyler_34648_k*complex_enzyme_phaa_molecule_acetylcoa_rheostatbiocrnpyler_34648;
    r45_1_rheostatbiocrnpyler_34648_k = 0.0002;
  r47_rheostatbiocrnpyler_34648: complex_enzyme_phaa_molecule_acetylcoa_rheostatbiocrnpyler_34648 => complex_enzyme_phaa_metabolite_coa_molecule_acetoacetylcoa_rheostatbiocrnpyler_34648; r47_rheostatbiocrnpyler_34648_k*complex_enzyme_phaa_molecule_acetylcoa_rheostatbiocrnpyler_34648;
    r47_rheostatbiocrnpyler_34648_k = 36000;
  r48_rheostatbiocrnpyler_34648: complex_enzyme_phaa_metabolite_coa_molecule_acetoacetylcoa_rheostatbiocrnpyler_34648 => enzyme_phaa_rheostatbiocrnpyler_34648 + molecule_acetoacetylcoa_rheostatbiocrnpyler_34648 + metabolite_coa_rheostatbiocrnpyler_34648; r48_rheostatbiocrnpyler_34648_k*complex_enzyme_phaa_metabolite_coa_molecule_acetoacetylcoa_rheostatbiocrnpyler_34648;
    r48_rheostatbiocrnpyler_34648_k = 20;
  r48_1_rheostatbiocrnpyler_34648: enzyme_phaa_rheostatbiocrnpyler_34648 + molecule_acetoacetylcoa_rheostatbiocrnpyler_34648 + metabolite_coa_rheostatbiocrnpyler_34648 => complex_enzyme_phaa_metabolite_coa_molecule_acetoacetylcoa_rheostatbiocrnpyler_34648; r48_1_rheostatbiocrnpyler_34648_k*enzyme_phaa_rheostatbiocrnpyler_34648*molecule_acetoacetylcoa_rheostatbiocrnpyler_34648*metabolite_coa_rheostatbiocrnpyler_34648;
    r48_1_rheostatbiocrnpyler_34648_k = 0.0002;
  r50_rheostatbiocrnpyler_34648: enzyme_phab_rheostatbiocrnpyler_34648 + NADPH_violaceinbiocrnpyler_899612_1_combined + molecule_acetoacetylcoa_rheostatbiocrnpyler_34648 => complex_enzyme_phab_metabolite_nadph_molecule_acetoacetylcoa_rheostatbiocrnpyler_34648; r50_rheostatbiocrnpyler_34648_k*enzyme_phab_rheostatbiocrnpyler_34648*NADPH_violaceinbiocrnpyler_899612_1_combined*molecule_acetoacetylcoa_rheostatbiocrnpyler_34648;
    r50_rheostatbiocrnpyler_34648_k = 20;
  r50_1_rheostatbiocrnpyler_34648: complex_enzyme_phab_metabolite_nadph_molecule_acetoacetylcoa_rheostatbiocrnpyler_34648 => enzyme_phab_rheostatbiocrnpyler_34648 + NADPH_violaceinbiocrnpyler_899612_1_combined + molecule_acetoacetylcoa_rheostatbiocrnpyler_34648; r50_1_rheostatbiocrnpyler_34648_k*complex_enzyme_phab_metabolite_nadph_molecule_acetoacetylcoa_rheostatbiocrnpyler_34648;
    r50_1_rheostatbiocrnpyler_34648_k = 0.0002;
  r52_rheostatbiocrnpyler_34648: complex_enzyme_phab_metabolite_nadph_molecule_acetoacetylcoa_rheostatbiocrnpyler_34648 => complex_enzyme_phab_metabolite_nadp_molecule_3hydroxycoa_rheostatbiocrnpyler_34648; r52_rheostatbiocrnpyler_34648_k*complex_enzyme_phab_metabolite_nadph_molecule_acetoacetylcoa_rheostatbiocrnpyler_34648;
    r52_rheostatbiocrnpyler_34648_k = 36000;
  r53_rheostatbiocrnpyler_34648: complex_enzyme_phab_metabolite_nadp_molecule_3hydroxycoa_rheostatbiocrnpyler_34648 => enzyme_phab_rheostatbiocrnpyler_34648 + molecule_3hydroxycoa_rheostatbiocrnpyler_34648 + NADP_violaceinbiocrnpyler_899612_1_combined; r53_rheostatbiocrnpyler_34648_k*complex_enzyme_phab_metabolite_nadp_molecule_3hydroxycoa_rheostatbiocrnpyler_34648;
    r53_rheostatbiocrnpyler_34648_k = 20;
  r53_1_rheostatbiocrnpyler_34648: enzyme_phab_rheostatbiocrnpyler_34648 + molecule_3hydroxycoa_rheostatbiocrnpyler_34648 + NADP_violaceinbiocrnpyler_899612_1_combined => complex_enzyme_phab_metabolite_nadp_molecule_3hydroxycoa_rheostatbiocrnpyler_34648; r53_1_rheostatbiocrnpyler_34648_k*enzyme_phab_rheostatbiocrnpyler_34648*molecule_3hydroxycoa_rheostatbiocrnpyler_34648*NADP_violaceinbiocrnpyler_899612_1_combined;
    r53_1_rheostatbiocrnpyler_34648_k = 0.0002;
  r55_rheostatbiocrnpyler_34648: enzyme_phac_rheostatbiocrnpyler_34648 + molecule_3hydroxycoa_rheostatbiocrnpyler_34648 => complex_enzyme_phac_molecule_3hydroxycoa_rheostatbiocrnpyler_34648; r55_rheostatbiocrnpyler_34648_k*enzyme_phac_rheostatbiocrnpyler_34648*molecule_3hydroxycoa_rheostatbiocrnpyler_34648;
    r55_rheostatbiocrnpyler_34648_k = 20;
  r55_1_rheostatbiocrnpyler_34648: complex_enzyme_phac_molecule_3hydroxycoa_rheostatbiocrnpyler_34648 => enzyme_phac_rheostatbiocrnpyler_34648 + molecule_3hydroxycoa_rheostatbiocrnpyler_34648; r55_1_rheostatbiocrnpyler_34648_k*complex_enzyme_phac_molecule_3hydroxycoa_rheostatbiocrnpyler_34648;
    r55_1_rheostatbiocrnpyler_34648_k = 0.0002;
  r57_rheostatbiocrnpyler_34648: complex_enzyme_phac_molecule_3hydroxycoa_rheostatbiocrnpyler_34648 => complex_enzyme_phac_metabolite_coa_molecule_phb_rheostatbiocrnpyler_34648; r57_rheostatbiocrnpyler_34648_k*complex_enzyme_phac_molecule_3hydroxycoa_rheostatbiocrnpyler_34648;
    r57_rheostatbiocrnpyler_34648_k = 36000;
  r58_rheostatbiocrnpyler_34648: complex_enzyme_phac_metabolite_coa_molecule_phb_rheostatbiocrnpyler_34648 => enzyme_phac_rheostatbiocrnpyler_34648 + molecule_phb_rheostatbiocrnpyler_34648 + metabolite_coa_rheostatbiocrnpyler_34648; r58_rheostatbiocrnpyler_34648_k*complex_enzyme_phac_metabolite_coa_molecule_phb_rheostatbiocrnpyler_34648;
    r58_rheostatbiocrnpyler_34648_k = 20;
  r58_1_rheostatbiocrnpyler_34648: enzyme_phac_rheostatbiocrnpyler_34648 + molecule_phb_rheostatbiocrnpyler_34648 + metabolite_coa_rheostatbiocrnpyler_34648 => complex_enzyme_phac_metabolite_coa_molecule_phb_rheostatbiocrnpyler_34648; r58_1_rheostatbiocrnpyler_34648_k*enzyme_phac_rheostatbiocrnpyler_34648*molecule_phb_rheostatbiocrnpyler_34648*metabolite_coa_rheostatbiocrnpyler_34648;
    r58_1_rheostatbiocrnpyler_34648_k = 0.0002;
  r60_rheostatbiocrnpyler_34648: enzyme_xfp_rheostatbiocrnpyler_34648 + molecule_xyl5p_rheostatbiocrnpyler_34648 => complex_enzyme_xfp_molecule_xyl5p_rheostatbiocrnpyler_34648; r60_rheostatbiocrnpyler_34648_k*enzyme_xfp_rheostatbiocrnpyler_34648*molecule_xyl5p_rheostatbiocrnpyler_34648;
    r60_rheostatbiocrnpyler_34648_k = 20;
  r60_1_rheostatbiocrnpyler_34648: complex_enzyme_xfp_molecule_xyl5p_rheostatbiocrnpyler_34648 => enzyme_xfp_rheostatbiocrnpyler_34648 + molecule_xyl5p_rheostatbiocrnpyler_34648; r60_1_rheostatbiocrnpyler_34648_k*complex_enzyme_xfp_molecule_xyl5p_rheostatbiocrnpyler_34648;
    r60_1_rheostatbiocrnpyler_34648_k = 0.0002;
  r62_rheostatbiocrnpyler_34648: complex_enzyme_xfp_molecule_xyl5p_rheostatbiocrnpyler_34648 => complex_enzyme_xfp_molecule_g3p_rheostatbiocrnpyler_34648; r62_rheostatbiocrnpyler_34648_k*complex_enzyme_xfp_molecule_xyl5p_rheostatbiocrnpyler_34648;
    r62_rheostatbiocrnpyler_34648_k = 36000;
  r63_rheostatbiocrnpyler_34648: complex_enzyme_xfp_molecule_g3p_rheostatbiocrnpyler_34648 => enzyme_xfp_rheostatbiocrnpyler_34648 + molecule_g3p_rheostatbiocrnpyler_34648; r63_rheostatbiocrnpyler_34648_k*complex_enzyme_xfp_molecule_g3p_rheostatbiocrnpyler_34648;
    r63_rheostatbiocrnpyler_34648_k = 20;
  r63_1_rheostatbiocrnpyler_34648: enzyme_xfp_rheostatbiocrnpyler_34648 + molecule_g3p_rheostatbiocrnpyler_34648 => complex_enzyme_xfp_molecule_g3p_rheostatbiocrnpyler_34648; r63_1_rheostatbiocrnpyler_34648_k*enzyme_xfp_rheostatbiocrnpyler_34648*molecule_g3p_rheostatbiocrnpyler_34648;
    r63_1_rheostatbiocrnpyler_34648_k = 0.0002;
  r65_rheostatbiocrnpyler_34648: enzyme_fba_rheostatbiocrnpyler_34648 + molecule_g3p_rheostatbiocrnpyler_34648 => complex_enzyme_fba_molecule_g3p_rheostatbiocrnpyler_34648; r65_rheostatbiocrnpyler_34648_k*enzyme_fba_rheostatbiocrnpyler_34648*molecule_g3p_rheostatbiocrnpyler_34648;
    r65_rheostatbiocrnpyler_34648_k = 20;
  r65_1_rheostatbiocrnpyler_34648: complex_enzyme_fba_molecule_g3p_rheostatbiocrnpyler_34648 => enzyme_fba_rheostatbiocrnpyler_34648 + molecule_g3p_rheostatbiocrnpyler_34648; r65_1_rheostatbiocrnpyler_34648_k*complex_enzyme_fba_molecule_g3p_rheostatbiocrnpyler_34648;
    r65_1_rheostatbiocrnpyler_34648_k = 0.0002;
  r67_rheostatbiocrnpyler_34648: complex_enzyme_fba_molecule_g3p_rheostatbiocrnpyler_34648 => complex_enzyme_fba_molecule_f16bp_rheostatbiocrnpyler_34648; r67_rheostatbiocrnpyler_34648_k*complex_enzyme_fba_molecule_g3p_rheostatbiocrnpyler_34648;
    r67_rheostatbiocrnpyler_34648_k = 36000;
  r68_rheostatbiocrnpyler_34648: complex_enzyme_fba_molecule_f16bp_rheostatbiocrnpyler_34648 => enzyme_fba_rheostatbiocrnpyler_34648 + molecule_f16bp_rheostatbiocrnpyler_34648; r68_rheostatbiocrnpyler_34648_k*complex_enzyme_fba_molecule_f16bp_rheostatbiocrnpyler_34648;
    r68_rheostatbiocrnpyler_34648_k = 20;
  r68_1_rheostatbiocrnpyler_34648: enzyme_fba_rheostatbiocrnpyler_34648 + molecule_f16bp_rheostatbiocrnpyler_34648 => complex_enzyme_fba_molecule_f16bp_rheostatbiocrnpyler_34648; r68_1_rheostatbiocrnpyler_34648_k*enzyme_fba_rheostatbiocrnpyler_34648*molecule_f16bp_rheostatbiocrnpyler_34648;
    r68_1_rheostatbiocrnpyler_34648_k = 0.0002;
  r70_rheostatbiocrnpyler_34648: enzyme_fba_rheostatbiocrnpyler_34648 + molecule_f16bp_rheostatbiocrnpyler_34648 => complex_enzyme_fba_molecule_f16bp_rheostatbiocrnpyler_34648; r70_rheostatbiocrnpyler_34648_k*enzyme_fba_rheostatbiocrnpyler_34648*molecule_f16bp_rheostatbiocrnpyler_34648;
    r70_rheostatbiocrnpyler_34648_k = 20;
  r70_1_rheostatbiocrnpyler_34648: complex_enzyme_fba_molecule_f16bp_rheostatbiocrnpyler_34648 => enzyme_fba_rheostatbiocrnpyler_34648 + molecule_f16bp_rheostatbiocrnpyler_34648; r70_1_rheostatbiocrnpyler_34648_k*complex_enzyme_fba_molecule_f16bp_rheostatbiocrnpyler_34648;
    r70_1_rheostatbiocrnpyler_34648_k = 0.0002;
  r72_rheostatbiocrnpyler_34648: complex_enzyme_fba_molecule_f16bp_rheostatbiocrnpyler_34648 => complex_enzyme_fba_molecule_dhap_rheostatbiocrnpyler_34648; r72_rheostatbiocrnpyler_34648_k*complex_enzyme_fba_molecule_f16bp_rheostatbiocrnpyler_34648;
    r72_rheostatbiocrnpyler_34648_k = 36000;
  r73_rheostatbiocrnpyler_34648: complex_enzyme_fba_molecule_dhap_rheostatbiocrnpyler_34648 => enzyme_fba_rheostatbiocrnpyler_34648 + molecule_dhap_rheostatbiocrnpyler_34648; r73_rheostatbiocrnpyler_34648_k*complex_enzyme_fba_molecule_dhap_rheostatbiocrnpyler_34648;
    r73_rheostatbiocrnpyler_34648_k = 20;
  r73_1_rheostatbiocrnpyler_34648: enzyme_fba_rheostatbiocrnpyler_34648 + molecule_dhap_rheostatbiocrnpyler_34648 => complex_enzyme_fba_molecule_dhap_rheostatbiocrnpyler_34648; r73_1_rheostatbiocrnpyler_34648_k*enzyme_fba_rheostatbiocrnpyler_34648*molecule_dhap_rheostatbiocrnpyler_34648;
    r73_1_rheostatbiocrnpyler_34648_k = 0.0002;
  r75_rheostatbiocrnpyler_34648: enzyme_tpi_rheostatbiocrnpyler_34648 + molecule_dhap_rheostatbiocrnpyler_34648 => complex_enzyme_tpi_molecule_dhap_rheostatbiocrnpyler_34648; r75_rheostatbiocrnpyler_34648_k*enzyme_tpi_rheostatbiocrnpyler_34648*molecule_dhap_rheostatbiocrnpyler_34648;
    r75_rheostatbiocrnpyler_34648_k = 20;
  r75_1_rheostatbiocrnpyler_34648: complex_enzyme_tpi_molecule_dhap_rheostatbiocrnpyler_34648 => enzyme_tpi_rheostatbiocrnpyler_34648 + molecule_dhap_rheostatbiocrnpyler_34648; r75_1_rheostatbiocrnpyler_34648_k*complex_enzyme_tpi_molecule_dhap_rheostatbiocrnpyler_34648;
    r75_1_rheostatbiocrnpyler_34648_k = 0.0002;
  r77_rheostatbiocrnpyler_34648: complex_enzyme_tpi_molecule_dhap_rheostatbiocrnpyler_34648 => complex_enzyme_tpi_molecule_g3p_rheostatbiocrnpyler_34648; r77_rheostatbiocrnpyler_34648_k*complex_enzyme_tpi_molecule_dhap_rheostatbiocrnpyler_34648;
    r77_rheostatbiocrnpyler_34648_k = 36000;
  r78_rheostatbiocrnpyler_34648: complex_enzyme_tpi_molecule_g3p_rheostatbiocrnpyler_34648 => enzyme_tpi_rheostatbiocrnpyler_34648 + molecule_g3p_rheostatbiocrnpyler_34648; r78_rheostatbiocrnpyler_34648_k*complex_enzyme_tpi_molecule_g3p_rheostatbiocrnpyler_34648;
    r78_rheostatbiocrnpyler_34648_k = 20;
  r78_1_rheostatbiocrnpyler_34648: enzyme_tpi_rheostatbiocrnpyler_34648 + molecule_g3p_rheostatbiocrnpyler_34648 => complex_enzyme_tpi_molecule_g3p_rheostatbiocrnpyler_34648; r78_1_rheostatbiocrnpyler_34648_k*enzyme_tpi_rheostatbiocrnpyler_34648*molecule_g3p_rheostatbiocrnpyler_34648;
    r78_1_rheostatbiocrnpyler_34648_k = 0.0002;
  r80_rheostatbiocrnpyler_34648: enzyme_pfkb_rheostatbiocrnpyler_34648 + metabolite_adp_rheostatbiocrnpyler_34648 + molecule_f16bp_rheostatbiocrnpyler_34648 => complex_enzyme_pfkb_metabolite_adp_molecule_f16bp_rheostatbiocrnpyler_34648; r80_rheostatbiocrnpyler_34648_k*enzyme_pfkb_rheostatbiocrnpyler_34648*metabolite_adp_rheostatbiocrnpyler_34648*molecule_f16bp_rheostatbiocrnpyler_34648;
    r80_rheostatbiocrnpyler_34648_k = 20;
  r80_1_rheostatbiocrnpyler_34648: complex_enzyme_pfkb_metabolite_adp_molecule_f16bp_rheostatbiocrnpyler_34648 => enzyme_pfkb_rheostatbiocrnpyler_34648 + metabolite_adp_rheostatbiocrnpyler_34648 + molecule_f16bp_rheostatbiocrnpyler_34648; r80_1_rheostatbiocrnpyler_34648_k*complex_enzyme_pfkb_metabolite_adp_molecule_f16bp_rheostatbiocrnpyler_34648;
    r80_1_rheostatbiocrnpyler_34648_k = 0.0002;
  r82_rheostatbiocrnpyler_34648: complex_enzyme_pfkb_metabolite_adp_molecule_f16bp_rheostatbiocrnpyler_34648 => complex_enzyme_pfkb_metabolite_atp_molecule_f6p_rheostatbiocrnpyler_34648; r82_rheostatbiocrnpyler_34648_k*complex_enzyme_pfkb_metabolite_adp_molecule_f16bp_rheostatbiocrnpyler_34648;
    r82_rheostatbiocrnpyler_34648_k = 36000;
  r83_rheostatbiocrnpyler_34648: complex_enzyme_pfkb_metabolite_atp_molecule_f6p_rheostatbiocrnpyler_34648 => enzyme_pfkb_rheostatbiocrnpyler_34648 + molecule_f6p_rheostatbiocrnpyler_34648 + metabolite_atp_rheostatbiocrnpyler_34648; r83_rheostatbiocrnpyler_34648_k*complex_enzyme_pfkb_metabolite_atp_molecule_f6p_rheostatbiocrnpyler_34648;
    r83_rheostatbiocrnpyler_34648_k = 20;
  r83_1_rheostatbiocrnpyler_34648: enzyme_pfkb_rheostatbiocrnpyler_34648 + molecule_f6p_rheostatbiocrnpyler_34648 + metabolite_atp_rheostatbiocrnpyler_34648 => complex_enzyme_pfkb_metabolite_atp_molecule_f6p_rheostatbiocrnpyler_34648; r83_1_rheostatbiocrnpyler_34648_k*enzyme_pfkb_rheostatbiocrnpyler_34648*molecule_f6p_rheostatbiocrnpyler_34648*metabolite_atp_rheostatbiocrnpyler_34648;
    r83_1_rheostatbiocrnpyler_34648_k = 0.0002;
  r85_rheostatbiocrnpyler_34648: enzyme_pgi_rheostatbiocrnpyler_34648 + molecule_f6p_rheostatbiocrnpyler_34648 => complex_enzyme_pgi_molecule_f6p_rheostatbiocrnpyler_34648; r85_rheostatbiocrnpyler_34648_k*enzyme_pgi_rheostatbiocrnpyler_34648*molecule_f6p_rheostatbiocrnpyler_34648;
    r85_rheostatbiocrnpyler_34648_k = 20;
  r85_1_rheostatbiocrnpyler_34648: complex_enzyme_pgi_molecule_f6p_rheostatbiocrnpyler_34648 => enzyme_pgi_rheostatbiocrnpyler_34648 + molecule_f6p_rheostatbiocrnpyler_34648; r85_1_rheostatbiocrnpyler_34648_k*complex_enzyme_pgi_molecule_f6p_rheostatbiocrnpyler_34648;
    r85_1_rheostatbiocrnpyler_34648_k = 0.0002;
  r87_rheostatbiocrnpyler_34648: complex_enzyme_pgi_molecule_f6p_rheostatbiocrnpyler_34648 => complex_enzyme_pgi_molecule_g6p_rheostatbiocrnpyler_34648; r87_rheostatbiocrnpyler_34648_k*complex_enzyme_pgi_molecule_f6p_rheostatbiocrnpyler_34648;
    r87_rheostatbiocrnpyler_34648_k = 36000;
  r88_rheostatbiocrnpyler_34648: complex_enzyme_pgi_molecule_g6p_rheostatbiocrnpyler_34648 => enzyme_pgi_rheostatbiocrnpyler_34648 + molecule_g6p_rheostatbiocrnpyler_34648; r88_rheostatbiocrnpyler_34648_k*complex_enzyme_pgi_molecule_g6p_rheostatbiocrnpyler_34648;
    r88_rheostatbiocrnpyler_34648_k = 20;
  r88_1_rheostatbiocrnpyler_34648: enzyme_pgi_rheostatbiocrnpyler_34648 + molecule_g6p_rheostatbiocrnpyler_34648 => complex_enzyme_pgi_molecule_g6p_rheostatbiocrnpyler_34648; r88_1_rheostatbiocrnpyler_34648_k*enzyme_pgi_rheostatbiocrnpyler_34648*molecule_g6p_rheostatbiocrnpyler_34648;
    r88_1_rheostatbiocrnpyler_34648_k = 0.0002;
  r90_rheostatbiocrnpyler_34648: enzyme_xfp_rheostatbiocrnpyler_34648 + molecule_f6p_rheostatbiocrnpyler_34648 => complex_enzyme_xfp_molecule_f6p_rheostatbiocrnpyler_34648; r90_rheostatbiocrnpyler_34648_k*enzyme_xfp_rheostatbiocrnpyler_34648*molecule_f6p_rheostatbiocrnpyler_34648;
    r90_rheostatbiocrnpyler_34648_k = 20;
  r90_1_rheostatbiocrnpyler_34648: complex_enzyme_xfp_molecule_f6p_rheostatbiocrnpyler_34648 => enzyme_xfp_rheostatbiocrnpyler_34648 + molecule_f6p_rheostatbiocrnpyler_34648; r90_1_rheostatbiocrnpyler_34648_k*complex_enzyme_xfp_molecule_f6p_rheostatbiocrnpyler_34648;
    r90_1_rheostatbiocrnpyler_34648_k = 0.0002;
  r92_rheostatbiocrnpyler_34648: complex_enzyme_xfp_molecule_f6p_rheostatbiocrnpyler_34648 => complex_enzyme_xfp_molecule_er4p_rheostatbiocrnpyler_34648; r92_rheostatbiocrnpyler_34648_k*complex_enzyme_xfp_molecule_f6p_rheostatbiocrnpyler_34648;
    r92_rheostatbiocrnpyler_34648_k = 36000;
  r93_rheostatbiocrnpyler_34648: complex_enzyme_xfp_molecule_er4p_rheostatbiocrnpyler_34648 => enzyme_xfp_rheostatbiocrnpyler_34648 + molecule_er4p_rheostatbiocrnpyler_34648; r93_rheostatbiocrnpyler_34648_k*complex_enzyme_xfp_molecule_er4p_rheostatbiocrnpyler_34648;
    r93_rheostatbiocrnpyler_34648_k = 20;
  r93_1_rheostatbiocrnpyler_34648: enzyme_xfp_rheostatbiocrnpyler_34648 + molecule_er4p_rheostatbiocrnpyler_34648 => complex_enzyme_xfp_molecule_er4p_rheostatbiocrnpyler_34648; r93_1_rheostatbiocrnpyler_34648_k*enzyme_xfp_rheostatbiocrnpyler_34648*molecule_er4p_rheostatbiocrnpyler_34648;
    r93_1_rheostatbiocrnpyler_34648_k = 0.0002;
  r95_rheostatbiocrnpyler_34648: enzyme_xfp_rheostatbiocrnpyler_34648 + metabolite_pi_rheostatbiocrnpyler_34648 + molecule_f6p_rheostatbiocrnpyler_34648 => complex_enzyme_xfp_metabolite_pi_molecule_f6p_rheostatbiocrnpyler_34648; r95_rheostatbiocrnpyler_34648_k*enzyme_xfp_rheostatbiocrnpyler_34648*metabolite_pi_rheostatbiocrnpyler_34648*molecule_f6p_rheostatbiocrnpyler_34648;
    r95_rheostatbiocrnpyler_34648_k = 20;
  r95_1_rheostatbiocrnpyler_34648: complex_enzyme_xfp_metabolite_pi_molecule_f6p_rheostatbiocrnpyler_34648 => enzyme_xfp_rheostatbiocrnpyler_34648 + metabolite_pi_rheostatbiocrnpyler_34648 + molecule_f6p_rheostatbiocrnpyler_34648; r95_1_rheostatbiocrnpyler_34648_k*complex_enzyme_xfp_metabolite_pi_molecule_f6p_rheostatbiocrnpyler_34648;
    r95_1_rheostatbiocrnpyler_34648_k = 0.0002;
  r97_rheostatbiocrnpyler_34648: complex_enzyme_xfp_metabolite_pi_molecule_f6p_rheostatbiocrnpyler_34648 => complex_enzyme_xfp_molecule_acetylp_rheostatbiocrnpyler_34648; r97_rheostatbiocrnpyler_34648_k*complex_enzyme_xfp_metabolite_pi_molecule_f6p_rheostatbiocrnpyler_34648;
    r97_rheostatbiocrnpyler_34648_k = 36000;
  r98_rheostatbiocrnpyler_34648: complex_enzyme_xfp_molecule_acetylp_rheostatbiocrnpyler_34648 => enzyme_xfp_rheostatbiocrnpyler_34648 + molecule_acetylp_rheostatbiocrnpyler_34648; r98_rheostatbiocrnpyler_34648_k*complex_enzyme_xfp_molecule_acetylp_rheostatbiocrnpyler_34648;
    r98_rheostatbiocrnpyler_34648_k = 20;
  r98_1_rheostatbiocrnpyler_34648: enzyme_xfp_rheostatbiocrnpyler_34648 + molecule_acetylp_rheostatbiocrnpyler_34648 => complex_enzyme_xfp_molecule_acetylp_rheostatbiocrnpyler_34648; r98_1_rheostatbiocrnpyler_34648_k*enzyme_xfp_rheostatbiocrnpyler_34648*molecule_acetylp_rheostatbiocrnpyler_34648;
    r98_1_rheostatbiocrnpyler_34648_k = 0.0002;
  r100_rheostatbiocrnpyler_34648: enzyme_tktatalb_rheostatbiocrnpyler_34648 + molecule_er4p_rheostatbiocrnpyler_34648 => complex_enzyme_tktatalb_molecule_er4p_rheostatbiocrnpyler_34648; r100_rheostatbiocrnpyler_34648_k*enzyme_tktatalb_rheostatbiocrnpyler_34648*molecule_er4p_rheostatbiocrnpyler_34648;
    r100_rheostatbiocrnpyler_34648_k = 20;
  r100_1_rheostatbiocrnpyler_34648: complex_enzyme_tktatalb_molecule_er4p_rheostatbiocrnpyler_34648 => enzyme_tktatalb_rheostatbiocrnpyler_34648 + molecule_er4p_rheostatbiocrnpyler_34648; r100_1_rheostatbiocrnpyler_34648_k*complex_enzyme_tktatalb_molecule_er4p_rheostatbiocrnpyler_34648;
    r100_1_rheostatbiocrnpyler_34648_k = 0.0002;
  r102_rheostatbiocrnpyler_34648: complex_enzyme_tktatalb_molecule_er4p_rheostatbiocrnpyler_34648 => complex_enzyme_tktatalb_molecule_f6p_rheostatbiocrnpyler_34648; r102_rheostatbiocrnpyler_34648_k*complex_enzyme_tktatalb_molecule_er4p_rheostatbiocrnpyler_34648;
    r102_rheostatbiocrnpyler_34648_k = 36000;
  r103_rheostatbiocrnpyler_34648: complex_enzyme_tktatalb_molecule_f6p_rheostatbiocrnpyler_34648 => enzyme_tktatalb_rheostatbiocrnpyler_34648 + molecule_f6p_rheostatbiocrnpyler_34648; r103_rheostatbiocrnpyler_34648_k*complex_enzyme_tktatalb_molecule_f6p_rheostatbiocrnpyler_34648;
    r103_rheostatbiocrnpyler_34648_k = 20;
  r103_1_rheostatbiocrnpyler_34648: enzyme_tktatalb_rheostatbiocrnpyler_34648 + molecule_f6p_rheostatbiocrnpyler_34648 => complex_enzyme_tktatalb_molecule_f6p_rheostatbiocrnpyler_34648; r103_1_rheostatbiocrnpyler_34648_k*enzyme_tktatalb_rheostatbiocrnpyler_34648*molecule_f6p_rheostatbiocrnpyler_34648;
    r103_1_rheostatbiocrnpyler_34648_k = 0.0002;
  r105_rheostatbiocrnpyler_34648: enzyme_tktatalb_rheostatbiocrnpyler_34648 + molecule_er4p_rheostatbiocrnpyler_34648 => complex_enzyme_tktatalb_molecule_er4p_rheostatbiocrnpyler_34648; r105_rheostatbiocrnpyler_34648_k*enzyme_tktatalb_rheostatbiocrnpyler_34648*molecule_er4p_rheostatbiocrnpyler_34648;
    r105_rheostatbiocrnpyler_34648_k = 20;
  r105_1_rheostatbiocrnpyler_34648: complex_enzyme_tktatalb_molecule_er4p_rheostatbiocrnpyler_34648 => enzyme_tktatalb_rheostatbiocrnpyler_34648 + molecule_er4p_rheostatbiocrnpyler_34648; r105_1_rheostatbiocrnpyler_34648_k*complex_enzyme_tktatalb_molecule_er4p_rheostatbiocrnpyler_34648;
    r105_1_rheostatbiocrnpyler_34648_k = 0.0002;
  r107_rheostatbiocrnpyler_34648: complex_enzyme_tktatalb_molecule_er4p_rheostatbiocrnpyler_34648 => complex_enzyme_tktatalb_molecule_g3p_rheostatbiocrnpyler_34648; r107_rheostatbiocrnpyler_34648_k*complex_enzyme_tktatalb_molecule_er4p_rheostatbiocrnpyler_34648;
    r107_rheostatbiocrnpyler_34648_k = 36000;
  r108_rheostatbiocrnpyler_34648: complex_enzyme_tktatalb_molecule_g3p_rheostatbiocrnpyler_34648 => enzyme_tktatalb_rheostatbiocrnpyler_34648 + molecule_g3p_rheostatbiocrnpyler_34648; r108_rheostatbiocrnpyler_34648_k*complex_enzyme_tktatalb_molecule_g3p_rheostatbiocrnpyler_34648;
    r108_rheostatbiocrnpyler_34648_k = 20;
  r108_1_rheostatbiocrnpyler_34648: enzyme_tktatalb_rheostatbiocrnpyler_34648 + molecule_g3p_rheostatbiocrnpyler_34648 => complex_enzyme_tktatalb_molecule_g3p_rheostatbiocrnpyler_34648; r108_1_rheostatbiocrnpyler_34648_k*enzyme_tktatalb_rheostatbiocrnpyler_34648*molecule_g3p_rheostatbiocrnpyler_34648;
    r108_1_rheostatbiocrnpyler_34648_k = 0.0002;
  r110_rheostatbiocrnpyler_34648: enzyme_tktatalb_rheostatbiocrnpyler_34648 + molecule_rib5p2_rheostatbiocrnpyler_34648 => complex_enzyme_tktatalb_molecule_rib5p2_rheostatbiocrnpyler_34648; r110_rheostatbiocrnpyler_34648_k*enzyme_tktatalb_rheostatbiocrnpyler_34648*molecule_rib5p2_rheostatbiocrnpyler_34648;
    r110_rheostatbiocrnpyler_34648_k = 20;
  r110_1_rheostatbiocrnpyler_34648: complex_enzyme_tktatalb_molecule_rib5p2_rheostatbiocrnpyler_34648 => enzyme_tktatalb_rheostatbiocrnpyler_34648 + molecule_rib5p2_rheostatbiocrnpyler_34648; r110_1_rheostatbiocrnpyler_34648_k*complex_enzyme_tktatalb_molecule_rib5p2_rheostatbiocrnpyler_34648;
    r110_1_rheostatbiocrnpyler_34648_k = 0.0002;
  r112_rheostatbiocrnpyler_34648: complex_enzyme_tktatalb_molecule_rib5p2_rheostatbiocrnpyler_34648 => complex_enzyme_tktatalb_molecule_f6p_rheostatbiocrnpyler_34648; r112_rheostatbiocrnpyler_34648_k*complex_enzyme_tktatalb_molecule_rib5p2_rheostatbiocrnpyler_34648;
    r112_rheostatbiocrnpyler_34648_k = 36000;
  r113_rheostatbiocrnpyler_34648: complex_enzyme_tktatalb_molecule_f6p_rheostatbiocrnpyler_34648 => enzyme_tktatalb_rheostatbiocrnpyler_34648 + molecule_f6p_rheostatbiocrnpyler_34648; r113_rheostatbiocrnpyler_34648_k*complex_enzyme_tktatalb_molecule_f6p_rheostatbiocrnpyler_34648;
    r113_rheostatbiocrnpyler_34648_k = 20;
  r113_1_rheostatbiocrnpyler_34648: enzyme_tktatalb_rheostatbiocrnpyler_34648 + molecule_f6p_rheostatbiocrnpyler_34648 => complex_enzyme_tktatalb_molecule_f6p_rheostatbiocrnpyler_34648; r113_1_rheostatbiocrnpyler_34648_k*enzyme_tktatalb_rheostatbiocrnpyler_34648*molecule_f6p_rheostatbiocrnpyler_34648;
    r113_1_rheostatbiocrnpyler_34648_k = 0.0002;
  r115_rheostatbiocrnpyler_34648: enzyme_tktatalb_rheostatbiocrnpyler_34648 + molecule_rib5p2_rheostatbiocrnpyler_34648 => complex_enzyme_tktatalb_molecule_rib5p2_rheostatbiocrnpyler_34648; r115_rheostatbiocrnpyler_34648_k*enzyme_tktatalb_rheostatbiocrnpyler_34648*molecule_rib5p2_rheostatbiocrnpyler_34648;
    r115_rheostatbiocrnpyler_34648_k = 20;
  r115_1_rheostatbiocrnpyler_34648: complex_enzyme_tktatalb_molecule_rib5p2_rheostatbiocrnpyler_34648 => enzyme_tktatalb_rheostatbiocrnpyler_34648 + molecule_rib5p2_rheostatbiocrnpyler_34648; r115_1_rheostatbiocrnpyler_34648_k*complex_enzyme_tktatalb_molecule_rib5p2_rheostatbiocrnpyler_34648;
    r115_1_rheostatbiocrnpyler_34648_k = 0.0002;
  r117_rheostatbiocrnpyler_34648: complex_enzyme_tktatalb_molecule_rib5p2_rheostatbiocrnpyler_34648 => complex_enzyme_tktatalb_molecule_g3p_rheostatbiocrnpyler_34648; r117_rheostatbiocrnpyler_34648_k*complex_enzyme_tktatalb_molecule_rib5p2_rheostatbiocrnpyler_34648;
    r117_rheostatbiocrnpyler_34648_k = 36000;
  r118_rheostatbiocrnpyler_34648: complex_enzyme_tktatalb_molecule_g3p_rheostatbiocrnpyler_34648 => enzyme_tktatalb_rheostatbiocrnpyler_34648 + molecule_g3p_rheostatbiocrnpyler_34648; r118_rheostatbiocrnpyler_34648_k*complex_enzyme_tktatalb_molecule_g3p_rheostatbiocrnpyler_34648;
    r118_rheostatbiocrnpyler_34648_k = 20;
  r118_1_rheostatbiocrnpyler_34648: enzyme_tktatalb_rheostatbiocrnpyler_34648 + molecule_g3p_rheostatbiocrnpyler_34648 => complex_enzyme_tktatalb_molecule_g3p_rheostatbiocrnpyler_34648; r118_1_rheostatbiocrnpyler_34648_k*enzyme_tktatalb_rheostatbiocrnpyler_34648*molecule_g3p_rheostatbiocrnpyler_34648;
    r118_1_rheostatbiocrnpyler_34648_k = 0.0002;
  r120_rheostatbiocrnpyler_34648: enzyme_tktatalb_rheostatbiocrnpyler_34648 + molecule_xyl5p_rheostatbiocrnpyler_34648 => complex_enzyme_tktatalb_molecule_xyl5p_rheostatbiocrnpyler_34648; r120_rheostatbiocrnpyler_34648_k*enzyme_tktatalb_rheostatbiocrnpyler_34648*molecule_xyl5p_rheostatbiocrnpyler_34648;
    r120_rheostatbiocrnpyler_34648_k = 20;
  r120_1_rheostatbiocrnpyler_34648: complex_enzyme_tktatalb_molecule_xyl5p_rheostatbiocrnpyler_34648 => enzyme_tktatalb_rheostatbiocrnpyler_34648 + molecule_xyl5p_rheostatbiocrnpyler_34648; r120_1_rheostatbiocrnpyler_34648_k*complex_enzyme_tktatalb_molecule_xyl5p_rheostatbiocrnpyler_34648;
    r120_1_rheostatbiocrnpyler_34648_k = 0.0002;
  r122_rheostatbiocrnpyler_34648: complex_enzyme_tktatalb_molecule_xyl5p_rheostatbiocrnpyler_34648 => complex_enzyme_tktatalb_molecule_f6p_rheostatbiocrnpyler_34648; r122_rheostatbiocrnpyler_34648_k*complex_enzyme_tktatalb_molecule_xyl5p_rheostatbiocrnpyler_34648;
    r122_rheostatbiocrnpyler_34648_k = 36000;
  r123_rheostatbiocrnpyler_34648: complex_enzyme_tktatalb_molecule_f6p_rheostatbiocrnpyler_34648 => enzyme_tktatalb_rheostatbiocrnpyler_34648 + molecule_f6p_rheostatbiocrnpyler_34648; r123_rheostatbiocrnpyler_34648_k*complex_enzyme_tktatalb_molecule_f6p_rheostatbiocrnpyler_34648;
    r123_rheostatbiocrnpyler_34648_k = 20;
  r123_1_rheostatbiocrnpyler_34648: enzyme_tktatalb_rheostatbiocrnpyler_34648 + molecule_f6p_rheostatbiocrnpyler_34648 => complex_enzyme_tktatalb_molecule_f6p_rheostatbiocrnpyler_34648; r123_1_rheostatbiocrnpyler_34648_k*enzyme_tktatalb_rheostatbiocrnpyler_34648*molecule_f6p_rheostatbiocrnpyler_34648;
    r123_1_rheostatbiocrnpyler_34648_k = 0.0002;
  r125_rheostatbiocrnpyler_34648: enzyme_tktatalb_rheostatbiocrnpyler_34648 + molecule_xyl5p_rheostatbiocrnpyler_34648 => complex_enzyme_tktatalb_molecule_xyl5p_rheostatbiocrnpyler_34648; r125_rheostatbiocrnpyler_34648_k*enzyme_tktatalb_rheostatbiocrnpyler_34648*molecule_xyl5p_rheostatbiocrnpyler_34648;
    r125_rheostatbiocrnpyler_34648_k = 20;
  r125_1_rheostatbiocrnpyler_34648: complex_enzyme_tktatalb_molecule_xyl5p_rheostatbiocrnpyler_34648 => enzyme_tktatalb_rheostatbiocrnpyler_34648 + molecule_xyl5p_rheostatbiocrnpyler_34648; r125_1_rheostatbiocrnpyler_34648_k*complex_enzyme_tktatalb_molecule_xyl5p_rheostatbiocrnpyler_34648;
    r125_1_rheostatbiocrnpyler_34648_k = 0.0002;
  r127_rheostatbiocrnpyler_34648: complex_enzyme_tktatalb_molecule_xyl5p_rheostatbiocrnpyler_34648 => complex_enzyme_tktatalb_molecule_g3p_rheostatbiocrnpyler_34648; r127_rheostatbiocrnpyler_34648_k*complex_enzyme_tktatalb_molecule_xyl5p_rheostatbiocrnpyler_34648;
    r127_rheostatbiocrnpyler_34648_k = 36000;
  r128_rheostatbiocrnpyler_34648: complex_enzyme_tktatalb_molecule_g3p_rheostatbiocrnpyler_34648 => enzyme_tktatalb_rheostatbiocrnpyler_34648 + molecule_g3p_rheostatbiocrnpyler_34648; r128_rheostatbiocrnpyler_34648_k*complex_enzyme_tktatalb_molecule_g3p_rheostatbiocrnpyler_34648;
    r128_rheostatbiocrnpyler_34648_k = 20;
  r128_1_rheostatbiocrnpyler_34648: enzyme_tktatalb_rheostatbiocrnpyler_34648 + molecule_g3p_rheostatbiocrnpyler_34648 => complex_enzyme_tktatalb_molecule_g3p_rheostatbiocrnpyler_34648; r128_1_rheostatbiocrnpyler_34648_k*enzyme_tktatalb_rheostatbiocrnpyler_34648*molecule_g3p_rheostatbiocrnpyler_34648;
    r128_1_rheostatbiocrnpyler_34648_k = 0.0002;
  r130_rheostatbiocrnpyler_34648: enzyme_nadphase_rheostatbiocrnpyler_34648 + NADPH_violaceinbiocrnpyler_899612_1_combined => complex_enzyme_nadphase_metabolite_nadph_rheostatbiocrnpyler_34648; r130_rheostatbiocrnpyler_34648_k*enzyme_nadphase_rheostatbiocrnpyler_34648*NADPH_violaceinbiocrnpyler_899612_1_combined;
    r130_rheostatbiocrnpyler_34648_k = 20;
  r130_1_rheostatbiocrnpyler_34648: complex_enzyme_nadphase_metabolite_nadph_rheostatbiocrnpyler_34648 => enzyme_nadphase_rheostatbiocrnpyler_34648 + NADPH_violaceinbiocrnpyler_899612_1_combined; r130_1_rheostatbiocrnpyler_34648_k*complex_enzyme_nadphase_metabolite_nadph_rheostatbiocrnpyler_34648;
    r130_1_rheostatbiocrnpyler_34648_k = 0.0002;
  r132_rheostatbiocrnpyler_34648: complex_enzyme_nadphase_metabolite_nadph_rheostatbiocrnpyler_34648 => complex_enzyme_nadphase_metabolite_nadp_rheostatbiocrnpyler_34648; r132_rheostatbiocrnpyler_34648_k*complex_enzyme_nadphase_metabolite_nadph_rheostatbiocrnpyler_34648;
    r132_rheostatbiocrnpyler_34648_k = 36000;
  r133_rheostatbiocrnpyler_34648: complex_enzyme_nadphase_metabolite_nadp_rheostatbiocrnpyler_34648 => enzyme_nadphase_rheostatbiocrnpyler_34648 + NADP_violaceinbiocrnpyler_899612_1_combined; r133_rheostatbiocrnpyler_34648_k*complex_enzyme_nadphase_metabolite_nadp_rheostatbiocrnpyler_34648;
    r133_rheostatbiocrnpyler_34648_k = 20;
  r133_1_rheostatbiocrnpyler_34648: enzyme_nadphase_rheostatbiocrnpyler_34648 + NADP_violaceinbiocrnpyler_899612_1_combined => complex_enzyme_nadphase_metabolite_nadp_rheostatbiocrnpyler_34648; r133_1_rheostatbiocrnpyler_34648_k*enzyme_nadphase_rheostatbiocrnpyler_34648*NADP_violaceinbiocrnpyler_899612_1_combined;
    r133_1_rheostatbiocrnpyler_34648_k = 0.0002;

  // Unit definitions:
  unit square_metre = metre^2;
end
